Sun Sep  6 05:18:34 AM UTC 2026
$PROBLEM modelsearch anchor (#1181) - LAGTIME(ON): 1-cpt oral with a lagged, eta-bearing absorption
; ferx candidate: pk one_cpt_oral(cl=CL, v=V, ka=KA, lagtime=ALAG), ALAG = TVALAG * exp(ETA_ALAG).
; Inits: the base's final estimates (base.ext), ALAG = t_first / 2 = 0.25, omega 0.01
; (Pharmpy's absorption_delay strategy), as ferx derives them.
$DATA warfarin.csv IGNORE=@
$INPUT ID TIME DV EVID AMT CMT=DROP RATE MDV
$SUBROUTINES ADVAN2 TRANS2
$PK
  CL = THETA(1)*EXP(ETA(1))
  V  = THETA(2)*EXP(ETA(2))
  KA = THETA(3)*EXP(ETA(3))
  ALAG1 = THETA(4)*EXP(ETA(4))
  S2 = V
$ERROR
  IPRED = F
  Y = IPRED*(1 + EPS(1))
$THETA (0, 0.132695)   ; TVCL
$THETA (0, 7.73771)    ; TVV
$THETA (0, 0.810796)   ; TVKA
$THETA (0, 0.25)       ; TVALAG
$OMEGA 0.0285884       ; ETA_CL
$OMEGA 0.00959179      ; ETA_V
$OMEGA 0.33588         ; ETA_KA
$OMEGA 0.01            ; ETA_ALAG
$SIGMA 0.000111621     ; proportional variance
$ESTIMATION METHOD=COND INTERACTION MAXEVAL=9999 PRINT=5 NOABORT

NM-TRAN MESSAGES
 WARNINGS AND ERRORS (IF ANY) FOR PROBLEM    1
 (WARNING  2) NM-TRAN INFERS THAT THE DATA ARE POPULATION.
Note: Analytical 2nd Derivatives are constructed in FSUBS but are never used.
      You may insert $ABBR DERIV2=NO after the first $PROB to save FSUBS construction and compilation time

1NONLINEAR MIXED EFFECTS MODEL PROGRAM (NONMEM) VERSION 7.5.1
 ORIGINALLY DEVELOPED BY STUART BEAL, LEWIS SHEINER, AND ALISON BOECKMANN
 CURRENT DEVELOPERS ARE ROBERT BAUER, ICON DEVELOPMENT SOLUTIONS,
 AND ALISON BOECKMANN. IMPLEMENTATION, EFFICIENCY, AND STANDARDIZATION
 PERFORMED BY NOUS INFOSYSTEMS.
 PROBLEM NO.:         1
 modelsearch anchor (#1181) - LAGTIME(ON): 1-cpt oral with a lagged, eta-
 TOT. NO. OF OBS RECS:      110
 TOT. NO. OF INDIVIDUALS:       10
 ONE COMPARTMENT MODEL WITH FIRST-ORDER ABSORPTION (ADVAN2)
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 #TBLN:      1
 #METH: First Order Conditional Estimation with Interaction
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
 #TERM:
0MINIMIZATION TERMINATED
 DUE TO ROUNDING ERRORS (ERROR=134)
 NO. OF FUNCTION EVALUATIONS USED:     3149
 NO. OF SIG. DIGITS UNREPORTABLE
0PARAMETER ESTIMATE IS NEAR ITS BOUNDARY

 ETABAR IS THE ARITHMETIC MEAN OF THE ETA-ESTIMATES,
 AND THE P-VALUE IS GIVEN FOR THE NULL HYPOTHESIS THAT THE TRUE MEAN IS 0.

 ETABAR:         4.3224E-06 -8.9881E-05 -1.3791E-04  5.3357E-08
 SE:             5.3461E-02  3.0908E-02  1.8329E-01  6.1627E-08
 N:                      10          10          10          10

 P VAL.:         9.9994E-01  9.9768E-01  9.9940E-01  3.8660E-01

 ETASHRINKSD(%)  3.1574E-02  1.8748E-01  5.5009E-02  9.9983E+01
 ETASHRINKVR(%)  6.3138E-02  3.7461E-01  1.0999E-01  1.0000E+02
 EBVSHRINKSD(%)  2.7643E-02  1.6870E-01  3.0978E-02  9.9981E+01
 EBVSHRINKVR(%)  5.5279E-02  3.3711E-01  6.1946E-02  1.0000E+02
 RELATIVEINF(%)  9.9944E+01  9.9636E+01  9.9760E+01  3.6680E-06
 EPSSHRINKSD(%)  1.4688E+01
 EPSSHRINKVR(%)  2.7219E+01


 TOTAL DATA POINTS NORMALLY DISTRIBUTED (N):          110
 N*LOG(2PI) CONSTANT TO OBJECTIVE FUNCTION:    202.16647730502800
 OBJECTIVE FUNCTION VALUE WITHOUT CONSTANT:   -287.05255519150103
 OBJECTIVE FUNCTION VALUE WITH CONSTANT:      -84.886077886473032
 REPORTED OBJECTIVE FUNCTION DOES NOT CONTAIN CONSTANT

 TOTAL EFFECTIVE ETAS (NIND*NETA):                            40


 #TERE:
 Elapsed estimation  time in seconds:     0.87
 Elapsed postprocess time in seconds:     0.00

 ********************               FIRST ORDER CONDITIONAL ESTIMATION WITH INTERACTION              ********************
 #OBJT:**************                       MINIMUM VALUE OF OBJECTIVE FUNCTION                      ********************
 #OBJV:********************************************     -287.053       **************************************************

 ********************               FIRST ORDER CONDITIONAL ESTIMATION WITH INTERACTION              ********************
 ********************                             FINAL PARAMETER ESTIMATE                           ********************

 THETA - VECTOR OF FIXED EFFECTS PARAMETERS   *********
         TH 1      TH 2      TH 3      TH 4
         1.33E-01  7.74E+00  8.14E-01  2.50E-03

 OMEGA - COV MATRIX FOR RANDOM EFFECTS - ETAS  ********
         ETA1      ETA2      ETA3      ETA4
 ETA1
+        2.86E-02
 ETA2
+        0.00E+00  9.59E-03
 ETA3
+        0.00E+00  0.00E+00  3.36E-01
 ETA4
+        0.00E+00  0.00E+00  0.00E+00  1.36E-06

 SIGMA - COV MATRIX FOR RANDOM EFFECTS - EPSILONS  ****
         EPS1
 EPS1
+        1.10E-04

 OMEGA - CORR MATRIX FOR RANDOM EFFECTS - ETAS  *******
         ETA1      ETA2      ETA3      ETA4
 ETA1
+        1.69E-01
 ETA2
+        0.00E+00  9.79E-02
 ETA3
+        0.00E+00  0.00E+00  5.80E-01
 ETA4
+        0.00E+00  0.00E+00  0.00E+00  1.17E-03

 SIGMA - CORR MATRIX FOR RANDOM EFFECTS - EPSILONS  ***
         EPS1
 EPS1
+        1.05E-02
 Elapsed finaloutput time in seconds:     0.00
 #CPUT: Total CPU Time in Seconds,        0.882
