Sun Sep  6 05:28:07 AM UTC 2026
$PROBLEM modelsearch anchor (#1181) - LAGTIME(ON) evaluated (MAXEVAL=0) at ferx's estimates
; lag.ctl's minimizer stopped (MINIMIZATION TERMINATED) at -287.053 with ALAG1 = 0.0025;
; ferx reached -287.629 at ALAG1 = 0.00613 on the same flat direction. This evaluates
; NONMEM's objective at ferx's point, so the two engines are compared on the same model
; at the same parameters.
$DATA warfarin.csv IGNORE=@
$INPUT ID TIME DV EVID AMT CMT=DROP RATE MDV
$SUBROUTINES ADVAN2 TRANS2
$PK
  CL = THETA(1)*EXP(ETA(1))
  V  = THETA(2)*EXP(ETA(2))
  KA = THETA(3)*EXP(ETA(3))
  ALAG1 = THETA(4)*EXP(ETA(4))
  S2 = V
$ERROR
  IPRED = F
  Y = IPRED*(1 + EPS(1))
$THETA (0, 0.1327108)     ; TVCL
$THETA (0, 7.7426766)     ; TVV
$THETA (0, 0.818823)      ; TVKA
$THETA (0, 0.0061279)     ; TVALAG
$OMEGA 0.02861324892854351
$OMEGA 0.009576881524064917
$OMEGA 0.336970828848554
$OMEGA 6.14421235332821E-06
$SIGMA 0.00010935459985     ; 0.010457274968254479^2
$ESTIMATION METHOD=COND INTERACTION MAXEVAL=0 PRINT=5 NOABORT

NM-TRAN MESSAGES
 WARNINGS AND ERRORS (IF ANY) FOR PROBLEM    1
 (WARNING  2) NM-TRAN INFERS THAT THE DATA ARE POPULATION.
Note: Analytical 2nd Derivatives are constructed in FSUBS but are never used.
      You may insert $ABBR DERIV2=NO after the first $PROB to save FSUBS construction and compilation time

1NONLINEAR MIXED EFFECTS MODEL PROGRAM (NONMEM) VERSION 7.5.1
 ORIGINALLY DEVELOPED BY STUART BEAL, LEWIS SHEINER, AND ALISON BOECKMANN
 CURRENT DEVELOPERS ARE ROBERT BAUER, ICON DEVELOPMENT SOLUTIONS,
 AND ALISON BOECKMANN. IMPLEMENTATION, EFFICIENCY, AND STANDARDIZATION
 PERFORMED BY NOUS INFOSYSTEMS.
 PROBLEM NO.:         1
 modelsearch anchor (#1181) - LAGTIME(ON) evaluated (MAXEVAL=0) at ferx's
 TOT. NO. OF OBS RECS:      110
 TOT. NO. OF INDIVIDUALS:       10
 ONE COMPARTMENT MODEL WITH FIRST-ORDER ABSORPTION (ADVAN2)
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 #TBLN:      1
 #METH: First Order Conditional Estimation with Interaction (Evaluation)
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 Elapsed evaluation time in seconds:     0.00
 Elapsed postprocess time in seconds:     0.00

 ********************         FIRST ORDER CONDITIONAL ESTIMATION WITH INTERACTION (EVALUATION)       ********************
 #OBJT:**************                       MINIMUM VALUE OF OBJECTIVE FUNCTION                      ********************
 #OBJV:********************************************     -287.629       **************************************************

 ********************         FIRST ORDER CONDITIONAL ESTIMATION WITH INTERACTION (EVALUATION)       ********************
 ********************                             FINAL PARAMETER ESTIMATE                           ********************

 THETA - VECTOR OF FIXED EFFECTS PARAMETERS   *********
         TH 1      TH 2      TH 3      TH 4
         1.33E-01  7.74E+00  8.19E-01  6.13E-03

 OMEGA - COV MATRIX FOR RANDOM EFFECTS - ETAS  ********
         ETA1      ETA2      ETA3      ETA4
 ETA1
+        2.86E-02
 ETA2
+        0.00E+00  9.58E-03
 ETA3
+        0.00E+00  0.00E+00  3.37E-01
 ETA4
+        0.00E+00  0.00E+00  0.00E+00  6.14E-06

 SIGMA - COV MATRIX FOR RANDOM EFFECTS - EPSILONS  ****
         EPS1
 EPS1
+        1.09E-04

 OMEGA - CORR MATRIX FOR RANDOM EFFECTS - ETAS  *******
         ETA1      ETA2      ETA3      ETA4
 ETA1
+        1.69E-01
 ETA2
+        0.00E+00  9.79E-02
 ETA3
+        0.00E+00  0.00E+00  5.80E-01
 ETA4
+        0.00E+00  0.00E+00  0.00E+00  2.48E-03

 SIGMA - CORR MATRIX FOR RANDOM EFFECTS - EPSILONS  ***
         EPS1
 EPS1
+        1.05E-02
 Elapsed finaloutput time in seconds:     0.00
 #CPUT: Total CPU Time in Seconds,        0.018
