$PROBLEM modelsearch anchor (#1181) - LAGTIME(ON) re-minimised from ferx's estimates
; Can NONMEM's minimizer improve on ferx's -287.629 when started there? (lag.ctl stopped
; at -287.053 from the seeded start.)
$DATA warfarin.csv IGNORE=@
$INPUT ID TIME DV EVID AMT CMT=DROP RATE MDV
$SUBROUTINES ADVAN2 TRANS2
$PK
  CL = THETA(1)*EXP(ETA(1))
  V  = THETA(2)*EXP(ETA(2))
  KA = THETA(3)*EXP(ETA(3))
  ALAG1 = THETA(4)*EXP(ETA(4))
  S2 = V
$ERROR
  IPRED = F
  Y = IPRED*(1 + EPS(1))
$THETA (0, 0.1327108)     ; TVCL
$THETA (0, 7.7426766)     ; TVV
$THETA (0, 0.818823)      ; TVKA
$THETA (0, 0.0061279)     ; TVALAG
$OMEGA 0.02861324892854351
$OMEGA 0.009576881524064917
$OMEGA 0.336970828848554
$OMEGA 6.14421235332821E-06
$SIGMA 0.00010935459985
$ESTIMATION METHOD=COND INTERACTION MAXEVAL=9999 PRINT=5 NOABORT
