Sun Sep  6 05:28:22 AM UTC 2026
$PROBLEM modelsearch anchor (#1181) - LAGTIME(ON) re-minimised from ferx's estimates
; Can NONMEM's minimizer improve on ferx's -287.629 when started there? (lag.ctl stopped
; at -287.053 from the seeded start.)
$DATA warfarin.csv IGNORE=@
$INPUT ID TIME DV EVID AMT CMT=DROP RATE MDV
$SUBROUTINES ADVAN2 TRANS2
$PK
  CL = THETA(1)*EXP(ETA(1))
  V  = THETA(2)*EXP(ETA(2))
  KA = THETA(3)*EXP(ETA(3))
  ALAG1 = THETA(4)*EXP(ETA(4))
  S2 = V
$ERROR
  IPRED = F
  Y = IPRED*(1 + EPS(1))
$THETA (0, 0.1327108)     ; TVCL
$THETA (0, 7.7426766)     ; TVV
$THETA (0, 0.818823)      ; TVKA
$THETA (0, 0.0061279)     ; TVALAG
$OMEGA 0.02861324892854351
$OMEGA 0.009576881524064917
$OMEGA 0.336970828848554
$OMEGA 6.14421235332821E-06
$SIGMA 0.00010935459985
$ESTIMATION METHOD=COND INTERACTION MAXEVAL=9999 PRINT=5 NOABORT

NM-TRAN MESSAGES
 WARNINGS AND ERRORS (IF ANY) FOR PROBLEM    1
 (WARNING  2) NM-TRAN INFERS THAT THE DATA ARE POPULATION.
Note: Analytical 2nd Derivatives are constructed in FSUBS but are never used.
      You may insert $ABBR DERIV2=NO after the first $PROB to save FSUBS construction and compilation time

1NONLINEAR MIXED EFFECTS MODEL PROGRAM (NONMEM) VERSION 7.5.1
 ORIGINALLY DEVELOPED BY STUART BEAL, LEWIS SHEINER, AND ALISON BOECKMANN
 CURRENT DEVELOPERS ARE ROBERT BAUER, ICON DEVELOPMENT SOLUTIONS,
 AND ALISON BOECKMANN. IMPLEMENTATION, EFFICIENCY, AND STANDARDIZATION
 PERFORMED BY NOUS INFOSYSTEMS.
 PROBLEM NO.:         1
 modelsearch anchor (#1181) - LAGTIME(ON) re-minimised from ferx's estima
 TOT. NO. OF OBS RECS:      110
 TOT. NO. OF INDIVIDUALS:       10
 ONE COMPARTMENT MODEL WITH FIRST-ORDER ABSORPTION (ADVAN2)
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 #TBLN:      1
 #METH: First Order Conditional Estimation with Interaction
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
 #TERM:
0MINIMIZATION SUCCESSFUL
 HOWEVER, PROBLEMS OCCURRED WITH THE MINIMIZATION.
 REGARD THE RESULTS OF THE ESTIMATION STEP CAREFULLY, AND ACCEPT THEM ONLY
 AFTER CHECKING THAT THE COVARIANCE STEP PRODUCES REASONABLE OUTPUT.
 NO. OF FUNCTION EVALUATIONS USED:       51
 NO. OF SIG. DIGITS IN FINAL EST.:  3.5

 ETABAR IS THE ARITHMETIC MEAN OF THE ETA-ESTIMATES,
 AND THE P-VALUE IS GIVEN FOR THE NULL HYPOTHESIS THAT THE TRUE MEAN IS 0.

 ETABAR:         4.2570E-06 -3.9724E-05 -1.3286E-04 -2.3126E-09
 SE:             5.3475E-02  3.0893E-02  1.8347E-01  6.8826E-07
 N:                      10          10          10          10

 P VAL.:         9.9994E-01  9.9897E-01  9.9942E-01  9.9732E-01

 ETASHRINKSD(%)  3.1369E-02  1.7225E-01  5.4256E-02  9.9912E+01
 ETASHRINKVR(%)  6.2727E-02  3.4421E-01  1.0848E-01  1.0000E+02
 EBVSHRINKSD(%)  2.7430E-02  1.6739E-01  3.0695E-02  9.9899E+01
 EBVSHRINKVR(%)  5.4853E-02  3.3450E-01  6.1382E-02  1.0000E+02
 RELATIVEINF(%)  9.9945E+01  9.9639E+01  9.9763E+01  1.0202E-04
 EPSSHRINKSD(%)  1.4689E+01
 EPSSHRINKVR(%)  2.7220E+01


 TOTAL DATA POINTS NORMALLY DISTRIBUTED (N):          110
 N*LOG(2PI) CONSTANT TO OBJECTIVE FUNCTION:    202.16647730502800
 OBJECTIVE FUNCTION VALUE WITHOUT CONSTANT:   -287.62917388013796
 OBJECTIVE FUNCTION VALUE WITH CONSTANT:      -85.462696575109959
 REPORTED OBJECTIVE FUNCTION DOES NOT CONTAIN CONSTANT

 TOTAL EFFECTIVE ETAS (NIND*NETA):                            40


 #TERE:
 Elapsed estimation  time in seconds:     0.02
 Elapsed postprocess time in seconds:     0.00

 ********************               FIRST ORDER CONDITIONAL ESTIMATION WITH INTERACTION              ********************
 #OBJT:**************                       MINIMUM VALUE OF OBJECTIVE FUNCTION                      ********************
 #OBJV:********************************************     -287.629       **************************************************

 ********************               FIRST ORDER CONDITIONAL ESTIMATION WITH INTERACTION              ********************
 ********************                             FINAL PARAMETER ESTIMATE                           ********************

 THETA - VECTOR OF FIXED EFFECTS PARAMETERS   *********
         TH 1      TH 2      TH 3      TH 4
         1.33E-01  7.74E+00  8.19E-01  6.13E-03

 OMEGA - COV MATRIX FOR RANDOM EFFECTS - ETAS  ********
         ETA1      ETA2      ETA3      ETA4
 ETA1
+        2.86E-02
 ETA2
+        0.00E+00  9.58E-03
 ETA3
+        0.00E+00  0.00E+00  3.37E-01
 ETA4
+        0.00E+00  0.00E+00  0.00E+00  6.14E-06

 SIGMA - COV MATRIX FOR RANDOM EFFECTS - EPSILONS  ****
         EPS1
 EPS1
+        1.09E-04

 OMEGA - CORR MATRIX FOR RANDOM EFFECTS - ETAS  *******
         ETA1      ETA2      ETA3      ETA4
 ETA1
+        1.69E-01
 ETA2
+        0.00E+00  9.79E-02
 ETA3
+        0.00E+00  0.00E+00  5.80E-01
 ETA4
+        0.00E+00  0.00E+00  0.00E+00  2.48E-03

 SIGMA - CORR MATRIX FOR RANDOM EFFECTS - EPSILONS  ***
         EPS1
 EPS1
+        1.05E-02
 Elapsed finaloutput time in seconds:     0.00
 #CPUT: Total CPU Time in Seconds,        0.036
