Tue Sep  8 04:28:05 PM UTC 2026
$PROBLEM modelsearch ODE-candidate anchor (#1257) - ELIMINATION(MM), MAXEVAL=0
; The NONMEM twin of the candidate `ferx modelsearch` writes for
; `ELIMINATION(MM)` from mm_base.ferx:
;
;   [structural_model]
;     ode_template one_cpt_oral(cl=CL, v=V, ka=KA)
;   [odes]
;     d/dt(central) = KA * depot - ((CL * KM / (KM + central / V)) / V) * central
;
; i.e. Pharmpy's parameterisation, `CLMM*KM*C/(KM + C)` with `C = A(2)/V` and
; `Vmax = CL*KM`, on the same disposition. ferx keeps the base model's `CL`
; as the Michaelis-Menten clearance (Pharmpy renames it to CLMM), which is
; what carries its initial estimate and its eta across the move - so THETA(1)
; is the same theta as in mm_base.ctl, at the same value.
;
; Evaluation only, at the inits the search derives: the base's own theta plus
; KM = max(DV)/2 = 6.9409, bounded above by 1.5*max(DV) = 20.8227. TOL/ATOL
; are tight because the FOCEI objective amplifies solver error; the ferx side
; pins ode_reltol = 1e-10, ode_abstol = 1e-12 for the same reason.
$DATA warfarin.csv IGNORE=@
$INPUT ID TIME DV EVID AMT CMT=DROP RATE MDV
$SUBROUTINES ADVAN13 TOL=9 ATOL=12
$MODEL COMP=(DEPOT, DEFDOSE) COMP=(CENTRAL, DEFOBS)
$PK
  CL = THETA(1)*EXP(ETA(1))
  V  = THETA(2)*EXP(ETA(2))
  KA = THETA(3)*EXP(ETA(3))
  KM = THETA(4)
  S2 = V
$DES
  CONC = A(2)/V
  DADT(1) = -KA*A(1)
  DADT(2) =  KA*A(1) - (CL*KM/(KM + CONC))/V*A(2)
$ERROR
  IPRED = F
  Y = IPRED*(1 + EPS(1))
$THETA (0, 0.2)               ; TVCL  (the Michaelis-Menten clearance)
$THETA (0, 10.0)              ; TVV
$THETA (0, 1.5)               ; TVKA
$THETA (0, 6.9409, 20.8227)   ; TVKM  = max(DV)/2, upper 1.5*max(DV)
$OMEGA 0.09                   ; ETA_CL
$OMEGA 0.04                   ; ETA_V
$OMEGA 0.30                   ; ETA_KA
$SIGMA 0.0004                 ; proportional variance (= 0.02 SD)
$ESTIMATION METHOD=COND INTERACTION MAXEVAL=0 PRINT=1 NOABORT

NM-TRAN MESSAGES
 WARNINGS AND ERRORS (IF ANY) FOR PROBLEM    1
 (WARNING  2) NM-TRAN INFERS THAT THE DATA ARE POPULATION.
Note: Analytical 2nd Derivatives are constructed in FSUBS but are never used.
      You may insert $ABBR DERIV2=NO after the first $PROB to save FSUBS construction and compilation time

1NONLINEAR MIXED EFFECTS MODEL PROGRAM (NONMEM) VERSION 7.5.1
 ORIGINALLY DEVELOPED BY STUART BEAL, LEWIS SHEINER, AND ALISON BOECKMANN
 CURRENT DEVELOPERS ARE ROBERT BAUER, ICON DEVELOPMENT SOLUTIONS,
 AND ALISON BOECKMANN. IMPLEMENTATION, EFFICIENCY, AND STANDARDIZATION
 PERFORMED BY NOUS INFOSYSTEMS.
 PROBLEM NO.:         1
 modelsearch ODE-candidate anchor (#1257) - ELIMINATION(MM), MAXEVAL=0
 TOT. NO. OF OBS RECS:      110
 TOT. NO. OF INDIVIDUALS:       10
 GENERAL NONLINEAR KINETICS MODEL WITH STIFF/NONSTIFF EQUATIONS (LSODA, ADVAN13)
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 #TBLN:      1
 #METH: First Order Conditional Estimation with Interaction (Evaluation)
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 Elapsed evaluation time in seconds:     0.03
 Elapsed postprocess time in seconds:     0.00

 ********************         FIRST ORDER CONDITIONAL ESTIMATION WITH INTERACTION (EVALUATION)       ********************
 #OBJT:**************                       MINIMUM VALUE OF OBJECTIVE FUNCTION                      ********************
 #OBJV:********************************************      929.631       **************************************************

 ********************         FIRST ORDER CONDITIONAL ESTIMATION WITH INTERACTION (EVALUATION)       ********************
 ********************                             FINAL PARAMETER ESTIMATE                           ********************

 THETA - VECTOR OF FIXED EFFECTS PARAMETERS   *********
         TH 1      TH 2      TH 3      TH 4
         2.00E-01  1.00E+01  1.50E+00  6.94E+00

 OMEGA - COV MATRIX FOR RANDOM EFFECTS - ETAS  ********
         ETA1      ETA2      ETA3
 ETA1
+        9.00E-02
 ETA2
+        0.00E+00  4.00E-02
 ETA3
+        0.00E+00  0.00E+00  3.00E-01

 SIGMA - COV MATRIX FOR RANDOM EFFECTS - EPSILONS  ****
         EPS1
 EPS1
+        4.00E-04

 OMEGA - CORR MATRIX FOR RANDOM EFFECTS - ETAS  *******
         ETA1      ETA2      ETA3
 ETA1
+        3.00E-01
 ETA2
+        0.00E+00  2.00E-01
 ETA3
+        0.00E+00  0.00E+00  5.48E-01

 SIGMA - CORR MATRIX FOR RANDOM EFFECTS - EPSILONS  ***
         EPS1
 EPS1
+        2.00E-02
 Elapsed finaloutput time in seconds:     0.00
 #CPUT: Total CPU Time in Seconds,        0.036
