$PROBLEM modelsearch anchor (#1181) - PERIPHERALS(1) evaluated (MAXEVAL=0) at ferx's estimates
; p1.ctl reached -289.073 (Q = 0.0060, V3 = 0.067); ferx -289.099 (Q = 0.0047, V2 = 0.061).
$DATA warfarin.csv IGNORE=@
$INPUT ID TIME DV EVID AMT CMT=DROP RATE MDV
$SUBROUTINES ADVAN4 TRANS4
$PK
  CL = THETA(1)*EXP(ETA(1))
  V2 = THETA(2)*EXP(ETA(2))
  KA = THETA(3)*EXP(ETA(3))
  Q  = THETA(4)
  V3 = THETA(5)
  S2 = V2
$ERROR
  IPRED = F
  Y = IPRED*(1 + EPS(1))
$THETA (0, 0.1326946)     ; TVCL
$THETA (0, 7.695455)      ; TVV
$THETA (0, 0.8042344)     ; TVKA
$THETA (0, 0.0047433)     ; TVQ
$THETA (0, 0.0607971)     ; TVV2
$OMEGA 0.02870786082081168
$OMEGA 0.009779759833964959
$OMEGA 0.3356496751037707
$SIGMA 0.00010726611     ; 0.010356935469827654^2
$ESTIMATION METHOD=COND INTERACTION MAXEVAL=0 PRINT=5 NOABORT
