Sun Sep  6 05:18:47 AM UTC 2026
$PROBLEM modelsearch anchor (#1181) - LAGTIME(ON);PERIPHERALS(1): 2-cpt oral with a lagged absorption
; ferx candidate: pk two_cpt_oral(cl=CL, v1=V, q=Q, v2=V2, ka=KA, lagtime=ALAG).
; Inits: the base's final estimates (base.ext); Q = CL, V2 = 0.05 * V, ALAG = 0.25 with
; omega 0.01, as ferx derives them.
$DATA warfarin.csv IGNORE=@
$INPUT ID TIME DV EVID AMT CMT=DROP RATE MDV
$SUBROUTINES ADVAN4 TRANS4
$PK
  CL = THETA(1)*EXP(ETA(1))
  V2 = THETA(2)*EXP(ETA(2))
  KA = THETA(3)*EXP(ETA(3))
  Q  = THETA(4)
  V3 = THETA(5)
  ALAG1 = THETA(6)*EXP(ETA(4))
  S2 = V2
$ERROR
  IPRED = F
  Y = IPRED*(1 + EPS(1))
$THETA (0, 0.132695)   ; TVCL
$THETA (0, 7.73771)    ; TVV
$THETA (0, 0.810796)   ; TVKA
$THETA (0, 0.132695)   ; TVQ  = CL
$THETA (0, 0.3868855)  ; TVV2 = 0.05 * V
$THETA (0, 0.25)       ; TVALAG
$OMEGA 0.0285884       ; ETA_CL
$OMEGA 0.00959179      ; ETA_V
$OMEGA 0.33588         ; ETA_KA
$OMEGA 0.01            ; ETA_ALAG
$SIGMA 0.000111621     ; proportional variance
$ESTIMATION METHOD=COND INTERACTION MAXEVAL=9999 PRINT=5 NOABORT

NM-TRAN MESSAGES
 WARNINGS AND ERRORS (IF ANY) FOR PROBLEM    1
 (WARNING  2) NM-TRAN INFERS THAT THE DATA ARE POPULATION.
Note: Analytical 2nd Derivatives are constructed in FSUBS but are never used.
      You may insert $ABBR DERIV2=NO after the first $PROB to save FSUBS construction and compilation time

1NONLINEAR MIXED EFFECTS MODEL PROGRAM (NONMEM) VERSION 7.5.1
 ORIGINALLY DEVELOPED BY STUART BEAL, LEWIS SHEINER, AND ALISON BOECKMANN
 CURRENT DEVELOPERS ARE ROBERT BAUER, ICON DEVELOPMENT SOLUTIONS,
 AND ALISON BOECKMANN. IMPLEMENTATION, EFFICIENCY, AND STANDARDIZATION
 PERFORMED BY NOUS INFOSYSTEMS.
 PROBLEM NO.:         1
 modelsearch anchor (#1181) - LAGTIME(ON);PERIPHERALS(1): 2-cpt oral with
 TOT. NO. OF OBS RECS:      110
 TOT. NO. OF INDIVIDUALS:       10
 TWO COMPARTMENT MODEL WITH FIRST-ORDER ABSORPTION (ADVAN4)
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 #TBLN:      1
 #METH: First Order Conditional Estimation with Interaction
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
 #TERM:
0MINIMIZATION TERMINATED
 DUE TO MAX. NO. OF FUNCTION EVALUATIONS EXCEEDED
 NO. OF FUNCTION EVALUATIONS USED:    10017
 NO. OF SIG. DIGITS UNREPORTABLE

 ETABAR IS THE ARITHMETIC MEAN OF THE ETA-ESTIMATES,
 AND THE P-VALUE IS GIVEN FOR THE NULL HYPOTHESIS THAT THE TRUE MEAN IS 0.

 ETABAR:         1.3748E-04 -2.8175E-04 -1.1364E-03  1.2250E-07
 SE:             5.3473E-02  3.1044E-02  1.8326E-01  5.6052E-05
 N:                      10          10          10          10

 P VAL.:         9.9795E-01  9.9276E-01  9.9505E-01  9.9826E-01

 ETASHRINKSD(%)  3.1374E-02  1.7541E-01  5.3360E-02  9.9166E+01
 ETASHRINKVR(%)  6.2738E-02  3.5051E-01  1.0669E-01  9.9993E+01
 EBVSHRINKSD(%)  2.7480E-02  1.6757E-01  3.0747E-02  9.9041E+01
 EBVSHRINKVR(%)  5.4953E-02  3.3486E-01  6.1484E-02  9.9991E+01
 RELATIVEINF(%)  9.9945E+01  9.9639E+01  9.9763E+01  9.1799E-03
 EPSSHRINKSD(%)  1.4689E+01
 EPSSHRINKVR(%)  2.7221E+01


 TOTAL DATA POINTS NORMALLY DISTRIBUTED (N):          110
 N*LOG(2PI) CONSTANT TO OBJECTIVE FUNCTION:    202.16647730502800
 OBJECTIVE FUNCTION VALUE WITHOUT CONSTANT:   -287.48301406411423
 OBJECTIVE FUNCTION VALUE WITH CONSTANT:      -85.316536759086233
 REPORTED OBJECTIVE FUNCTION DOES NOT CONTAIN CONSTANT

 TOTAL EFFECTIVE ETAS (NIND*NETA):                            40


 #TERE:
 Elapsed estimation  time in seconds:     3.93
 Elapsed postprocess time in seconds:     0.00

 ********************               FIRST ORDER CONDITIONAL ESTIMATION WITH INTERACTION              ********************
 #OBJT:**************                       MINIMUM VALUE OF OBJECTIVE FUNCTION                      ********************
 #OBJV:********************************************     -287.483       **************************************************

 ********************               FIRST ORDER CONDITIONAL ESTIMATION WITH INTERACTION              ********************
 ********************                             FINAL PARAMETER ESTIMATE                           ********************

 THETA - VECTOR OF FIXED EFFECTS PARAMETERS   *********
         TH 1      TH 2      TH 3      TH 4      TH 5      TH 6
         1.33E-01  7.71E+00  8.17E-01  3.71E-02  3.15E-02  6.77E-03

 OMEGA - COV MATRIX FOR RANDOM EFFECTS - ETAS  ********
         ETA1      ETA2      ETA3      ETA4
 ETA1
+        2.86E-02
 ETA2
+        0.00E+00  9.67E-03
 ETA3
+        0.00E+00  0.00E+00  3.36E-01
 ETA4
+        0.00E+00  0.00E+00  0.00E+00  4.51E-04

 SIGMA - COV MATRIX FOR RANDOM EFFECTS - EPSILONS  ****
         EPS1
 EPS1
+        1.10E-04

 OMEGA - CORR MATRIX FOR RANDOM EFFECTS - ETAS  *******
         ETA1      ETA2      ETA3      ETA4
 ETA1
+        1.69E-01
 ETA2
+        0.00E+00  9.83E-02
 ETA3
+        0.00E+00  0.00E+00  5.80E-01
 ETA4
+        0.00E+00  0.00E+00  0.00E+00  2.12E-02

 SIGMA - CORR MATRIX FOR RANDOM EFFECTS - EPSILONS  ***
         EPS1
 EPS1
+        1.05E-02
 Elapsed finaloutput time in seconds:     0.00
 #CPUT: Total CPU Time in Seconds,        3.931
