$PROBLEM modelsearch anchor (#1181) - LAGTIME(ON);PERIPHERALS(1) evaluated (MAXEVAL=0) at ferx's estimates
; p1_lag.ctl stopped at -287.483 (Q = 0.037, V3 = 0.032, ALAG1 = 0.0068); ferx collapsed the
; peripheral (Q = 3069, V2 = 9e-6, i.e. the lag model) at -287.629.
$DATA warfarin.csv IGNORE=@
$INPUT ID TIME DV EVID AMT CMT=DROP RATE MDV
$SUBROUTINES ADVAN4 TRANS4
$PK
  CL = THETA(1)*EXP(ETA(1))
  V2 = THETA(2)*EXP(ETA(2))
  KA = THETA(3)*EXP(ETA(3))
  Q  = THETA(4)
  V3 = THETA(5)
  ALAG1 = THETA(6)*EXP(ETA(4))
  S2 = V2
$ERROR
  IPRED = F
  Y = IPRED*(1 + EPS(1))
$THETA (0, 0.1327108)     ; TVCL
$THETA (0, 7.7426667)     ; TVV
$THETA (0, 0.8188248)     ; TVKA
$THETA (0, 3068.5578784)  ; TVQ
$THETA (0, 9.3E-06)       ; TVV2
$THETA (0, 0.0061277)     ; TVALAG
$OMEGA 0.028613259228081424
$OMEGA 0.009576912380033928
$OMEGA 0.3369715918891864
$OMEGA 6.14421235332821E-06
$SIGMA 0.00010935455267    ; 0.010457272706793332^2
$ESTIMATION METHOD=COND INTERACTION MAXEVAL=0 PRINT=5 NOABORT
