Sun Sep  6 05:28:17 AM UTC 2026
$PROBLEM modelsearch anchor (#1181) - LAGTIME(ON);PERIPHERALS(1) evaluated (MAXEVAL=0) at ferx's estimates
; p1_lag.ctl stopped at -287.483 (Q = 0.037, V3 = 0.032, ALAG1 = 0.0068); ferx collapsed the
; peripheral (Q = 3069, V2 = 9e-6, i.e. the lag model) at -287.629.
$DATA warfarin.csv IGNORE=@
$INPUT ID TIME DV EVID AMT CMT=DROP RATE MDV
$SUBROUTINES ADVAN4 TRANS4
$PK
  CL = THETA(1)*EXP(ETA(1))
  V2 = THETA(2)*EXP(ETA(2))
  KA = THETA(3)*EXP(ETA(3))
  Q  = THETA(4)
  V3 = THETA(5)
  ALAG1 = THETA(6)*EXP(ETA(4))
  S2 = V2
$ERROR
  IPRED = F
  Y = IPRED*(1 + EPS(1))
$THETA (0, 0.1327108)     ; TVCL
$THETA (0, 7.7426667)     ; TVV
$THETA (0, 0.8188248)     ; TVKA
$THETA (0, 3068.5578784)  ; TVQ
$THETA (0, 9.3E-06)       ; TVV2
$THETA (0, 0.0061277)     ; TVALAG
$OMEGA 0.028613259228081424
$OMEGA 0.009576912380033928
$OMEGA 0.3369715918891864
$OMEGA 6.14421235332821E-06
$SIGMA 0.00010935455267    ; 0.010457272706793332^2
$ESTIMATION METHOD=COND INTERACTION MAXEVAL=0 PRINT=5 NOABORT

NM-TRAN MESSAGES
 WARNINGS AND ERRORS (IF ANY) FOR PROBLEM    1
 (WARNING  2) NM-TRAN INFERS THAT THE DATA ARE POPULATION.
Note: Analytical 2nd Derivatives are constructed in FSUBS but are never used.
      You may insert $ABBR DERIV2=NO after the first $PROB to save FSUBS construction and compilation time

1NONLINEAR MIXED EFFECTS MODEL PROGRAM (NONMEM) VERSION 7.5.1
 ORIGINALLY DEVELOPED BY STUART BEAL, LEWIS SHEINER, AND ALISON BOECKMANN
 CURRENT DEVELOPERS ARE ROBERT BAUER, ICON DEVELOPMENT SOLUTIONS,
 AND ALISON BOECKMANN. IMPLEMENTATION, EFFICIENCY, AND STANDARDIZATION
 PERFORMED BY NOUS INFOSYSTEMS.
 PROBLEM NO.:         1
 modelsearch anchor (#1181) - LAGTIME(ON);PERIPHERALS(1) evaluated (MAXEV
 TOT. NO. OF OBS RECS:      110
 TOT. NO. OF INDIVIDUALS:       10
 TWO COMPARTMENT MODEL WITH FIRST-ORDER ABSORPTION (ADVAN4)
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 #TBLN:      1
 #METH: First Order Conditional Estimation with Interaction (Evaluation)
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 Elapsed evaluation time in seconds:     0.00
 Elapsed postprocess time in seconds:     0.00

 ********************         FIRST ORDER CONDITIONAL ESTIMATION WITH INTERACTION (EVALUATION)       ********************
 #OBJT:**************                       MINIMUM VALUE OF OBJECTIVE FUNCTION                      ********************
 #OBJV:********************************************     -287.629       **************************************************

 ********************         FIRST ORDER CONDITIONAL ESTIMATION WITH INTERACTION (EVALUATION)       ********************
 ********************                             FINAL PARAMETER ESTIMATE                           ********************

 THETA - VECTOR OF FIXED EFFECTS PARAMETERS   *********
         TH 1      TH 2      TH 3      TH 4      TH 5      TH 6
         1.33E-01  7.74E+00  8.19E-01  3.07E+03  9.30E-06  6.13E-03

 OMEGA - COV MATRIX FOR RANDOM EFFECTS - ETAS  ********
         ETA1      ETA2      ETA3      ETA4
 ETA1
+        2.86E-02
 ETA2
+        0.00E+00  9.58E-03
 ETA3
+        0.00E+00  0.00E+00  3.37E-01
 ETA4
+        0.00E+00  0.00E+00  0.00E+00  6.14E-06

 SIGMA - COV MATRIX FOR RANDOM EFFECTS - EPSILONS  ****
         EPS1
 EPS1
+        1.09E-04

 OMEGA - CORR MATRIX FOR RANDOM EFFECTS - ETAS  *******
         ETA1      ETA2      ETA3      ETA4
 ETA1
+        1.69E-01
 ETA2
+        0.00E+00  9.79E-02
 ETA3
+        0.00E+00  0.00E+00  5.80E-01
 ETA4
+        0.00E+00  0.00E+00  0.00E+00  2.48E-03

 SIGMA - CORR MATRIX FOR RANDOM EFFECTS - EPSILONS  ***
         EPS1
 EPS1
+        1.05E-02
 Elapsed finaloutput time in seconds:     0.00
 #CPUT: Total CPU Time in Seconds,        0.018
