Fri Jun 19 10:42:16 AM UTC 2026
$PROBLEM IIV on residual error (ferx #409): Y = IPRED + EPS*EXP(ETA)
; 1-cpt oral (ADVAN2 TRANS2). Data simulated by tests/gen_iiv_anchor.rs from the
; ferx model nonmem_anchor/iiv_on_ruv_fit.ferx (true ETA_RUV variance = 0.30).
; Reproduce: nmfe75 iiv_on_ruv.ctl iiv_on_ruv.lst
$INPUT ID TIME DV EVID AMT CMT RATE MDV
$DATA iiv_on_ruv.csv IGNORE=@
$SUBROUTINE ADVAN2 TRANS2
$PK
  CL = THETA(1)*EXP(ETA(1))
  V  = THETA(2)*EXP(ETA(2))
  KA = THETA(3)*EXP(ETA(3))
  S2 = V
$ERROR
  IPRED = F
  ; proportional residual error scaled per-subject by EXP(ETA(4)) — IIV on RUV.
  Y = IPRED + IPRED*EPS(1)*EXP(ETA(4))
$THETA
  (0.001, 0.13, 10.0)   ; TVCL
  (0.1,   8.0,  500.0)  ; TVV
  (0.01,  1.0,  50.0)   ; TVKA
$OMEGA
  0.09   ; ETA_CL
  0.04   ; ETA_V
  0.30   ; ETA_KA
  0.30   ; ETA_RUV  (IIV on residual error)
$SIGMA
  0.01   ; PROP_ERR variance (sd 0.1)
$ESTIMATION METHOD=1 INTER MAXEVAL=9999 NOABORT PRINT=5
$COVARIANCE UNCONDITIONAL

NM-TRAN MESSAGES
 WARNINGS AND ERRORS (IF ANY) FOR PROBLEM    1
 (WARNING  2) NM-TRAN INFERS THAT THE DATA ARE POPULATION.
Note: Analytical 2nd Derivatives are constructed in FSUBS but are never used.
      You may insert $ABBR DERIV2=NO after the first $PROB to save FSUBS construction and compilation time

1NONLINEAR MIXED EFFECTS MODEL PROGRAM (NONMEM) VERSION 7.5.1
 ORIGINALLY DEVELOPED BY STUART BEAL, LEWIS SHEINER, AND ALISON BOECKMANN
 CURRENT DEVELOPERS ARE ROBERT BAUER, ICON DEVELOPMENT SOLUTIONS,
 AND ALISON BOECKMANN. IMPLEMENTATION, EFFICIENCY, AND STANDARDIZATION
 PERFORMED BY NOUS INFOSYSTEMS.
 PROBLEM NO.:         1
 IIV on residual error (ferx #409): Y = IPRED + EPS*EXP(ETA)
 TOT. NO. OF OBS RECS:      550
 TOT. NO. OF INDIVIDUALS:       50
 ONE COMPARTMENT MODEL WITH FIRST-ORDER ABSORPTION (ADVAN2)
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 #TBLN:      1
 #METH: First Order Conditional Estimation with Interaction
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
 #TERM:
0MINIMIZATION TERMINATED
 DUE TO ROUNDING ERRORS (ERROR=134)
 NO. OF FUNCTION EVALUATIONS USED:      380
 NO. OF SIG. DIGITS UNREPORTABLE

 ETABAR IS THE ARITHMETIC MEAN OF THE ETA-ESTIMATES,
 AND THE P-VALUE IS GIVEN FOR THE NULL HYPOTHESIS THAT THE TRUE MEAN IS 0.

 ETABAR:        -1.5175E-03 -3.8954E-03 -4.8115E-03 -1.1507E-01
 SE:             4.3610E-02  2.4648E-02  6.5529E-02  6.1206E-02
 N:                      50          50          50          50

 P VAL.:         9.7224E-01  8.7442E-01  9.4147E-01  6.0094E-02

 ETASHRINKSD(%)  6.9641E-01  2.1505E+00  2.8251E+00  7.5875E-01
 ETASHRINKVR(%)  1.3880E+00  4.2547E+00  5.5703E+00  1.5117E+00
 EBVSHRINKSD(%)  7.4652E-01  3.4118E+00  3.0647E+00  1.0314E+01
 EBVSHRINKVR(%)  1.4875E+00  6.7072E+00  6.0355E+00  1.9565E+01
 RELATIVEINF(%)  9.8497E+01  9.3128E+01  9.3814E+01  8.0427E+01
 EPSSHRINKSD(%)  2.7892E+00
 EPSSHRINKVR(%)  5.5006E+00


 TOTAL DATA POINTS NORMALLY DISTRIBUTED (N):          550
 N*LOG(2PI) CONSTANT TO OBJECTIVE FUNCTION:    1010.8323865251399
 OBJECTIVE FUNCTION VALUE WITHOUT CONSTANT:    567.37196978983025
 OBJECTIVE FUNCTION VALUE WITH CONSTANT:       1578.2043563149700
 REPORTED OBJECTIVE FUNCTION DOES NOT CONTAIN CONSTANT

 TOTAL EFFECTIVE ETAS (NIND*NETA):                           200


 #TERE:
 Elapsed estimation  time in seconds:     1.00
 Elapsed covariance  time in seconds:     0.34
 Elapsed postprocess time in seconds:     0.00

 ********************               FIRST ORDER CONDITIONAL ESTIMATION WITH INTERACTION              ********************
 #OBJT:**************                       MINIMUM VALUE OF OBJECTIVE FUNCTION                      ********************
 #OBJV:********************************************      567.372       **************************************************

 ********************               FIRST ORDER CONDITIONAL ESTIMATION WITH INTERACTION              ********************
 ********************                             FINAL PARAMETER ESTIMATE                           ********************

 THETA - VECTOR OF FIXED EFFECTS PARAMETERS   *********
         TH 1      TH 2      TH 3
         1.26E-01  7.74E+00  8.60E-01

 OMEGA - COV MATRIX FOR RANDOM EFFECTS - ETAS  ********
         ETA1      ETA2      ETA3      ETA4
 ETA1
+        9.64E-02
 ETA2
+        0.00E+00  3.17E-02
 ETA3
+        0.00E+00  0.00E+00  2.27E-01
 ETA4
+        0.00E+00  0.00E+00  0.00E+00  1.90E-01

 SIGMA - COV MATRIX FOR RANDOM EFFECTS - EPSILONS  ****
         EPS1
 EPS1
+        8.06E-03

 OMEGA - CORR MATRIX FOR RANDOM EFFECTS - ETAS  *******
         ETA1      ETA2      ETA3      ETA4
 ETA1
+        3.11E-01
 ETA2
+        0.00E+00  1.78E-01
 ETA3
+        0.00E+00  0.00E+00  4.77E-01
 ETA4
+        0.00E+00  0.00E+00  0.00E+00  4.36E-01

 SIGMA - CORR MATRIX FOR RANDOM EFFECTS - EPSILONS  ***
         EPS1
 EPS1
+        8.98E-02

 ********************               FIRST ORDER CONDITIONAL ESTIMATION WITH INTERACTION              ********************
 ********************                            STANDARD ERROR OF ESTIMATE                          ********************

 THETA - VECTOR OF FIXED EFFECTS PARAMETERS   *********
         TH 1      TH 2      TH 3
         5.65E-03  2.02E-01  5.85E-02

 OMEGA - COV MATRIX FOR RANDOM EFFECTS - ETAS  ********
         ETA1      ETA2      ETA3      ETA4
 ETA1
+        2.19E-02
 ETA2
+       .........  8.10E-03
 ETA3
+       ......... .........  5.00E-02
 ETA4
+       ......... ......... .........  6.40E-02

 SIGMA - COV MATRIX FOR RANDOM EFFECTS - EPSILONS  ****
         EPS1
 EPS1
+        1.25E-03

 OMEGA - CORR MATRIX FOR RANDOM EFFECTS - ETAS  *******
         ETA1      ETA2      ETA3      ETA4
 ETA1
+        3.52E-02
 ETA2
+       .........  2.27E-02
 ETA3
+       ......... .........  5.24E-02
 ETA4
+       ......... ......... .........  7.34E-02

 SIGMA - CORR MATRIX FOR RANDOM EFFECTS - EPSILONS  ***
         EPS1
 EPS1
+        6.97E-03

 ********************               FIRST ORDER CONDITIONAL ESTIMATION WITH INTERACTION              ********************
 ********************                          COVARIANCE MATRIX OF ESTIMATE                         ********************

            TH 1      TH 2      TH 3      OM11      OM12      OM13      OM14      OM22      OM23      OM24      OM33      OM34
             OM44      SG11
 TH 1
+        3.19E-05
 TH 2
+        4.31E-05  4.07E-02
 TH 3
+       -3.11E-05 -1.05E-03  3.42E-03
 OM11
+       -4.04E-05 -2.51E-04  9.74E-05  4.78E-04
 OM12
+       ......... ......... ......... ......... .........
 OM13
+       ......... ......... ......... ......... ......... .........
 OM14
+       ......... ......... ......... ......... ......... ......... .........
 OM22
+       -4.43E-06  5.69E-04 -6.58E-05  1.49E-05 ......... ......... .........  6.57E-05
 OM23
+       ......... ......... ......... ......... ......... ......... ......... ......... .........
 OM24
+       ......... ......... ......... ......... ......... ......... ......... ......... ......... .........
 OM33
+        2.06E-06 -1.05E-03  1.29E-04 -1.10E-04 ......... ......... ......... -6.14E-05 ......... .........  2.50E-03
 OM34
+       ......... ......... ......... ......... ......... ......... ......... ......... ......... ......... ......... .........
 OM44
+        6.84E-05  1.42E-03  9.38E-05  1.63E-04 ......... ......... ......... -1.69E-05 ......... ......... -3.67E-04 .........
          4.10E-03
 SG11
+        1.97E-06 -3.51E-05  1.32E-05 -6.40E-06 ......... ......... ......... -1.31E-06 ......... .........  4.51E-06 .........
          1.05E-05  1.57E-06

 ********************               FIRST ORDER CONDITIONAL ESTIMATION WITH INTERACTION              ********************
 ********************                          CORRELATION MATRIX OF ESTIMATE                        ********************

            TH 1      TH 2      TH 3      OM11      OM12      OM13      OM14      OM22      OM23      OM24      OM33      OM34
             OM44      SG11
 TH 1
+        5.65E-03
 TH 2
+        3.78E-02  2.02E-01
 TH 3
+       -9.41E-02 -8.86E-02  5.85E-02
 OM11
+       -3.27E-01 -5.68E-02  7.61E-02  2.19E-02
 OM12
+       ......... ......... ......... ......... .........
 OM13
+       ......... ......... ......... ......... ......... .........
 OM14
+       ......... ......... ......... ......... ......... ......... .........
 OM22
+       -9.67E-02  3.48E-01 -1.39E-01  8.39E-02 ......... ......... .........  8.10E-03
 OM23
+       ......... ......... ......... ......... ......... ......... ......... ......... .........
 OM24
+       ......... ......... ......... ......... ......... ......... ......... ......... ......... .........
 OM33
+        7.30E-03 -1.04E-01  4.43E-02 -1.01E-01 ......... ......... ......... -1.52E-01 ......... .........  5.00E-02
 OM34
+       ......... ......... ......... ......... ......... ......... ......... ......... ......... ......... ......... .........
 OM44
+        1.89E-01  1.10E-01  2.50E-02  1.16E-01 ......... ......... ......... -3.25E-02 ......... ......... -1.15E-01 .........
          6.40E-02
 SG11
+        2.78E-01 -1.39E-01  1.81E-01 -2.34E-01 ......... ......... ......... -1.30E-01 ......... .........  7.21E-02 .........
          1.32E-01  1.25E-03
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 Elapsed finaloutput time in seconds:     0.00
 #CPUT: Total CPU Time in Seconds,        1.370
