Wed Sep  9 10:05:19 PM UTC 2026
$PROBLEM NULL TWIN of additive (+) covariate effect on CL (#1313 anchor, arm A)
; CL = TVCL*EXP(ETA(1)) + THETA(6)*(WT - 70)
;
; The object under test is the *combination*: ferx's `CL ~ WT linear(center =
; 70) +` desugars to exactly this sum, where every covariate relation before
; #1313 was a factor. NONMEM writes it directly, so this is an ordinary
; anchored comparison — no exception applies.
;
; MAXEVAL=0 with POSTHOC: nothing is estimated, so both engines evaluate the
; same parameter vector and the comparison is of arithmetic, not of where two
; optimizers stop. PRED is the population prediction (ETA = 0), where the
; additive term is the only covariate effect live at all.
;
; Non-degeneracy: WT runs 45.0 .. 93.7 about a centre of 70, so the term takes
; BOTH signs across the 30 subjects, and at THETA(6) = 0.04 it moves CL by
; -1.00 .. +0.95 against a TVCL of 4.0 — i.e. by up to 25%. A term that only
; ever added a small positive amount would be satisfied by an implementation
; that got the sign or the magnitude wrong.
$INPUT ID TIME DV EVID AMT CMT RATE MDV WT CRCL
$DATA covmodel_stall.csv IGNORE=@
; covmodel_stall.csv is data/two_cpt_oral_cov.csv with observation CMT
; recoded 1 -> 2: ferx `two_cpt_oral` reads CMT=1 observations from the central
; compartment, ADVAN4 numbers the depot 1 and the central 2.
$SUBROUTINE ADVAN4 TRANS4

$PK
  CLWGT = THETA(6) * (WT - 70)
  CL = THETA(1) * EXP(ETA(1)) + CLWGT
  V2 = THETA(2) * EXP(ETA(2))
  Q  = THETA(3) * EXP(ETA(3))
  V3 = THETA(4) * EXP(ETA(4))
  KA = THETA(5) * EXP(ETA(5))
  S2 = V2

$ERROR
  IPRED = F
  Y = F * (1 + EPS(1))

$THETA
  (0.1, 4.0,  100.0)   ; TVCL
  (1.0, 40.0, 500.0)   ; TVV1
  (0.1, 8.0,  100.0)   ; TVQ
  (1.0, 80.0, 500.0)   ; TVV2
  (0.01, 1.0, 10.0)    ; TVKA
  0 FIX                ; THETA_CL_WT held at zero — the null twin

$OMEGA
  0.15   ; ETA_CL
  0.15   ; ETA_V1
  0.08   ; ETA_Q
  0.08   ; ETA_V2
  0.20   ; ETA_KA

$SIGMA
  0.0016  ; PROP_ERR  (ferx declares `~ 0.04 (sd)`; NONMEM takes the variance)

$ESTIMATION METHOD=1 INTERACTION MAXEVAL=0 POSTHOC PRINT=1 NOABORT
; The null twin of the arm above: identical in every respect except that the
; additive slope is held at zero. The OFV *difference* between the two is what
; the anchor compares, which cancels a baseline ferx-vs-NONMEM offset that is
; present with no covariate model at all (see the test module docs).
$TABLE ID TIME PRED IPRED NOPRINT ONEHEADER FILE=additive_cov_lin_null.tab FORMAT=s1PE23.16

NM-TRAN MESSAGES
 WARNINGS AND ERRORS (IF ANY) FOR PROBLEM    1
 (WARNING  2) NM-TRAN INFERS THAT THE DATA ARE POPULATION.
Note: Analytical 2nd Derivatives are constructed in FSUBS but are never used.
      You may insert $ABBR DERIV2=NO after the first $PROB to save FSUBS construction and compilation time

1NONLINEAR MIXED EFFECTS MODEL PROGRAM (NONMEM) VERSION 7.5.1
 ORIGINALLY DEVELOPED BY STUART BEAL, LEWIS SHEINER, AND ALISON BOECKMANN
 CURRENT DEVELOPERS ARE ROBERT BAUER, ICON DEVELOPMENT SOLUTIONS,
 AND ALISON BOECKMANN. IMPLEMENTATION, EFFICIENCY, AND STANDARDIZATION
 PERFORMED BY NOUS INFOSYSTEMS.
 PROBLEM NO.:         1
 NULL TWIN of additive (+) covariate effect on CL (#1313 anchor, arm A)
 TOT. NO. OF OBS RECS:      300
 TOT. NO. OF INDIVIDUALS:       30
 TWO COMPARTMENT MODEL WITH FIRST-ORDER ABSORPTION (ADVAN4)
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 #TBLN:      1
 #METH: First Order Conditional Estimation with Interaction (Evaluation)
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 Elapsed evaluation time in seconds:     0.01
 Elapsed postprocess time in seconds:     0.02

 ********************         FIRST ORDER CONDITIONAL ESTIMATION WITH INTERACTION (EVALUATION)       ********************
 #OBJT:**************                       MINIMUM VALUE OF OBJECTIVE FUNCTION                      ********************
 #OBJV:********************************************    -1033.335       **************************************************

 ********************         FIRST ORDER CONDITIONAL ESTIMATION WITH INTERACTION (EVALUATION)       ********************
 ********************                             FINAL PARAMETER ESTIMATE                           ********************

 THETA - VECTOR OF FIXED EFFECTS PARAMETERS   *********
         TH 1      TH 2      TH 3      TH 4      TH 5      TH 6
         4.00E+00  4.00E+01  8.00E+00  8.00E+01  1.00E+00  0.00E+00

 OMEGA - COV MATRIX FOR RANDOM EFFECTS - ETAS  ********
         ETA1      ETA2      ETA3      ETA4      ETA5
 ETA1
+        1.50E-01
 ETA2
+        0.00E+00  1.50E-01
 ETA3
+        0.00E+00  0.00E+00  8.00E-02
 ETA4
+        0.00E+00  0.00E+00  0.00E+00  8.00E-02
 ETA5
+        0.00E+00  0.00E+00  0.00E+00  0.00E+00  2.00E-01

 SIGMA - COV MATRIX FOR RANDOM EFFECTS - EPSILONS  ****
         EPS1
 EPS1
+        1.60E-03

 OMEGA - CORR MATRIX FOR RANDOM EFFECTS - ETAS  *******
         ETA1      ETA2      ETA3      ETA4      ETA5
 ETA1
+        3.87E-01
 ETA2
+        0.00E+00  3.87E-01
 ETA3
+        0.00E+00  0.00E+00  2.83E-01
 ETA4
+        0.00E+00  0.00E+00  0.00E+00  2.83E-01
 ETA5
+        0.00E+00  0.00E+00  0.00E+00  0.00E+00  4.47E-01

 SIGMA - CORR MATRIX FOR RANDOM EFFECTS - EPSILONS  ***
         EPS1
 EPS1
+        4.00E-02
 Elapsed finaloutput time in seconds:     0.01
 #CPUT: Total CPU Time in Seconds,        0.069
