Mon Aug 24 09:23:20 PM UTC 2026
$PROBLEM Emax time-course, no compartments - the $PRED analogue of a ferx
; compartment-free [structural_model] (issue #811).
;
; y = E0*exp(eta) - EMAX*t/(ET50 + t) + eps,  additive residual error.
; No doses, no ADVAN, no compartments: $PRED is exactly what a ferx
; `[structural_model]` with `y = <expr>` and no `pk`/`ode` line compiles to.
;
; Data simulated from THETA = (10, 6, 2), OMEGA = 0.09, SIGMA = 0.25 by
; `nonmem_anchor/algebraic_emax.csv`'s generator (seeded, 30 subjects x 8 times).
$INPUT ID TIME DV MDV
$DATA algebraic_emax.csv IGNORE=@

$PRED
E0   = THETA(1)*EXP(ETA(1))
EMAX = THETA(2)
ET50 = THETA(3)
Y    = E0 - EMAX*TIME/(ET50 + TIME) + EPS(1)

$THETA (0.1, 8.0,  100.0)   ; TVE0   - deliberately off the truth (10)
$THETA (0.1, 4.0,  100.0)   ; TVEMAX - deliberately off the truth (6)
$THETA (0.01, 1.0, 100.0)   ; TVET50 - deliberately off the truth (2)
$OMEGA 0.04                 ; IIV on the baseline (truth 0.09)
$SIGMA 1.0                  ; additive residual variance (truth 0.25)

$ESTIMATION METHOD=1 MAXEVAL=9999 PRINT=5 NOABORT SIGDIGITS=4
$COVARIANCE MATRIX=R UNCONDITIONAL
$TABLE ID TIME DV PRED CWRES NOPRINT ONEHEADER FILE=algebraic_emax.tab

NM-TRAN MESSAGES
 WARNINGS AND ERRORS (IF ANY) FOR PROBLEM    1
 (WARNING  2) NM-TRAN INFERS THAT THE DATA ARE POPULATION.
Note: Analytical 2nd Derivatives are constructed in FSUBS but are never used.
      You may insert $ABBR DERIV2=NO after the first $PROB to save FSUBS construction and compilation time

1NONLINEAR MIXED EFFECTS MODEL PROGRAM (NONMEM) VERSION 7.5.1
 ORIGINALLY DEVELOPED BY STUART BEAL, LEWIS SHEINER, AND ALISON BOECKMANN
 CURRENT DEVELOPERS ARE ROBERT BAUER, ICON DEVELOPMENT SOLUTIONS,
 AND ALISON BOECKMANN. IMPLEMENTATION, EFFICIENCY, AND STANDARDIZATION
 PERFORMED BY NOUS INFOSYSTEMS.
 PROBLEM NO.:         1
 Emax time-course, no compartments - the $PRED analogue of a ferx
 TOT. NO. OF OBS RECS:      240
 TOT. NO. OF INDIVIDUALS:       30
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 #TBLN:      1
 #METH: First Order Conditional Estimation
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
 #TERM:
0MINIMIZATION TERMINATED
 DUE TO ROUNDING ERRORS (ERROR=134)
 NO. OF FUNCTION EVALUATIONS USED:     1192
 NO. OF SIG. DIGITS IN FINAL EST.:  0.7

 ETABAR IS THE ARITHMETIC MEAN OF THE ETA-ESTIMATES,
 AND THE P-VALUE IS GIVEN FOR THE NULL HYPOTHESIS THAT THE TRUE MEAN IS 0.

 ETABAR:         3.0286E-04
 SE:             5.5362E-02
 N:                      30

 P VAL.:         9.9564E-01

 ETASHRINKSD(%)  2.7874E-01
 ETASHRINKVR(%)  5.5670E-01
 EBVSHRINKSD(%)  1.7411E-01
 EBVSHRINKVR(%)  3.4792E-01
 RELATIVEINF(%)  9.9652E+01
 EPSSHRINKSD(%)  6.4288E+00
 EPSSHRINKVR(%)  1.2444E+01


 TOTAL DATA POINTS NORMALLY DISTRIBUTED (N):          240
 N*LOG(2PI) CONSTANT TO OBJECTIVE FUNCTION:    441.09049593824290
 OBJECTIVE FUNCTION VALUE WITHOUT CONSTANT:    62.538488449799900
 OBJECTIVE FUNCTION VALUE WITH CONSTANT:       503.62898438804280
 REPORTED OBJECTIVE FUNCTION DOES NOT CONTAIN CONSTANT

 TOTAL EFFECTIVE ETAS (NIND*NETA):                            30


 #TERE:
 Elapsed estimation  time in seconds:     0.23
 Elapsed covariance  time in seconds:     0.02
 Elapsed postprocess time in seconds:     0.01

 ********************                        FIRST ORDER CONDITIONAL ESTIMATION                      ********************
 #OBJT:**************                       MINIMUM VALUE OF OBJECTIVE FUNCTION                      ********************
 #OBJV:********************************************       62.538       **************************************************

 ********************                        FIRST ORDER CONDITIONAL ESTIMATION                      ********************
 ********************                             FINAL PARAMETER ESTIMATE                           ********************

 THETA - VECTOR OF FIXED EFFECTS PARAMETERS   *********
         TH 1      TH 2      TH 3
         1.02E+01  5.92E+00  2.10E+00

 OMEGA - COV MATRIX FOR RANDOM EFFECTS - ETAS  ********
         ETA1
 ETA1
+        9.25E-02

 SIGMA - COV MATRIX FOR RANDOM EFFECTS - EPSILONS  ****
         EPS1
 EPS1
+        2.31E-01

 OMEGA - CORR MATRIX FOR RANDOM EFFECTS - ETAS  *******
         ETA1
 ETA1
+        3.04E-01

 SIGMA - CORR MATRIX FOR RANDOM EFFECTS - EPSILONS  ***
         EPS1
 EPS1
+        4.80E-01

 ********************                        FIRST ORDER CONDITIONAL ESTIMATION                      ********************
 ********************                            STANDARD ERROR OF ESTIMATE                          ********************

 THETA - VECTOR OF FIXED EFFECTS PARAMETERS   *********
         TH 1      TH 2      TH 3
         5.73E-01  1.01E-01  1.45E-01

 OMEGA - COV MATRIX FOR RANDOM EFFECTS - ETAS  ********
         ETA1
 ETA1
+        2.40E-02

 SIGMA - COV MATRIX FOR RANDOM EFFECTS - EPSILONS  ****
         EPS1
 EPS1
+        2.25E-02

 OMEGA - CORR MATRIX FOR RANDOM EFFECTS - ETAS  *******
         ETA1
 ETA1
+        3.94E-02

 SIGMA - CORR MATRIX FOR RANDOM EFFECTS - EPSILONS  ***
         EPS1
 EPS1
+        2.34E-02

 ********************                        FIRST ORDER CONDITIONAL ESTIMATION                      ********************
 ********************                          COVARIANCE MATRIX OF ESTIMATE                         ********************

            TH 1      TH 2      TH 3      OM11      SG11
 TH 1
+        3.28E-01
 TH 2
+        4.42E-03  1.02E-02
 TH 3
+       -7.87E-03  2.70E-03  2.10E-02
 OM11
+       -1.25E-04 -7.00E-05  1.25E-04  5.75E-04
 SG11
+       -4.76E-06 -4.19E-06  7.29E-06 -4.24E-07  5.07E-04

 ********************                        FIRST ORDER CONDITIONAL ESTIMATION                      ********************
 ********************                          CORRELATION MATRIX OF ESTIMATE                        ********************

            TH 1      TH 2      TH 3      OM11      SG11
 TH 1
+        5.73E-01
 TH 2
+        7.64E-02  1.01E-01
 TH 3
+       -9.50E-02  1.84E-01  1.45E-01
 OM11
+       -9.07E-03 -2.89E-02  3.59E-02  2.40E-02
 SG11
+       -3.70E-04 -1.84E-03  2.24E-03 -7.84E-04  2.25E-02
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 Elapsed finaloutput time in seconds:     0.01
 #CPUT: Total CPU Time in Seconds,        0.265
