Thu Aug 20 09:08:50 PM UTC 2026
$PROBLEM ferx #1004 anchor B -- ADVAN2 library routine: F1 at the dose AND in the scale, S2 = V/F1
$INPUT ID TIME DV MDV EVID AMT CMT
$DATA data.csv IGNORE=@

$SUBROUTINE ADVAN2 TRANS2

$PK
  CL = THETA(1)
  V  = THETA(2)
  KA = THETA(3)
  F1 = THETA(4)
  S2 = V/F1

$ERROR
  IPRED = F
  Y = IPRED*(1+EPS(1))

$THETA
  (5.0 FIX)   ; CL
  (50.0 FIX)  ; V
  (1.5 FIX)   ; KA
  (0.5 FIX)   ; F1

$OMEGA 0 FIX
$SIGMA 0.01 FIX

$ESTIMATION MAXEVAL=0 METHOD=1 INTER
$TABLE ID TIME IPRED NOPRINT ONEHEADER FILE=sdtab.tab

NM-TRAN MESSAGES
 WARNINGS AND ERRORS (IF ANY) FOR PROBLEM    1
 (WARNING  2) NM-TRAN INFERS THAT THE DATA ARE POPULATION.
 (WARNING  46) ETA VARIABLES ARE NOT USED, BUT DATA ARE POPULATION TYPE.
Note: Analytical 2nd Derivatives are constructed in FSUBS but are never used.
      You may insert $ABBR DERIV2=NO after the first $PROB to save FSUBS construction and compilation time

1NONLINEAR MIXED EFFECTS MODEL PROGRAM (NONMEM) VERSION 7.6.0 (nm760)
 ORIGINALLY DEVELOPED BY STUART BEAL, LEWIS SHEINER, AND ALISON BOECKMANN
 CURRENT DEVELOPERS ARE ROBERT BAUER, ICON DEVELOPMENT SOLUTIONS,
 AND ALISON BOECKMANN. IMPLEMENTATION, EFFICIENCY, AND STANDARDIZATION
 PERFORMED BY NOUS INFOSYSTEMS.
 PROBLEM NO.:         1
 ferx #1004 anchor B -- ADVAN2 library routine: F1 at the dose AND in the
 TOT. NO. OF OBS RECS:        7
 TOT. NO. OF INDIVIDUALS:        1
 ONE COMPARTMENT MODEL WITH FIRST-ORDER ABSORPTION (ADVAN2)
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 #TBLN:      1
 #METH: First Order Conditional Estimation with Interaction (Evaluation)
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 Elapsed evaluation time in seconds:     0.02
 Elapsed postprocess time in seconds:     0.02

 ********************         FIRST ORDER CONDITIONAL ESTIMATION WITH INTERACTION (EVALUATION)       ********************
 #OBJT:**************                       MINIMUM VALUE OF OBJECTIVE FUNCTION                      ********************
 #OBJV:********************************************           646.654       *********************************************

 ********************         FIRST ORDER CONDITIONAL ESTIMATION WITH INTERACTION (EVALUATION)       ********************
 ********************                             FINAL PARAMETER ESTIMATE                           ********************

 THETA - VECTOR OF FIXED EFFECTS PARAMETERS   *********
         TH 1      TH 2      TH 3      TH 4
         5.00E+00  5.00E+01  1.50E+00  5.00E-01

 OMEGA - COV MATRIX FOR RANDOM EFFECTS - ETAS  ********
         ETA1
 ETA1
+        0.00E+00

 SIGMA - COV MATRIX FOR RANDOM EFFECTS - EPSILONS  ****
         EPS1
 EPS1
+        1.00E-02

 OMEGA - CORR MATRIX FOR RANDOM EFFECTS - ETAS  *******
         ETA1
 ETA1
+        0.00E+00

 SIGMA - CORR MATRIX FOR RANDOM EFFECTS - EPSILONS  ***
         EPS1
 EPS1
+        1.00E-01
 Elapsed finaloutput time in seconds:     0.01
 #CPUT: Total CPU Time in Seconds,        0.093
