Tue Sep  8 07:43:30 PM UTC 2026
$PROBLEM two-cpt oral with three covariate thetas (#1290 anchor)
; The NONMEM twin of examples/two_cpt_oral_covmodel.ferx, started from the same
; initial estimates, so the reported OFV / thetas are directly comparable with
; the ferx fit of that file.
$INPUT ID TIME DV EVID AMT CMT RATE MDV WT CRCL
$DATA covmodel_stall.csv IGNORE=@
; covmodel_stall.csv is data/two_cpt_oral_cov.csv with observation CMT
; recoded 1 -> 2: ferx `two_cpt_oral` reads CMT=1 observations from the central
; compartment, ADVAN4 numbers the depot 1 and the central 2.
$SUBROUTINE ADVAN4 TRANS4

$PK
  CL = THETA(1) * (WT/70)**THETA(6) * (CRCL/100)**THETA(7) * EXP(ETA(1))
  V2 = THETA(2) * (WT/70)**THETA(8) * EXP(ETA(2))
  Q  = THETA(3) * EXP(ETA(3))
  V3 = THETA(4) * EXP(ETA(4))
  KA = THETA(5) * EXP(ETA(5))
  S2 = V2

$ERROR
  IPRED = F
  Y = F * (1 + EPS(1))

$THETA
  (0.1, 4.0,  100.0)   ; TVCL
  (1.0, 40.0, 500.0)   ; TVV1
  (0.1, 8.0,  100.0)   ; TVQ
  (1.0, 80.0, 500.0)   ; TVV2
  (0.01, 1.0, 10.0)    ; TVKA
  (0.01, 0.6, 5.0)     ; THETA_CL_WT
  (0.01, 0.3, 5.0)     ; THETA_CL_CRCL
  (0.01, 0.6, 5.0)     ; THETA_V1_WT

$OMEGA
  0.15   ; ETA_CL
  0.15   ; ETA_V1
  0.08   ; ETA_Q
  0.08   ; ETA_V2
  0.20   ; ETA_KA

$SIGMA
  0.0016  ; PROP_ERR  (ferx declares `~ 0.04 (sd)`; NONMEM takes the variance)

$ESTIMATION METHOD=1 INTERACTION MAXEVAL=9999 PRINT=5 NOABORT
$COVARIANCE MATRIX=R

NM-TRAN MESSAGES
 WARNINGS AND ERRORS (IF ANY) FOR PROBLEM    1
 (WARNING  2) NM-TRAN INFERS THAT THE DATA ARE POPULATION.
Note: Analytical 2nd Derivatives are constructed in FSUBS but are never used.
      You may insert $ABBR DERIV2=NO after the first $PROB to save FSUBS construction and compilation time

1NONLINEAR MIXED EFFECTS MODEL PROGRAM (NONMEM) VERSION 7.5.1
 ORIGINALLY DEVELOPED BY STUART BEAL, LEWIS SHEINER, AND ALISON BOECKMANN
 CURRENT DEVELOPERS ARE ROBERT BAUER, ICON DEVELOPMENT SOLUTIONS,
 AND ALISON BOECKMANN. IMPLEMENTATION, EFFICIENCY, AND STANDARDIZATION
 PERFORMED BY NOUS INFOSYSTEMS.
 PROBLEM NO.:         1
 two-cpt oral with three covariate thetas (#1290 anchor)
 TOT. NO. OF OBS RECS:      300
 TOT. NO. OF INDIVIDUALS:       30
 TWO COMPARTMENT MODEL WITH FIRST-ORDER ABSORPTION (ADVAN4)
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 #TBLN:      1
 #METH: First Order Conditional Estimation with Interaction
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
 #TERM:
0MINIMIZATION SUCCESSFUL
 NO. OF FUNCTION EVALUATIONS USED:      578
 NO. OF SIG. DIGITS IN FINAL EST.:  3.0

 ETABAR IS THE ARITHMETIC MEAN OF THE ETA-ESTIMATES,
 AND THE P-VALUE IS GIVEN FOR THE NULL HYPOTHESIS THAT THE TRUE MEAN IS 0.

 ETABAR:         3.0673E-04  3.8475E-03 -2.1386E-03 -9.7475E-04  4.1527E-03
 SE:             5.9626E-02  5.7847E-02  4.0461E-02  3.4837E-02  7.3615E-02
 N:                      30          30          30          30          30

 P VAL.:         9.9590E-01  9.4697E-01  9.5785E-01  9.7768E-01  9.5501E-01

 ETASHRINKSD(%)  3.1793E-01  2.7338E+00  2.1932E+00  2.0492E+00  3.6049E+00
 ETASHRINKVR(%)  6.3484E-01  5.3928E+00  4.3383E+00  4.0564E+00  7.0798E+00
 EBVSHRINKSD(%)  2.0267E-01  1.5946E+00  2.6744E+00  2.1109E+00  1.7622E+00
 EBVSHRINKVR(%)  4.0493E-01  3.1637E+00  5.2772E+00  4.1773E+00  3.4933E+00
 RELATIVEINF(%)  9.9584E+01  9.6626E+01  9.4518E+01  9.5801E+01  9.6292E+01
 EPSSHRINKSD(%)  2.7763E+01
 EPSSHRINKVR(%)  4.7818E+01


 TOTAL DATA POINTS NORMALLY DISTRIBUTED (N):          300
 N*LOG(2PI) CONSTANT TO OBJECTIVE FUNCTION:    551.36311992280355
 OBJECTIVE FUNCTION VALUE WITHOUT CONSTANT:   -1199.4297842339142
 OBJECTIVE FUNCTION VALUE WITH CONSTANT:      -648.06666431111069
 REPORTED OBJECTIVE FUNCTION DOES NOT CONTAIN CONSTANT

 TOTAL EFFECTIVE ETAS (NIND*NETA):                           150


 #TERE:
 Elapsed estimation  time in seconds:     0.97
0R MATRIX ALGORITHMICALLY NON-POSITIVE-SEMIDEFINITE
 BUT NONSINGULAR
0COVARIANCE STEP ABORTED
 Elapsed covariance  time in seconds:     0.63
 Elapsed postprocess time in seconds:     0.00

 ********************               FIRST ORDER CONDITIONAL ESTIMATION WITH INTERACTION              ********************
 #OBJT:**************                       MINIMUM VALUE OF OBJECTIVE FUNCTION                      ********************
 #OBJV:********************************************    -1199.430       **************************************************

 ********************               FIRST ORDER CONDITIONAL ESTIMATION WITH INTERACTION              ********************
 ********************                             FINAL PARAMETER ESTIMATE                           ********************

 THETA - VECTOR OF FIXED EFFECTS PARAMETERS   *********
         TH 1      TH 2      TH 3      TH 4      TH 5      TH 6      TH 7      TH 8
         4.94E+00  4.86E+01  9.58E+00  9.42E+01  1.26E+00  7.30E-01  5.55E-01  5.77E-01

 OMEGA - COV MATRIX FOR RANDOM EFFECTS - ETAS  ********
         ETA1      ETA2      ETA3      ETA4      ETA5
 ETA1
+        1.07E-01
 ETA2
+        0.00E+00  1.06E-01
 ETA3
+        0.00E+00  0.00E+00  5.13E-02
 ETA4
+        0.00E+00  0.00E+00  0.00E+00  3.79E-02
 ETA5
+        0.00E+00  0.00E+00  0.00E+00  0.00E+00  1.75E-01

 SIGMA - COV MATRIX FOR RANDOM EFFECTS - EPSILONS  ****
         EPS1
 EPS1
+        3.85E-04

 OMEGA - CORR MATRIX FOR RANDOM EFFECTS - ETAS  *******
         ETA1      ETA2      ETA3      ETA4      ETA5
 ETA1
+        3.28E-01
 ETA2
+        0.00E+00  3.26E-01
 ETA3
+        0.00E+00  0.00E+00  2.27E-01
 ETA4
+        0.00E+00  0.00E+00  0.00E+00  1.95E-01
 ETA5
+        0.00E+00  0.00E+00  0.00E+00  0.00E+00  4.18E-01

 SIGMA - CORR MATRIX FOR RANDOM EFFECTS - EPSILONS  ***
         EPS1
 EPS1
+        1.96E-02
 Elapsed finaloutput time in seconds:     0.00
 #CPUT: Total CPU Time in Seconds,        1.634
