Sat Sep 12 04:21:59 PM UTC 2026
$PROBLEM Additive renal covariate on CL, SAEM with a nonlinear MU -- anchor for ferx covariate mu-referencing [#619]
; Reference SAEM fit for ferx's multi-theta (covariate) mu-referencing.
; 1-cpt IV bolus; CL carries an additive renal gradient and IIV:
;
;     CL_i = (THETA(1) + (CRCL_i - 90) * THETA(2)) * EXP(ETA(1))
;
; which is not log-linear in a single theta, so the mu-reference is the
; *nonlinear* MU_1 = LOG(THETA(1) + (CRCL-90)*THETA(2)). NONMEM accepts a MU
; that is nonlinear in THETA (its EM update is then iterative rather than the
; one-line linear solve); ferx's covariate mu-reference group does the same
; re-fit of (THETA(1), THETA(2)) to the population of individual log-CL values.
;
; The dataset covmuref_additive.csv is simulated FROM this model
; (nonmem_anchor/simulate_covmuref_data.py, same truths), so this is a matched
; (well-specified) fit: NONMEM and ferx should agree AND both recover the
; data-generating values.
;
; Truths: TVCL=5, TH_CRCL=0.05, TVV=50, omega^2 = 0.09 (CL), 0.04 (V),
;         sigma^2 = 0.01. CRCL is constant within each subject.

$INPUT ID TIME DV AMT EVID CMT CRCL
$DATA covmuref_additive.csv IGNORE=@

$SUBROUTINES ADVAN1 TRANS2

$PK
  MU_1 = LOG(THETA(1) + (CRCL - 90.0)*THETA(2))   ; nonlinear in THETA
  MU_2 = LOG(THETA(3))
  CL = EXP(MU_1 + ETA(1))
  V  = EXP(MU_2 + ETA(2))
  S1 = V

$ERROR
  IPRED = F
  Y = IPRED*(1.0 + EPS(1))

$THETA
  (0.0,  4.0,  100)   ; 1 TVCL     (L/h)   truth 5
  (0.0,  0.02, 5.0)   ; 2 TH_CRCL  (L/h per mL/min)  truth 0.05
  (1.0,  40.0, 500)   ; 3 TVV      (L)     truth 50

$OMEGA
  0.1    ; IIV CL   truth 0.09
  0.1    ; IIV V    truth 0.04

$SIGMA
  0.02   ; proportional residual variance, truth 0.01

$ESTIMATION METHOD=SAEM INTERACTION NBURN=2000 NITER=1000 ISAMPLE=10 PRINT=200 SEED=619 NOABORT
$ESTIMATION METHOD=IMP INTERACTION EONLY=1 NITER=10 ISAMPLE=3000 PRINT=1 SEED=619 NOABORT
; No $COVARIANCE: point estimates only (printing R aborts this build on the SAEM+IMP chain).
$TABLE ID TIME DV IPRED CWRES NOPRINT ONEHEADER FILE=covmuref_additive_saem.tab

NM-TRAN MESSAGES
 WARNINGS AND ERRORS (IF ANY) FOR PROBLEM    1
 (WARNING  2) NM-TRAN INFERS THAT THE DATA ARE POPULATION.
 (MU_WARNING 26) DATA ITEM(S) USED IN DEFINITION OF MU_(S) SHOULD BE CONSTANT FOR INDIV. REC.:
  CRCL
Note: Analytical 2nd Derivatives are constructed in FSUBS but are never used.
      You may insert $ABBR DERIV2=NO after the first $PROB to save FSUBS construction and compilation time

1NONLINEAR MIXED EFFECTS MODEL PROGRAM (NONMEM) VERSION 7.5.1
 ORIGINALLY DEVELOPED BY STUART BEAL, LEWIS SHEINER, AND ALISON BOECKMANN
 CURRENT DEVELOPERS ARE ROBERT BAUER, ICON DEVELOPMENT SOLUTIONS,
 AND ALISON BOECKMANN. IMPLEMENTATION, EFFICIENCY, AND STANDARDIZATION
 PERFORMED BY NOUS INFOSYSTEMS.
 PROBLEM NO.:         1
 Additive renal covariate on CL, SAEM with a nonlinear MU -- anchor for f
 TOT. NO. OF OBS RECS:      420
 TOT. NO. OF INDIVIDUALS:       60
 ONE COMPARTMENT MODEL (ADVAN1)
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 #TBLN:      1
 #METH: Stochastic Approximation Expectation-Maximization
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
 #TERM:
 STOCHASTIC PORTION WAS NOT TESTED FOR CONVERGENCE
 REDUCED STOCHASTIC PORTION WAS COMPLETED

 ETABAR IS THE ARITHMETIC MEAN OF THE ETA-ESTIMATES,
 AND THE P-VALUE IS GIVEN FOR THE NULL HYPOTHESIS THAT THE TRUE MEAN IS 0.

 ETABAR:        -1.6065E-06  1.2007E-06
 SE:             2.5153E-02  2.3667E-02
 N:                      60          60

 P VAL.:         9.9995E-01  9.9996E-01

 ETASHRINKSD(%)  2.7010E+00  3.4405E+00
 ETASHRINKVR(%)  5.3290E+00  6.7626E+00
 EBVSHRINKSD(%)  2.6999E+00  3.4423E+00
 EBVSHRINKVR(%)  5.3268E+00  6.7661E+00
 RELATIVEINF(%)  9.4645E+01  9.3206E+01
 EPSSHRINKSD(%)  1.4468E+01
 EPSSHRINKVR(%)  2.6842E+01


 TOTAL DATA POINTS NORMALLY DISTRIBUTED (N):          420
 N*LOG(2PI) CONSTANT TO OBJECTIVE FUNCTION:    771.90836789192508
 OBJECTIVE FUNCTION VALUE WITHOUT CONSTANT:   -1855.5918401045142
 OBJECTIVE FUNCTION VALUE WITH CONSTANT:      -1083.6834722125891
 REPORTED OBJECTIVE FUNCTION DOES NOT CONTAIN CONSTANT

 TOTAL EFFECTIVE ETAS (NIND*NETA):                           120
 NIND*NETA*LOG(2PI) CONSTANT TO OBJECTIVE FUNCTION:    220.54524796912145
 OBJECTIVE FUNCTION VALUE WITHOUT CONSTANT:   -1855.5918401045142
 OBJECTIVE FUNCTION VALUE WITH CONSTANT:      -1635.0465921353928
 REPORTED OBJECTIVE FUNCTION DOES NOT CONTAIN CONSTANT


 #TERE:
 Elapsed estimation  time in seconds:    43.06

 ********************                STOCHASTIC APPROXIMATION EXPECTATION-MAXIMIZATION               ********************
 #OBJT:**************                        FINAL VALUE OF LIKELIHOOD FUNCTION                      ********************
 #OBJV:********************************************    -1855.592       **************************************************

 ********************                STOCHASTIC APPROXIMATION EXPECTATION-MAXIMIZATION               ********************
 ********************                             FINAL PARAMETER ESTIMATE                           ********************

 THETA - VECTOR OF FIXED EFFECTS PARAMETERS   *********
         TH 1      TH 2      TH 3
         4.92E+00  4.18E-02  4.81E+01

 OMEGA - COV MATRIX FOR RANDOM EFFECTS - ETAS  ********
         ETA1      ETA2
 ETA1
+        4.01E-02
 ETA2
+        0.00E+00  3.60E-02

 SIGMA - COV MATRIX FOR RANDOM EFFECTS - EPSILONS  ****
         EPS1
 EPS1
+        9.85E-03

 OMEGA - CORR MATRIX FOR RANDOM EFFECTS - ETAS  *******
         ETA1      ETA2
 ETA1
+        2.00E-01
 ETA2
+        0.00E+00  1.90E-01

 SIGMA - CORR MATRIX FOR RANDOM EFFECTS - EPSILONS  ***
         EPS1
 EPS1
+        9.92E-02
 #TBLN:      2
 #METH: Objective Function Evaluation by Importance Sampling
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
 #TERM:
 EXPECTATION ONLY PROCESS WAS NOT TESTED FOR CONVERGENCE

 ETABAR IS THE ARITHMETIC MEAN OF THE ETA-ESTIMATES,
 AND THE P-VALUE IS GIVEN FOR THE NULL HYPOTHESIS THAT THE TRUE MEAN IS 0.

 ETABAR:        -7.0414E-06 -1.2194E-04
 SE:             2.5134E-02  2.3670E-02
 N:                      60          60

 P VAL.:         9.9978E-01  9.9589E-01

 ETASHRINKSD(%)  2.7738E+00  3.4283E+00
 ETASHRINKVR(%)  5.4707E+00  6.7391E+00
 EBVSHRINKSD(%)  2.6946E+00  3.4461E+00
 EBVSHRINKVR(%)  5.3166E+00  6.7734E+00
 RELATIVEINF(%)  9.4655E+01  9.3199E+01
 EPSSHRINKSD(%)  1.4461E+01
 EPSSHRINKVR(%)  2.6830E+01


 TOTAL DATA POINTS NORMALLY DISTRIBUTED (N):          420
 N*LOG(2PI) CONSTANT TO OBJECTIVE FUNCTION:    771.90836789192508
 OBJECTIVE FUNCTION VALUE WITHOUT CONSTANT:   -1178.4416966518579
 OBJECTIVE FUNCTION VALUE WITH CONSTANT:      -406.53332875993283
 REPORTED OBJECTIVE FUNCTION DOES NOT CONTAIN CONSTANT

 TOTAL EFFECTIVE ETAS (NIND*NETA):                           120


 #TERE:
 Elapsed estimation  time in seconds:     3.83

 ********************               OBJECTIVE FUNCTION EVALUATION BY IMPORTANCE SAMPLING             ********************
 #OBJT:**************                        FINAL VALUE OF OBJECTIVE FUNCTION                       ********************
 #OBJV:********************************************    -1178.442       **************************************************

 ********************               OBJECTIVE FUNCTION EVALUATION BY IMPORTANCE SAMPLING             ********************
 ********************                             FINAL PARAMETER ESTIMATE                           ********************

 THETA - VECTOR OF FIXED EFFECTS PARAMETERS   *********
         TH 1      TH 2      TH 3
         4.92E+00  4.18E-02  4.81E+01

 OMEGA - COV MATRIX FOR RANDOM EFFECTS - ETAS  ********
         ETA1      ETA2
 ETA1
+        4.01E-02
 ETA2
+        0.00E+00  3.60E-02

 SIGMA - COV MATRIX FOR RANDOM EFFECTS - EPSILONS  ****
         EPS1
 EPS1
+        9.85E-03

 OMEGA - CORR MATRIX FOR RANDOM EFFECTS - ETAS  *******
         ETA1      ETA2
 ETA1
+        2.00E-01
 ETA2
+        0.00E+00  1.90E-01

 SIGMA - CORR MATRIX FOR RANDOM EFFECTS - EPSILONS  ***
         EPS1
 EPS1
+        9.92E-02
 Elapsed postprocess time in seconds:     0.04
 Elapsed finaloutput time in seconds:     0.01
 #CPUT: Total CPU Time in Seconds,       46.932
