Sat Sep 12 04:22:00 PM UTC 2026
$PROBLEM Allometric CL with estimated exponent, SAEM with a linear MU -- anchor for ferx covariate mu-referencing [#619]
; Reference SAEM fit for the second shape of ferx's covariate mu-referencing:
;
;     CL_i = THETA(1) * (WT_i/70)**THETA(2) * EXP(ETA(1))
;
; i.e. MU_1 = LOG(THETA(1)) + THETA(2)*LOG(WT/70) -- linear in THETA, NONMEM's
; efficient MU form. ferx used to mu-reference only THETA(1) here (the power
; factor hides THETA(2) from the single-anchor detector) and left THETA(2) on
; the eta-frozen numerical M-step; with #619 both thetas form one covariate
; mu-reference group and are re-fitted jointly.
;
; Data covmuref_power.csv is simulated FROM this model
; (nonmem_anchor/simulate_covmuref_data.py). Truths: TVCL=5, TH_WT=0.75,
; TVV=50, omega^2 = 0.09 (CL), 0.04 (V), sigma^2 = 0.01. WT constant per subject.

$INPUT ID TIME DV AMT EVID CMT WT
$DATA covmuref_power.csv IGNORE=@

$SUBROUTINES ADVAN1 TRANS2

$PK
  MU_1 = LOG(THETA(1)) + THETA(2)*LOG(WT/70.0)
  MU_2 = LOG(THETA(3))
  CL = EXP(MU_1 + ETA(1))
  V  = EXP(MU_2 + ETA(2))
  S1 = V

$ERROR
  IPRED = F
  Y = IPRED*(1.0 + EPS(1))

$THETA
  (0.0,  4.0,  100)   ; 1 TVCL   (L/h)  truth 5
  (-2.0, 0.3,  3.0)   ; 2 TH_WT  allometric exponent, truth 0.75
  (1.0,  40.0, 500)   ; 3 TVV    (L)    truth 50

$OMEGA
  0.1    ; IIV CL   truth 0.09
  0.1    ; IIV V    truth 0.04

$SIGMA
  0.02   ; proportional residual variance, truth 0.01

$ESTIMATION METHOD=SAEM INTERACTION NBURN=2000 NITER=1000 ISAMPLE=10 PRINT=200 SEED=619 NOABORT
$ESTIMATION METHOD=IMP INTERACTION EONLY=1 NITER=10 ISAMPLE=3000 PRINT=1 SEED=619 NOABORT
$TABLE ID TIME DV IPRED CWRES NOPRINT ONEHEADER FILE=covmuref_power_saem.tab

NM-TRAN MESSAGES
 WARNINGS AND ERRORS (IF ANY) FOR PROBLEM    1
 (WARNING  2) NM-TRAN INFERS THAT THE DATA ARE POPULATION.
 (MU_WARNING 26) DATA ITEM(S) USED IN DEFINITION OF MU_(S) SHOULD BE CONSTANT FOR INDIV. REC.:
  WT
Note: Analytical 2nd Derivatives are constructed in FSUBS but are never used.
      You may insert $ABBR DERIV2=NO after the first $PROB to save FSUBS construction and compilation time

1NONLINEAR MIXED EFFECTS MODEL PROGRAM (NONMEM) VERSION 7.5.1
 ORIGINALLY DEVELOPED BY STUART BEAL, LEWIS SHEINER, AND ALISON BOECKMANN
 CURRENT DEVELOPERS ARE ROBERT BAUER, ICON DEVELOPMENT SOLUTIONS,
 AND ALISON BOECKMANN. IMPLEMENTATION, EFFICIENCY, AND STANDARDIZATION
 PERFORMED BY NOUS INFOSYSTEMS.
 PROBLEM NO.:         1
 Allometric CL with estimated exponent, SAEM with a linear MU -- anchor f
 TOT. NO. OF OBS RECS:      420
 TOT. NO. OF INDIVIDUALS:       60
 ONE COMPARTMENT MODEL (ADVAN1)
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 #TBLN:      1
 #METH: Stochastic Approximation Expectation-Maximization
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
 #TERM:
 STOCHASTIC PORTION WAS NOT TESTED FOR CONVERGENCE
 REDUCED STOCHASTIC PORTION WAS COMPLETED

 ETABAR IS THE ARITHMETIC MEAN OF THE ETA-ESTIMATES,
 AND THE P-VALUE IS GIVEN FOR THE NULL HYPOTHESIS THAT THE TRUE MEAN IS 0.

 ETABAR:        -9.6541E-07  1.1972E-06
 SE:             3.3567E-02  2.6915E-02
 N:                      60          60

 P VAL.:         9.9998E-01  9.9996E-01

 ETASHRINKSD(%)  1.4838E+00  2.6800E+00
 ETASHRINKVR(%)  2.9455E+00  5.2883E+00
 EBVSHRINKSD(%)  1.4835E+00  2.6820E+00
 EBVSHRINKVR(%)  2.9449E+00  5.2920E+00
 RELATIVEINF(%)  9.7039E+01  9.4692E+01
 EPSSHRINKSD(%)  1.4748E+01
 EPSSHRINKVR(%)  2.7321E+01


 TOTAL DATA POINTS NORMALLY DISTRIBUTED (N):          420
 N*LOG(2PI) CONSTANT TO OBJECTIVE FUNCTION:    771.90836789192508
 OBJECTIVE FUNCTION VALUE WITHOUT CONSTANT:   -1887.2023031350107
 OBJECTIVE FUNCTION VALUE WITH CONSTANT:      -1115.2939352430856
 REPORTED OBJECTIVE FUNCTION DOES NOT CONTAIN CONSTANT

 TOTAL EFFECTIVE ETAS (NIND*NETA):                           120
 NIND*NETA*LOG(2PI) CONSTANT TO OBJECTIVE FUNCTION:    220.54524796912145
 OBJECTIVE FUNCTION VALUE WITHOUT CONSTANT:   -1887.2023031350107
 OBJECTIVE FUNCTION VALUE WITH CONSTANT:      -1666.6570551658892
 REPORTED OBJECTIVE FUNCTION DOES NOT CONTAIN CONSTANT


 #TERE:
 Elapsed estimation  time in seconds:    42.78

 ********************                STOCHASTIC APPROXIMATION EXPECTATION-MAXIMIZATION               ********************
 #OBJT:**************                        FINAL VALUE OF LIKELIHOOD FUNCTION                      ********************
 #OBJV:********************************************    -1887.202       **************************************************

 ********************                STOCHASTIC APPROXIMATION EXPECTATION-MAXIMIZATION               ********************
 ********************                             FINAL PARAMETER ESTIMATE                           ********************

 THETA - VECTOR OF FIXED EFFECTS PARAMETERS   *********
         TH 1      TH 2      TH 3
         4.79E+00  9.21E-01  4.95E+01

 OMEGA - COV MATRIX FOR RANDOM EFFECTS - ETAS  ********
         ETA1      ETA2
 ETA1
+        6.97E-02
 ETA2
+        0.00E+00  4.59E-02

 SIGMA - COV MATRIX FOR RANDOM EFFECTS - EPSILONS  ****
         EPS1
 EPS1
+        9.67E-03

 OMEGA - CORR MATRIX FOR RANDOM EFFECTS - ETAS  *******
         ETA1      ETA2
 ETA1
+        2.64E-01
 ETA2
+        0.00E+00  2.14E-01

 SIGMA - CORR MATRIX FOR RANDOM EFFECTS - EPSILONS  ***
         EPS1
 EPS1
+        9.83E-02
 #TBLN:      2
 #METH: Objective Function Evaluation by Importance Sampling
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
 #TERM:
 EXPECTATION ONLY PROCESS WAS NOT TESTED FOR CONVERGENCE

 ETABAR IS THE ARITHMETIC MEAN OF THE ETA-ESTIMATES,
 AND THE P-VALUE IS GIVEN FOR THE NULL HYPOTHESIS THAT THE TRUE MEAN IS 0.

 ETABAR:        -3.0603E-05 -5.4589E-07
 SE:             3.3590E-02  2.6920E-02
 N:                      60          60

 P VAL.:         9.9927E-01  9.9998E-01

 ETASHRINKSD(%)  1.4155E+00  2.6602E+00
 ETASHRINKVR(%)  2.8110E+00  5.2497E+00
 EBVSHRINKSD(%)  1.4880E+00  2.6850E+00
 EBVSHRINKVR(%)  2.9538E+00  5.2980E+00
 RELATIVEINF(%)  9.7029E+01  9.4686E+01
 EPSSHRINKSD(%)  1.4757E+01
 EPSSHRINKVR(%)  2.7336E+01


 TOTAL DATA POINTS NORMALLY DISTRIBUTED (N):          420
 N*LOG(2PI) CONSTANT TO OBJECTIVE FUNCTION:    771.90836789192508
 OBJECTIVE FUNCTION VALUE WITHOUT CONSTANT:   -1202.3723542561856
 OBJECTIVE FUNCTION VALUE WITH CONSTANT:      -430.46398636426056
 REPORTED OBJECTIVE FUNCTION DOES NOT CONTAIN CONSTANT

 TOTAL EFFECTIVE ETAS (NIND*NETA):                           120


 #TERE:
 Elapsed estimation  time in seconds:     3.82

 ********************               OBJECTIVE FUNCTION EVALUATION BY IMPORTANCE SAMPLING             ********************
 #OBJT:**************                        FINAL VALUE OF OBJECTIVE FUNCTION                       ********************
 #OBJV:********************************************    -1202.372       **************************************************

 ********************               OBJECTIVE FUNCTION EVALUATION BY IMPORTANCE SAMPLING             ********************
 ********************                             FINAL PARAMETER ESTIMATE                           ********************

 THETA - VECTOR OF FIXED EFFECTS PARAMETERS   *********
         TH 1      TH 2      TH 3
         4.79E+00  9.21E-01  4.95E+01

 OMEGA - COV MATRIX FOR RANDOM EFFECTS - ETAS  ********
         ETA1      ETA2
 ETA1
+        6.97E-02
 ETA2
+        0.00E+00  4.59E-02

 SIGMA - COV MATRIX FOR RANDOM EFFECTS - EPSILONS  ****
         EPS1
 EPS1
+        9.67E-03

 OMEGA - CORR MATRIX FOR RANDOM EFFECTS - ETAS  *******
         ETA1      ETA2
 ETA1
+        2.64E-01
 ETA2
+        0.00E+00  2.14E-01

 SIGMA - CORR MATRIX FOR RANDOM EFFECTS - EPSILONS  ***
         EPS1
 EPS1
+        9.83E-02
 Elapsed postprocess time in seconds:     0.03
 Elapsed finaloutput time in seconds:     0.00
 #CPUT: Total CPU Time in Seconds,       46.677
