Fri Oct  2 11:04:33 PM UTC 2026
$PROBLEM two_cpt_oral_cov with a SHARED allometric exponent, SAEM -- anchor for ferx #1620
; Reference SAEM fit for two covariate mu-references that read the same theta:
;
;     CL_i = THETA(1) * (WT/70)**THETA(6) * (CRCL/100)**THETA(7) * EXP(ETA(1))
;     V1_i = THETA(2) * (WT/70)**THETA(6) * EXP(ETA(2))
;
; THETA(6) (THETA_WT) is shared by CL and V1. Before #1620 ferx declined the second
; covariate mu-reference ("already belongs") and let the first one's M-step move
; THETA_WT with ETA_V1 left free to absorb the change; SAEM put THETA_WT at 0.0101.
; With #1620 the two form one joint group whose M-step re-centres both etas.
;
; This is examples/two_cpt_oral_cov.ferx + data/two_cpt_oral_cov.csv, unchanged
; except that the observation rows carry CMT=2 (ADVAN4's central compartment) and
; '.' is written as 0. That the two files describe the same observations is checked
; by FOCEI: NONMEM on this file and ferx on the bundled CSV reach the same OFV,
; -1199.3264. The ferx side is covmuref_shared_saem_fit.ferx. Both engines start
; from the bundled model's values.
;
; MU form, linear in THETA for both typical values (NONMEM's efficient form).

$INPUT ID TIME DV EVID AMT CMT RATE MDV WT CRCL
$DATA covmuref_shared.csv IGNORE=@

$SUBROUTINES ADVAN4 TRANS4

$PK
  MU_1 = LOG(THETA(1)) + THETA(6)*LOG(WT/70.0) + THETA(7)*LOG(CRCL/100.0)
  MU_2 = LOG(THETA(2)) + THETA(6)*LOG(WT/70.0)
  MU_3 = LOG(THETA(3))
  MU_4 = LOG(THETA(4))
  MU_5 = LOG(THETA(5))
  CL = EXP(MU_1 + ETA(1))
  V2 = EXP(MU_2 + ETA(2))
  Q  = EXP(MU_3 + ETA(3))
  V3 = EXP(MU_4 + ETA(4))
  KA = EXP(MU_5 + ETA(5))
  S2 = V2

$ERROR
  IPRED = F
  Y = IPRED*(1.0 + EPS(1))

$THETA
  (0.1, 4.0, 100.0)   ; 1 TVCL
  (1.0, 40.0, 500.0)  ; 2 TVV1
  (0.1, 8.0, 100.0)   ; 3 TVQ
  (1.0, 80.0, 500.0)  ; 4 TVV2
  (0.01, 1.0, 10.0)   ; 5 TVKA
  (0.01, 0.6, 5.0)    ; 6 THETA_WT   (shared by CL and V1)
  (0.01, 0.3, 5.0)    ; 7 THETA_CRCL

$OMEGA
  0.15   ; ETA_CL
  0.15   ; ETA_V1
  0.08   ; ETA_Q
  0.08   ; ETA_V2
  0.20   ; ETA_KA

$SIGMA
  0.0016 ; proportional, = (0.04 SD)^2

$ESTIMATION METHOD=SAEM INTERACTION NBURN=2000 NITER=1000 ISAMPLE=10 PRINT=200 SEED=1620 NOABORT
$ESTIMATION METHOD=IMP INTERACTION EONLY=1 NITER=10 ISAMPLE=3000 PRINT=1 SEED=1620 NOABORT
$TABLE ID TIME DV IPRED NOPRINT ONEHEADER FILE=covmuref_shared_saem.tab FORMAT=s1PE15.8

NM-TRAN MESSAGES
 WARNINGS AND ERRORS (IF ANY) FOR PROBLEM    1
 (WARNING  2) NM-TRAN INFERS THAT THE DATA ARE POPULATION.
 (MU_WARNING 6) THETA(006): SHOULD BE ASSOCIATED WITH ONLY ONE MU_.
 (MU_WARNING 26) DATA ITEM(S) USED IN DEFINITION OF MU_(S) SHOULD BE CONSTANT FOR INDIV. REC.:
  WT CRCL
Note: Analytical 2nd Derivatives are constructed in FSUBS but are never used.
      You may insert $ABBR DERIV2=NO after the first $PROB to save FSUBS construction and compilation time

1NONLINEAR MIXED EFFECTS MODEL PROGRAM (NONMEM) VERSION 7.6.0 (nm760)
 ORIGINALLY DEVELOPED BY STUART BEAL, LEWIS SHEINER, AND ALISON BOECKMANN
 CURRENT DEVELOPERS ARE ROBERT BAUER, ICON DEVELOPMENT SOLUTIONS,
 AND ALISON BOECKMANN. IMPLEMENTATION, EFFICIENCY, AND STANDARDIZATION
 PERFORMED BY NOUS INFOSYSTEMS.
 PROBLEM NO.:         1
 two_cpt_oral_cov with a SHARED allometric exponent, SAEM -- anchor for f
 TOT. NO. OF OBS RECS:      300
 TOT. NO. OF INDIVIDUALS:       30
 TWO COMPARTMENT MODEL WITH FIRST-ORDER ABSORPTION (ADVAN4)
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 #TBLN:      1
 #METH: Stochastic Approximation Expectation-Maximization
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 Elapsed burn-in time in seconds:    59.77
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
 #TERM:
 STOCHASTIC PORTION WAS NOT TESTED FOR CONVERGENCE
 REDUCED STOCHASTIC PORTION WAS COMPLETED

 ETABAR IS THE ARITHMETIC MEAN OF THE ETA-ESTIMATES,
 AND THE P-VALUE IS GIVEN FOR THE NULL HYPOTHESIS THAT THE TRUE MEAN IS 0.

 ETABAR:         3.0093E-06 -3.1079E-06  4.9140E-06 -1.6489E-06 -4.3646E-06
 SE:             5.9925E-02  5.9555E-02  4.0343E-02  3.4620E-02  7.5905E-02
 N:                      30          30          30          30          30

 P VAL.:         9.9996E-01  9.9996E-01  9.9990E-01  9.9996E-01  9.9995E-01

 ETASHRINKSD(%)  2.1019E-01  1.9941E+00  2.7103E+00  2.2220E+00  2.0001E+00
 ETASHRINKVR(%)  4.1994E-01  3.9484E+00  5.3470E+00  4.3946E+00  3.9602E+00
 EBVSHRINKSD(%)  2.0867E-01  1.9915E+00  2.7130E+00  2.2208E+00  2.0000E+00
 EBVSHRINKVR(%)  4.1691E-01  3.9434E+00  5.3524E+00  4.3924E+00  3.9600E+00
 RELATIVEINF(%)  9.9571E+01  9.5778E+01  9.4412E+01  9.5571E+01  9.5761E+01
 EPSSHRINKSD(%)  2.7683E+01
 EPSSHRINKVR(%)  4.7703E+01


 TOTAL DATA POINTS NORMALLY DISTRIBUTED (N):          300
 N*LOG(2PI) CONSTANT TO OBJECTIVE FUNCTION:    551.36311992280355
 OBJECTIVE FUNCTION VALUE WITHOUT CONSTANT:   -2210.1473067328798
 OBJECTIVE FUNCTION VALUE WITH CONSTANT:      -1658.7841868100763
 REPORTED OBJECTIVE FUNCTION DOES NOT CONTAIN CONSTANT

 TOTAL EFFECTIVE ETAS (NIND*NETA):                           150
 NIND*NETA*LOG(2PI) CONSTANT TO OBJECTIVE FUNCTION:    275.68155996140177
 OBJECTIVE FUNCTION VALUE WITHOUT CONSTANT:   -2210.1473067328798
 OBJECTIVE FUNCTION VALUE WITH CONSTANT:      -1934.4657467714781
 REPORTED OBJECTIVE FUNCTION DOES NOT CONTAIN CONSTANT


 #TERE:
 Elapsed estimation  time in seconds:    96.05

 ********************                STOCHASTIC APPROXIMATION EXPECTATION-MAXIMIZATION               ********************
 #OBJT:**************                        FINAL VALUE OF LIKELIHOOD FUNCTION                      ********************
 #OBJV:********************************************         -2210.147       *********************************************

 ********************                STOCHASTIC APPROXIMATION EXPECTATION-MAXIMIZATION               ********************
 ********************                             FINAL PARAMETER ESTIMATE                           ********************

 THETA - VECTOR OF FIXED EFFECTS PARAMETERS   *********
         TH 1      TH 2      TH 3      TH 4      TH 5      TH 6      TH 7
         4.94E+00  4.82E+01  9.59E+00  9.45E+01  1.25E+00  6.62E-01  5.65E-01

 OMEGA - COV MATRIX FOR RANDOM EFFECTS - ETAS  ********
         ETA1      ETA2      ETA3      ETA4      ETA5
 ETA1
+        1.08E-01
 ETA2
+        0.00E+00  1.11E-01
 ETA3
+        0.00E+00  0.00E+00  5.16E-02
 ETA4
+        0.00E+00  0.00E+00  0.00E+00  3.76E-02
 ETA5
+        0.00E+00  0.00E+00  0.00E+00  0.00E+00  1.80E-01

 SIGMA - COV MATRIX FOR RANDOM EFFECTS - EPSILONS  ****
         EPS1
 EPS1
+        3.84E-04

 OMEGA - CORR MATRIX FOR RANDOM EFFECTS - ETAS  *******
         ETA1      ETA2      ETA3      ETA4      ETA5
 ETA1
+        3.29E-01
 ETA2
+        0.00E+00  3.33E-01
 ETA3
+        0.00E+00  0.00E+00  2.27E-01
 ETA4
+        0.00E+00  0.00E+00  0.00E+00  1.94E-01
 ETA5
+        0.00E+00  0.00E+00  0.00E+00  0.00E+00  4.24E-01

 SIGMA - CORR MATRIX FOR RANDOM EFFECTS - EPSILONS  ***
         EPS1
 EPS1
+        1.96E-02
 #TBLN:      2
 #METH: Objective Function Evaluation by Importance Sampling
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
 #TERM:
 EXPECTATION ONLY PROCESS WAS NOT TESTED FOR CONVERGENCE

 ETABAR IS THE ARITHMETIC MEAN OF THE ETA-ESTIMATES,
 AND THE P-VALUE IS GIVEN FOR THE NULL HYPOTHESIS THAT THE TRUE MEAN IS 0.

 ETABAR:         6.6465E-05  8.5632E-04  2.3578E-05 -2.7851E-04  8.8261E-04
 SE:             5.9890E-02  5.9444E-02  4.0332E-02  3.4583E-02  7.5748E-02
 N:                      30          30          30          30          30

 P VAL.:         9.9911E-01  9.8851E-01  9.9953E-01  9.9357E-01  9.9070E-01

 ETASHRINKSD(%)  2.6844E-01  2.1748E+00  2.7369E+00  2.3275E+00  2.2021E+00
 ETASHRINKVR(%)  5.3615E-01  4.3024E+00  5.3990E+00  4.6007E+00  4.3557E+00
 EBVSHRINKSD(%)  2.0332E-01  1.8618E+00  2.6727E+00  2.1729E+00  1.9140E+00
 EBVSHRINKVR(%)  4.0623E-01  3.6890E+00  5.2739E+00  4.2987E+00  3.7913E+00
 RELATIVEINF(%)  9.9583E+01  9.6058E+01  9.4505E+01  9.5669E+01  9.5954E+01
 EPSSHRINKSD(%)  2.7691E+01
 EPSSHRINKVR(%)  4.7714E+01


 TOTAL DATA POINTS NORMALLY DISTRIBUTED (N):          300
 N*LOG(2PI) CONSTANT TO OBJECTIVE FUNCTION:    551.36311992280355
 OBJECTIVE FUNCTION VALUE WITHOUT CONSTANT:   -1199.3816949221882
 OBJECTIVE FUNCTION VALUE WITH CONSTANT:      -648.01857499938467
 REPORTED OBJECTIVE FUNCTION DOES NOT CONTAIN CONSTANT

 TOTAL EFFECTIVE ETAS (NIND*NETA):                           150


 #TERE:
 Elapsed estimation  time in seconds:     5.36

 ********************               OBJECTIVE FUNCTION EVALUATION BY IMPORTANCE SAMPLING             ********************
 #OBJT:**************                        FINAL VALUE OF OBJECTIVE FUNCTION                       ********************
 #OBJV:********************************************         -1199.382       *********************************************

 ********************               OBJECTIVE FUNCTION EVALUATION BY IMPORTANCE SAMPLING             ********************
 ********************                             FINAL PARAMETER ESTIMATE                           ********************

 THETA - VECTOR OF FIXED EFFECTS PARAMETERS   *********
         TH 1      TH 2      TH 3      TH 4      TH 5      TH 6      TH 7
         4.94E+00  4.82E+01  9.59E+00  9.45E+01  1.25E+00  6.62E-01  5.65E-01

 OMEGA - COV MATRIX FOR RANDOM EFFECTS - ETAS  ********
         ETA1      ETA2      ETA3      ETA4      ETA5
 ETA1
+        1.08E-01
 ETA2
+        0.00E+00  1.11E-01
 ETA3
+        0.00E+00  0.00E+00  5.16E-02
 ETA4
+        0.00E+00  0.00E+00  0.00E+00  3.76E-02
 ETA5
+        0.00E+00  0.00E+00  0.00E+00  0.00E+00  1.80E-01

 SIGMA - COV MATRIX FOR RANDOM EFFECTS - EPSILONS  ****
         EPS1
 EPS1
+        3.84E-04

 OMEGA - CORR MATRIX FOR RANDOM EFFECTS - ETAS  *******
         ETA1      ETA2      ETA3      ETA4      ETA5
 ETA1
+        3.29E-01
 ETA2
+        0.00E+00  3.33E-01
 ETA3
+        0.00E+00  0.00E+00  2.27E-01
 ETA4
+        0.00E+00  0.00E+00  0.00E+00  1.94E-01
 ETA5
+        0.00E+00  0.00E+00  0.00E+00  0.00E+00  4.24E-01

 SIGMA - CORR MATRIX FOR RANDOM EFFECTS - EPSILONS  ***
         EPS1
 EPS1
+        1.96E-02
 Elapsed postprocess time in seconds:     0.02
 Elapsed finaloutput time in seconds:     0.01
 #CPUT: Total CPU Time in Seconds,      101.416
