Thu Sep 17 08:24:57 AM UTC 2026
$PROBLEM ferx-core #1009 twin: 1-cpt oral ODE, DEFDOSE on compartment 2 (DEPOT declared second), dataset CMT cells float-formatted (2.0 / 1.0)
$INPUT ID TIME DV EVID AMT CMT RATE MDV
$DATA defdose_cmt2float.csv IGNORE=@
$SUBROUTINE ADVAN13 TOL=9
$MODEL
  COMP=(CENTRAL, DEFOBS)
  COMP=(DEPOT, DEFDOSE)
$PK
  CL = THETA(1)*EXP(ETA(1))
  V  = THETA(2)*EXP(ETA(2))
  KA = THETA(3)*EXP(ETA(3))
$DES
  DADT(1) = KA*A(2)/V - (CL/V)*A(1)
  DADT(2) = -KA*A(2)
$ERROR
  IPRED = A(1)
  Y = IPRED*(1+EPS(1))
$THETA (0.001, 0.2, 10) (0.1, 10, 500) (0.01, 1.5, 50)
$OMEGA 0.09 0.04 0.30
$SIGMA 0.0004  ; ferx: sigma PROP_ERR ~ 0.02 (sd) = variance 0.0004
$ESTIMATION METHOD=1 INTERACTION MAXEVAL=0 PRINT=1 NOABORT
$TABLE ID TIME PRED IPRED NOPRINT ONEHEADER FORMAT=s1PE15.8 FILE=defdose_cmt2float.tab

NM-TRAN MESSAGES
 WARNINGS AND ERRORS (IF ANY) FOR PROBLEM    1
 (WARNING  2) NM-TRAN INFERS THAT THE DATA ARE POPULATION.
Note: Analytical 2nd Derivatives are constructed in FSUBS but are never used.
      You may insert $ABBR DERIV2=NO after the first $PROB to save FSUBS construction and compilation time

1NONLINEAR MIXED EFFECTS MODEL PROGRAM (NONMEM) VERSION 7.6.0 (nm760)
 ORIGINALLY DEVELOPED BY STUART BEAL, LEWIS SHEINER, AND ALISON BOECKMANN
 CURRENT DEVELOPERS ARE ROBERT BAUER, ICON DEVELOPMENT SOLUTIONS,
 AND ALISON BOECKMANN. IMPLEMENTATION, EFFICIENCY, AND STANDARDIZATION
 PERFORMED BY NOUS INFOSYSTEMS.
 PROBLEM NO.:         1
 ferx-core #1009 twin: 1-cpt oral ODE, DEFDOSE on compartment 2 (DEPOT de
 TOT. NO. OF OBS RECS:      110
 TOT. NO. OF INDIVIDUALS:       10
 GENERAL NONLINEAR KINETICS MODEL WITH STIFF/NONSTIFF EQUATIONS (LSODA, ADVAN13)
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 #TBLN:      1
 #METH: First Order Conditional Estimation with Interaction (Evaluation)
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 Elapsed evaluation time in seconds:     0.05
 Elapsed postprocess time in seconds:     0.06

 ********************         FIRST ORDER CONDITIONAL ESTIMATION WITH INTERACTION (EVALUATION)       ********************
 #OBJT:**************                       MINIMUM VALUE OF OBJECTIVE FUNCTION                      ********************
 #OBJV:********************************************          -182.667       *********************************************

 ********************         FIRST ORDER CONDITIONAL ESTIMATION WITH INTERACTION (EVALUATION)       ********************
 ********************                             FINAL PARAMETER ESTIMATE                           ********************

 THETA - VECTOR OF FIXED EFFECTS PARAMETERS   *********
         TH 1      TH 2      TH 3
         2.00E-01  1.00E+01  1.50E+00

 OMEGA - COV MATRIX FOR RANDOM EFFECTS - ETAS  ********
         ETA1      ETA2      ETA3
 ETA1
+        9.00E-02
 ETA2
+        0.00E+00  4.00E-02
 ETA3
+        0.00E+00  0.00E+00  3.00E-01

 SIGMA - COV MATRIX FOR RANDOM EFFECTS - EPSILONS  ****
         EPS1
 EPS1
+        4.00E-04

 OMEGA - CORR MATRIX FOR RANDOM EFFECTS - ETAS  *******
         ETA1      ETA2      ETA3
 ETA1
+        3.00E-01
 ETA2
+        0.00E+00  2.00E-01
 ETA3
+        0.00E+00  0.00E+00  5.48E-01

 SIGMA - CORR MATRIX FOR RANDOM EFFECTS - EPSILONS  ***
         EPS1
 EPS1
+        2.00E-02
 Elapsed finaloutput time in seconds:     0.01
 #CPUT: Total CPU Time in Seconds,        0.148
