Fri Aug 28 10:56:51 PM UTC 2026
$PROBLEM #1073 E3-nolag - SS + TV covariate, NO lagtime
$INPUT ID TIME DV AMT EVID CMT MDV WT SS II
$DATA ss_nolag.csv IGNORE=@

$SUBROUTINE ADVAN13 TOL=9

$MODEL
  COMP=(DEPOT,DEFDOSE)
  COMP=(CENTRAL,DEFOBS)

$PK
  CL    = THETA(1)*(WT/70)**THETA(4)*EXP(ETA(1))
  V     = THETA(2)*EXP(ETA(2))
  KA    = THETA(3)*(WT/70)**THETA(5)
  ALAG1 = 0
  S2    = V

$DES
  DADT(1) = -KA*A(1)
  DADT(2) =  KA*A(1) - (CL/V)*A(2)

$ERROR
  IPRED = F
  Y     = IPRED*(1+EPS(1))

$THETA
  (0, 10.0)  ; 1 TVCL
  (0, 50.0)  ; 2 TVV
  (0, 1.0)   ; 3 TVKA
  (0, 0.75)  ; 4 WTEXP_CL
  (0, 0.75)  ; 5 WTEXP_KA
  (0, 0.7)   ; 6 TVP lagtime

$OMEGA
  0.09  ; ETA_CL
  0.09  ; ETA_V
  0.04  ; ETA_LAG

$SIGMA
  0.0025 ; PROP variance (sd 0.05)

$ESTIMATION METHOD=1 INTERACTION MAXEVAL=0 POSTHOC PRINT=1 NOABORT
$TABLE ID TIME WT DV IPRED CL V KA ALAG1 ETA1 ETA2 ETA3
       ONEHEADER NOPRINT FILE=ss_nolag.tab

NM-TRAN MESSAGES
 WARNINGS AND ERRORS (IF ANY) FOR PROBLEM    1
 (WARNING  2) NM-TRAN INFERS THAT THE DATA ARE POPULATION.
 (WARNING  31) $OMEGA INCLUDES A NON-FIXED INITIAL ESTIMATE CORRESPONDING TO
 AN ETA THAT IS NOT USED IN ABBREVIATED CODE.
 THIS WARNING APPLIES TO THE FOLLOWING OMEGA/ETAS:
 OMEGA/ETAS     3
 (WARNING  40) $THETA INCLUDES A NON-FIXED INITIAL ESTIMATE CORRESPONDING TO
 A THETA THAT IS NOT USED IN ABBREVIATED CODE.
 THIS WARNING APPLIES TO THE FOLLOWING THETAS:
 THETA      6
Note: Analytical 2nd Derivatives are constructed in FSUBS but are never used.
      You may insert $ABBR DERIV2=NO after the first $PROB to save FSUBS construction and compilation time

1NONLINEAR MIXED EFFECTS MODEL PROGRAM (NONMEM) VERSION 7.6.0 (nm760)
 ORIGINALLY DEVELOPED BY STUART BEAL, LEWIS SHEINER, AND ALISON BOECKMANN
 CURRENT DEVELOPERS ARE ROBERT BAUER, ICON DEVELOPMENT SOLUTIONS,
 AND ALISON BOECKMANN. IMPLEMENTATION, EFFICIENCY, AND STANDARDIZATION
 PERFORMED BY NOUS INFOSYSTEMS.
 PROBLEM NO.:         1
 #1073 E3-nolag - SS + TV covariate, NO lagtime
 TOT. NO. OF OBS RECS:       80
 TOT. NO. OF INDIVIDUALS:        8
 GENERAL NONLINEAR KINETICS MODEL WITH STIFF/NONSTIFF EQUATIONS (LSODA, ADVAN13)
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 #TBLN:      1
 #METH: First Order Conditional Estimation with Interaction (Evaluation)
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 Elapsed evaluation time in seconds:     0.16
 Elapsed postprocess time in seconds:     0.18

 ********************         FIRST ORDER CONDITIONAL ESTIMATION WITH INTERACTION (EVALUATION)       ********************
 #OBJT:**************                       MINIMUM VALUE OF OBJECTIVE FUNCTION                      ********************
 #OBJV:********************************************          1700.879       *********************************************

 ********************         FIRST ORDER CONDITIONAL ESTIMATION WITH INTERACTION (EVALUATION)       ********************
 ********************                             FINAL PARAMETER ESTIMATE                           ********************

 THETA - VECTOR OF FIXED EFFECTS PARAMETERS   *********
         TH 1      TH 2      TH 3      TH 4      TH 5      TH 6
         1.00E+01  5.00E+01  1.00E+00  7.50E-01  7.50E-01  7.00E-01

 OMEGA - COV MATRIX FOR RANDOM EFFECTS - ETAS  ********
         ETA1      ETA2      ETA3
 ETA1
+        9.00E-02
 ETA2
+        0.00E+00  9.00E-02
 ETA3
+        0.00E+00  0.00E+00  4.00E-02

 SIGMA - COV MATRIX FOR RANDOM EFFECTS - EPSILONS  ****
         EPS1
 EPS1
+        2.50E-03

 OMEGA - CORR MATRIX FOR RANDOM EFFECTS - ETAS  *******
         ETA1      ETA2      ETA3
 ETA1
+        3.00E-01
 ETA2
+        0.00E+00  3.00E-01
 ETA3
+        0.00E+00  0.00E+00  2.00E-01

 SIGMA - CORR MATRIX FOR RANDOM EFFECTS - EPSILONS  ***
         EPS1
 EPS1
+        5.00E-02
 Elapsed finaloutput time in seconds:     0.01
 #CPUT: Total CPU Time in Seconds,        0.376
