Mon Oct  5 10:53:42 PM UTC 2026
$PROBLEM #1716 ETA shape anchor: NULL TWIN, plain log-normal CL
; Every shaped arm (eta_shape_bc_pos / _bc_neg / _td) differs from this stream
; by the transform on CL alone, so ferx and NONMEM are compared on the
; difference each transform makes to the objective (see
; tests/eta_shape_nonmem_anchor.rs), and on IPRED per record.
; MAXEVAL=0 POSTHOC INTERACTION: nothing is estimated, so both engines evaluate
; the same parameter vector and the comparison is of arithmetic.
; Multi-dose 1-cpt IV (100 at 0, 12, 24 h), 30 subjects; ADVAN1 and ferx's
; `one_cpt_iv` key the doses and observations on CMT 1 alike, so ferx reads the
; same eta_shape.csv.
$INPUT ID TIME DV EVID AMT CMT MDV
$DATA eta_shape.csv IGNORE=@
$SUBROUTINE ADVAN1 TRANS2
$PK
  CL = THETA(1)*EXP(ETA(1))
  V  = THETA(2)*EXP(ETA(2))
  S1 = V
$ERROR
  IPRED = F
  Y = F*(1 + EPS(1))
$THETA
  (0.01, 2.0, 100.0)   ; TVCL
  (0.1, 20.0, 1000.0)  ; TVV
$OMEGA
  0.2   ; ETA_CL
  0.1   ; ETA_V
$SIGMA
  0.01  ; PROP_ERR (ferx declares `~ 0.1 (sd)`; NONMEM takes the variance)
$ESTIMATION METHOD=1 INTERACTION MAXEVAL=0 POSTHOC PRINT=1 NOABORT FORMAT=s1PE23.16
$TABLE ID TIME PRED IPRED ETA1 ETA2 NOPRINT ONEHEADER FILE=eta_shape_null.tab FORMAT=s1PE23.16

NM-TRAN MESSAGES
 WARNINGS AND ERRORS (IF ANY) FOR PROBLEM    1
 (WARNING  2) NM-TRAN INFERS THAT THE DATA ARE POPULATION.
Note: Analytical 2nd Derivatives are constructed in FSUBS but are never used.
      You may insert $ABBR DERIV2=NO after the first $PROB to save FSUBS construction and compilation time

1NONLINEAR MIXED EFFECTS MODEL PROGRAM (NONMEM) VERSION 7.6.0 (nm760)
 ORIGINALLY DEVELOPED BY STUART BEAL, LEWIS SHEINER, AND ALISON BOECKMANN
 CURRENT DEVELOPERS ARE ROBERT BAUER, ICON DEVELOPMENT SOLUTIONS,
 AND ALISON BOECKMANN. IMPLEMENTATION, EFFICIENCY, AND STANDARDIZATION
 PERFORMED BY NOUS INFOSYSTEMS.
 PROBLEM NO.:         1
 #1716 ETA shape anchor: NULL TWIN, plain log-normal CL
 TOT. NO. OF OBS RECS:      270
 TOT. NO. OF INDIVIDUALS:       30
 ONE COMPARTMENT MODEL (ADVAN1)
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 #TBLN:      1
 #METH: First Order Conditional Estimation with Interaction (Evaluation)
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 Elapsed evaluation time in seconds:     0.02
 Elapsed postprocess time in seconds:     0.02

 ********************         FIRST ORDER CONDITIONAL ESTIMATION WITH INTERACTION (EVALUATION)       ********************
 #OBJT:**************                       MINIMUM VALUE OF OBJECTIVE FUNCTION                      ********************
 #OBJV:********************************************          -202.560       *********************************************

 ********************         FIRST ORDER CONDITIONAL ESTIMATION WITH INTERACTION (EVALUATION)       ********************
 ********************                             FINAL PARAMETER ESTIMATE                           ********************

 THETA - VECTOR OF FIXED EFFECTS PARAMETERS   *********
         TH 1      TH 2
         2.00E+00  2.00E+01

 OMEGA - COV MATRIX FOR RANDOM EFFECTS - ETAS  ********
         ETA1      ETA2
 ETA1
+        2.00E-01
 ETA2
+        0.00E+00  1.00E-01

 SIGMA - COV MATRIX FOR RANDOM EFFECTS - EPSILONS  ****
         EPS1
 EPS1
+        1.00E-02

 OMEGA - CORR MATRIX FOR RANDOM EFFECTS - ETAS  *******
         ETA1      ETA2
 ETA1
+        4.47E-01
 ETA2
+        0.00E+00  3.16E-01

 SIGMA - CORR MATRIX FOR RANDOM EFFECTS - EPSILONS  ***
         EPS1
 EPS1
+        1.00E-01
 Elapsed finaloutput time in seconds:     0.01
 #CPUT: Total CPU Time in Seconds,        0.065
