Wed Sep 30 12:48:02 PM UTC 2026
$PROBLEM ferx #1587: lagged dose record before an EVID=3/4 reset, arrival after it
$DATA evid_reset_lag.csv IGNORE=@
$INPUT ID TIME DV EVID AMT CMT MDV II SS RATE LAGC
$SUBROUTINES ADVAN13 TOL=12
$MODEL COMP=(DEPOT,DEFDOSE) COMP=(CENTRAL,DEFOBS)
$PK
  CL = THETA(1)*EXP(ETA(1))
  V  = THETA(2)
  KA = THETA(3)
  ALAG1 = LAGC
  S2 = V
$DES
  DADT(1) = -KA*A(1)
  DADT(2) = KA*A(1) - CL/V*A(2)
$ERROR
  IPRED = F
  Y     = IPRED+EPS(1)
$THETA 2.0 FIX  20.0 FIX  0.15 FIX
$OMEGA 0 FIX
$SIGMA 0.01 FIX
$ESTIMATION MAXEVAL=0 METHOD=0 NOABORT
$TABLE ID TIME EVID PRED NOPRINT ONEHEADER NOAPPEND FORMAT=s1PE23.16 FILE=evid_reset_lag_advan13.sdtab

NM-TRAN MESSAGES
 WARNINGS AND ERRORS (IF ANY) FOR PROBLEM    1
 (WARNING  2) NM-TRAN INFERS THAT THE DATA ARE POPULATION.
Note: Analytical 2nd Derivatives are constructed in FSUBS but are never used.
      You may insert $ABBR DERIV2=NO after the first $PROB to save FSUBS construction and compilation time

1NONLINEAR MIXED EFFECTS MODEL PROGRAM (NONMEM) VERSION 7.6.0 (nm760)
 ORIGINALLY DEVELOPED BY STUART BEAL, LEWIS SHEINER, AND ALISON BOECKMANN
 CURRENT DEVELOPERS ARE ROBERT BAUER, ICON DEVELOPMENT SOLUTIONS,
 AND ALISON BOECKMANN. IMPLEMENTATION, EFFICIENCY, AND STANDARDIZATION
 PERFORMED BY NOUS INFOSYSTEMS.
 PROBLEM NO.:         1
 ferx #1587: lagged dose record before an EVID=3/4 reset, arrival after i
 TOT. NO. OF OBS RECS:      134
 TOT. NO. OF INDIVIDUALS:       23
 GENERAL NONLINEAR KINETICS MODEL WITH STIFF/NONSTIFF EQUATIONS (LSODA, ADVAN13)
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 #TBLN:      1
 #METH: First Order (Evaluation)
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 Elapsed evaluation time in seconds:     0.04
 Elapsed postprocess time in seconds:     0.05

 ********************                             FIRST ORDER (EVALUATION)                           ********************
 #OBJT:**************                       MINIMUM VALUE OF OBJECTIVE FUNCTION                      ********************
 #OBJV:********************************************         27136.611       *********************************************

 ********************                             FIRST ORDER (EVALUATION)                           ********************
 ********************                             FINAL PARAMETER ESTIMATE                           ********************

 THETA - VECTOR OF FIXED EFFECTS PARAMETERS   *********
         TH 1      TH 2      TH 3
         2.00E+00  2.00E+01  1.50E-01

 OMEGA - COV MATRIX FOR RANDOM EFFECTS - ETAS  ********
         ETA1
 ETA1
+        0.00E+00

 SIGMA - COV MATRIX FOR RANDOM EFFECTS - EPSILONS  ****
         EPS1
 EPS1
+        1.00E-02

 OMEGA - CORR MATRIX FOR RANDOM EFFECTS - ETAS  *******
         ETA1
 ETA1
+        0.00E+00

 SIGMA - CORR MATRIX FOR RANDOM EFFECTS - EPSILONS  ***
         EPS1
 EPS1
+        1.00E-01
 Elapsed finaloutput time in seconds:     0.02
 #CPUT: Total CPU Time in Seconds,        0.089
