Wed Jul  1 11:26:08 AM CEST 2026
$PROBLEM first_order(ka) + estimated lag (ALAG1) -- NONMEM anchor for PR2 of #486
; ferx's built-in first_order(ka) input-rate function feeding `central` directly
; is mathematically identical to the classic depot->central first-order
; absorption (the "input into central" from an exponentially-decaying depot IS
; R_in(tad) = dose*ka*exp(-ka*tad)) -- so this is a plain, standard ADVAN2 TRANS2
; model with ALAG1, no $DES/PODO tricks needed. Validates the event-driven ODE
; sensitivity walk's new rate-on onset saltation for the lagtime + input-rate
; combination (the highest-risk new math in PR2, since first_order's onset
; R_in(0+) = dose*ka is always finite and nonzero, unlike igd's which vanishes).

$INPUT ID TIME DV AMT EVID CMT MDV
$DATA first_order_alag_nm.csv IGNORE=@

$SUBROUTINES ADVAN2 TRANS2

$PK
  CL    = THETA(1)*EXP(ETA(1))
  V     = THETA(2)
  KA    = THETA(3)*EXP(ETA(2))
  ALAG1 = THETA(4)
  S2    = V

$ERROR
  IPRED = F
  Y = IPRED*(1.0 + EPS(1))

$THETA
  (0.1,  5.0,  100)   ; 1 CL
  (5.0,  50.0, 500)   ; 2 V
  (0.05, 1.0,  20)    ; 3 KA
  (0.01, 0.5,  5)     ; 4 ALAG1

$OMEGA
  0.09    ; IIV CL
  0.04    ; IIV KA

$SIGMA
  0.01    ; proportional residual variance (0.10^2)

$ESTIMATION METHOD=1 INTER MAXEVAL=9999 PRINT=5 NOABORT
$COVARIANCE
$TABLE ID TIME DV IPRED CWRES MDV NOPRINT ONEHEADER FILE=first_order_alag.tab

NM-TRAN MESSAGES
 WARNINGS AND ERRORS (IF ANY) FOR PROBLEM    1
 (WARNING  2) NM-TRAN INFERS THAT THE DATA ARE POPULATION.
Note: Analytical 2nd Derivatives are constructed in FSUBS but are never used.
      You may insert $ABBR DERIV2=NO after the first $PROB to save FSUBS construction and compilation time

1NONLINEAR MIXED EFFECTS MODEL PROGRAM (NONMEM) VERSION 7.5.1
 ORIGINALLY DEVELOPED BY STUART BEAL, LEWIS SHEINER, AND ALISON BOECKMANN
 CURRENT DEVELOPERS ARE ROBERT BAUER, ICON DEVELOPMENT SOLUTIONS,
 AND ALISON BOECKMANN. IMPLEMENTATION, EFFICIENCY, AND STANDARDIZATION
 PERFORMED BY NOUS INFOSYSTEMS.
 PROBLEM NO.:         1
 first_order(ka) + estimated lag (ALAG1) -- NONMEM anchor for PR2 of #486
 TOT. NO. OF OBS RECS:      270
 TOT. NO. OF INDIVIDUALS:       30
 ONE COMPARTMENT MODEL WITH FIRST-ORDER ABSORPTION (ADVAN2)
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 #TBLN:      1
 #METH: First Order Conditional Estimation with Interaction
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
 #TERM:
0MINIMIZATION SUCCESSFUL
 NO. OF FUNCTION EVALUATIONS USED:      146
 NO. OF SIG. DIGITS IN FINAL EST.:  3.2

 ETABAR IS THE ARITHMETIC MEAN OF THE ETA-ESTIMATES,
 AND THE P-VALUE IS GIVEN FOR THE NULL HYPOTHESIS THAT THE TRUE MEAN IS 0.

 ETABAR:         1.0510E-03 -9.3327E-04
 SE:             4.6619E-02  2.6016E-02
 N:                      30          30

 P VAL.:         9.8201E-01  9.7138E-01

 ETASHRINKSD(%)  9.6599E-01  8.6967E+00
 ETASHRINKVR(%)  1.9226E+00  1.6637E+01
 EBVSHRINKSD(%)  8.0454E-01  8.6621E+00
 EBVSHRINKVR(%)  1.6026E+00  1.6574E+01
 RELATIVEINF(%)  9.8394E+01  8.3423E+01
 EPSSHRINKSD(%)  1.0329E+01
 EPSSHRINKVR(%)  1.9592E+01


 TOTAL DATA POINTS NORMALLY DISTRIBUTED (N):          270
 N*LOG(2PI) CONSTANT TO OBJECTIVE FUNCTION:    496.22680793052325
 OBJECTIVE FUNCTION VALUE WITHOUT CONSTANT:   -1046.6853385750098
 OBJECTIVE FUNCTION VALUE WITH CONSTANT:      -550.45853064448659
 REPORTED OBJECTIVE FUNCTION DOES NOT CONTAIN CONSTANT

 TOTAL EFFECTIVE ETAS (NIND*NETA):                            60


 #TERE:
 Elapsed estimation  time in seconds:     0.89
 Elapsed covariance  time in seconds:     0.92
 Elapsed postprocess time in seconds:     0.04

 ********************               FIRST ORDER CONDITIONAL ESTIMATION WITH INTERACTION              ********************
 #OBJT:**************                       MINIMUM VALUE OF OBJECTIVE FUNCTION                      ********************
 #OBJV:********************************************    -1046.685       **************************************************

 ********************               FIRST ORDER CONDITIONAL ESTIMATION WITH INTERACTION              ********************
 ********************                             FINAL PARAMETER ESTIMATE                           ********************

 THETA - VECTOR OF FIXED EFFECTS PARAMETERS   *********
         TH 1      TH 2      TH 3      TH 4
         5.17E+00  4.97E+01  1.02E+00  4.99E-01

 OMEGA - COV MATRIX FOR RANDOM EFFECTS - ETAS  ********
         ETA1      ETA2
 ETA1
+        6.65E-02
 ETA2
+        0.00E+00  2.44E-02

 SIGMA - COV MATRIX FOR RANDOM EFFECTS - EPSILONS  ****
         EPS1
 EPS1
+        9.76E-03

 OMEGA - CORR MATRIX FOR RANDOM EFFECTS - ETAS  *******
         ETA1      ETA2
 ETA1
+        2.58E-01
 ETA2
+        0.00E+00  1.56E-01

 SIGMA - CORR MATRIX FOR RANDOM EFFECTS - EPSILONS  ***
         EPS1
 EPS1
+        9.88E-02

 ********************               FIRST ORDER CONDITIONAL ESTIMATION WITH INTERACTION              ********************
 ********************                            STANDARD ERROR OF ESTIMATE                          ********************

 THETA - VECTOR OF FIXED EFFECTS PARAMETERS   *********
         TH 1      TH 2      TH 3      TH 4
         2.47E-01  6.56E-01  3.60E-02  2.29E-03

 OMEGA - COV MATRIX FOR RANDOM EFFECTS - ETAS  ********
         ETA1      ETA2
 ETA1
+        1.71E-02
 ETA2
+       .........  7.46E-03

 SIGMA - COV MATRIX FOR RANDOM EFFECTS - EPSILONS  ****
         EPS1
 EPS1
+        9.91E-04

 OMEGA - CORR MATRIX FOR RANDOM EFFECTS - ETAS  *******
         ETA1      ETA2
 ETA1
+        3.31E-02
 ETA2
+       .........  2.39E-02

 SIGMA - CORR MATRIX FOR RANDOM EFFECTS - EPSILONS  ***
         EPS1
 EPS1
+        5.02E-03

 ********************               FIRST ORDER CONDITIONAL ESTIMATION WITH INTERACTION              ********************
 ********************                          COVARIANCE MATRIX OF ESTIMATE                         ********************

            TH 1      TH 2      TH 3      TH 4      OM11      OM12      OM22      SG11
 TH 1
+        6.08E-02
 TH 2
+        2.14E-02  4.30E-01
 TH 3
+        1.74E-03  6.83E-03  1.30E-03
 TH 4
+        2.00E-05  2.20E-04  3.95E-05  5.25E-06
 OM11
+        1.30E-03  3.36E-03  2.70E-05 -9.03E-06  2.91E-04
 OM12
+       ......... ......... ......... ......... ......... .........
 OM22
+       -3.25E-04 -3.71E-04  8.24E-05  2.13E-07 -9.57E-06 .........  5.57E-05
 SG11
+        3.33E-05  2.51E-04  3.48E-06  1.87E-07  1.04E-06 ......... -1.52E-06  9.82E-07

 ********************               FIRST ORDER CONDITIONAL ESTIMATION WITH INTERACTION              ********************
 ********************                          CORRELATION MATRIX OF ESTIMATE                        ********************

            TH 1      TH 2      TH 3      TH 4      OM11      OM12      OM22      SG11
 TH 1
+        2.47E-01
 TH 2
+        1.32E-01  6.56E-01
 TH 3
+        1.96E-01  2.89E-01  3.60E-02
 TH 4
+        3.54E-02  1.46E-01  4.79E-01  2.29E-03
 OM11
+        3.08E-01  3.00E-01  4.40E-02 -2.31E-01  1.71E-02
 OM12
+       ......... ......... ......... ......... ......... .........
 OM22
+       -1.77E-01 -7.58E-02  3.06E-01  1.25E-02 -7.52E-02 .........  7.46E-03
 SG11
+        1.36E-01  3.86E-01  9.75E-02  8.23E-02  6.13E-02 ......... -2.05E-01  9.91E-04
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 Elapsed finaloutput time in seconds:     0.04
 #CPUT: Total CPU Time in Seconds,        1.981
