Mon Oct  5 09:58:05 PM UTC 2026
$PROBLEM Warfarin IOV (CL) - ferx-core cross-check (issue #101)
$DATA warfarin_iov.csv IGNORE=@
$INPUT ID TIME DV EVID AMT CMT=DROP RATE MDV OCC
$SUBROUTINES ADVAN2 TRANS2
$PK
  ; Inter-occasion variability on CL via per-occasion etas sharing one variance
  OCC1 = 0
  OCC2 = 0
  IF(OCC.EQ.1) OCC1 = 1
  IF(OCC.EQ.2) OCC2 = 1
  IOVCL = OCC1*ETA(4) + OCC2*ETA(5)
  CL = THETA(1)*EXP(ETA(1) + IOVCL)
  V  = THETA(2)*EXP(ETA(2))
  KA = THETA(3)*EXP(ETA(3))
  S2 = V
$ERROR
  IPRED = F
  Y = IPRED*(1 + EPS(1))
$THETA (0, 0.2)   ; TVCL
$THETA (0, 10.0)  ; TVV
$THETA (0, 1.5)   ; TVKA
$OMEGA 0.09       ; ETA_CL  (BSV)
$OMEGA 0.04       ; ETA_V   (BSV)
$OMEGA 0.30       ; ETA_KA  (BSV)
$OMEGA BLOCK(1) 0.01   ; KAPPA_CL occasion 1
$OMEGA BLOCK(1) SAME   ; KAPPA_CL occasion 2 (same variance => IOV)
$SIGMA 0.04       ; proportional variance
$ESTIMATION METHOD=1 MAXEVAL=9999 NSIG=3 SIGL=9 PRINT=5 NOABORT
$COVARIANCE UNCONDITIONAL
; CL is per-occasion (CL = THETA(1)*EXP(ETA(1) + IOVCL)); V/KA are BSV-only.
; Emitting CL/V/KA gives the per-(ID,OCC) individual-parameter reference that
; ferx's sdtab CL column is cross-checked against (issue #238). NONMEM writes
; the POSTHOC (EBE) CL per data record, so occasion-1 and occasion-2 rows of the
; same subject carry that occasion's kappa.
$TABLE ID TIME OCC CL V KA NOPRINT ONEHEADER FILE=sdtab_iov

NM-TRAN MESSAGES
 WARNINGS AND ERRORS (IF ANY) FOR PROBLEM    1
 (WARNING  2) NM-TRAN INFERS THAT THE DATA ARE POPULATION.
Note: Analytical 2nd Derivatives are constructed in FSUBS but are never used.
      You may insert $ABBR DERIV2=NO after the first $PROB to save FSUBS construction and compilation time

1NONLINEAR MIXED EFFECTS MODEL PROGRAM (NONMEM) VERSION 7.6.0 (nm760)
 ORIGINALLY DEVELOPED BY STUART BEAL, LEWIS SHEINER, AND ALISON BOECKMANN
 CURRENT DEVELOPERS ARE ROBERT BAUER, ICON DEVELOPMENT SOLUTIONS,
 AND ALISON BOECKMANN. IMPLEMENTATION, EFFICIENCY, AND STANDARDIZATION
 PERFORMED BY NOUS INFOSYSTEMS.
 PROBLEM NO.:         1
 Warfarin IOV (CL) - ferx-core cross-check (issue #101)
 TOT. NO. OF OBS RECS:      220
 TOT. NO. OF INDIVIDUALS:       10
 ONE COMPARTMENT MODEL WITH FIRST-ORDER ABSORPTION (ADVAN2)
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 #TBLN:      1
 #METH: First Order Conditional Estimation
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
 #TERM:
0MINIMIZATION SUCCESSFUL
 HOWEVER, PROBLEMS OCCURRED WITH THE MINIMIZATION.
 REGARD THE RESULTS OF THE ESTIMATION STEP CAREFULLY, AND ACCEPT THEM ONLY
 AFTER CHECKING THAT THE COVARIANCE STEP PRODUCES REASONABLE OUTPUT.
 NO. OF FUNCTION EVALUATIONS USED:      263
 NO. OF SIG. DIGITS IN FINAL EST.:  3.4

 ETABAR IS THE ARITHMETIC MEAN OF THE ETA-ESTIMATES,
 AND THE P-VALUE IS GIVEN FOR THE NULL HYPOTHESIS THAT THE TRUE MEAN IS 0.

 ETABAR:        -6.0808E-01  1.3386E-02 -9.9072E-01 -1.0544E-01  4.7467E-02
 SE:             7.6315E-02  3.2524E-02  7.6848E-02  4.0737E-02  3.7698E-02
 N:                      10          10          10          10          10

 P VAL.:         1.6290E-15  6.8065E-01  5.1773E-38  9.6471E-03  2.0798E-01

 ETASHRINKSD(%)  2.1101E+00  7.2950E+00  1.7368E+00  1.9327E+01  3.7816E+01
 ETASHRINKVR(%)  4.1756E+00  1.4058E+01  3.4434E+00  3.4919E+01  6.1332E+01
 EBVSHRINKSD(%)  2.3598E+00  6.9247E+00  2.2991E+00  2.7812E+01  2.7825E+01
 EBVSHRINKVR(%)  4.6639E+00  1.3370E+01  4.5454E+00  4.7889E+01  4.7908E+01
 RELATIVEINF(%)  0.0000E+00  8.6565E+01  9.5402E+01  0.0000E+00  0.0000E+00
 EPSSHRINKSD(%)  9.1002E+00
 EPSSHRINKVR(%)  1.7372E+01


 TOTAL DATA POINTS NORMALLY DISTRIBUTED (N):          220
 N*LOG(2PI) CONSTANT TO OBJECTIVE FUNCTION:    404.33295461005599
 OBJECTIVE FUNCTION VALUE WITHOUT CONSTANT:    205.09053792965955
 OBJECTIVE FUNCTION VALUE WITH CONSTANT:       609.42349253971554
 REPORTED OBJECTIVE FUNCTION DOES NOT CONTAIN CONSTANT

 TOTAL EFFECTIVE ETAS (NIND*NETA):                            50


 #TERE:
 Elapsed estimation  time in seconds:     0.39
 Elapsed covariance  time in seconds:     0.15
 Elapsed postprocess time in seconds:     0.02

 ********************                        FIRST ORDER CONDITIONAL ESTIMATION                      ********************
 #OBJT:**************                       MINIMUM VALUE OF OBJECTIVE FUNCTION                      ********************
 #OBJV:********************************************           205.091       *********************************************

 ********************                        FIRST ORDER CONDITIONAL ESTIMATION                      ********************
 ********************                             FINAL PARAMETER ESTIMATE                           ********************

 THETA - VECTOR OF FIXED EFFECTS PARAMETERS   *********
         TH 1      TH 2      TH 3
         3.15E-01  8.38E+00  2.64E+00

 OMEGA - COV MATRIX FOR RANDOM EFFECTS - ETAS  ********
         ETA1      ETA2      ETA3      ETA4      ETA5
 ETA1
+        4.47E-01
 ETA2
+        0.00E+00  1.25E-02
 ETA3
+        0.00E+00  0.00E+00  1.08E+00
 ETA4
+        0.00E+00  0.00E+00  0.00E+00  4.26E-02
 ETA5
+        0.00E+00  0.00E+00  0.00E+00  0.00E+00  4.26E-02

 SIGMA - COV MATRIX FOR RANDOM EFFECTS - EPSILONS  ****
         EPS1
 EPS1
+        3.71E-02

 OMEGA - CORR MATRIX FOR RANDOM EFFECTS - ETAS  *******
         ETA1      ETA2      ETA3      ETA4      ETA5
 ETA1
+        6.68E-01
 ETA2
+        0.00E+00  1.12E-01
 ETA3
+        0.00E+00  0.00E+00  1.04E+00
 ETA4
+        0.00E+00  0.00E+00  0.00E+00  2.06E-01
 ETA5
+        0.00E+00  0.00E+00  0.00E+00  0.00E+00  2.06E-01

 SIGMA - CORR MATRIX FOR RANDOM EFFECTS - EPSILONS  ***
         EPS1
 EPS1
+        1.93E-01

 ********************                        FIRST ORDER CONDITIONAL ESTIMATION                      ********************
 ********************                            STANDARD ERROR OF ESTIMATE                          ********************

 THETA - VECTOR OF FIXED EFFECTS PARAMETERS   *********
         TH 1      TH 2      TH 3
         3.12E-02  3.47E-01  6.45E-01

 OMEGA - COV MATRIX FOR RANDOM EFFECTS - ETAS  ********
         ETA1      ETA2      ETA3      ETA4      ETA5
 ETA1
+        1.22E-01
 ETA2
+       .........  5.79E-03
 ETA3
+       ......... .........  5.24E-01
 ETA4
+       ......... ......... .........  1.53E-02
 ETA5
+       ......... ......... ......... ......... .........

 SIGMA - COV MATRIX FOR RANDOM EFFECTS - EPSILONS  ****
         EPS1
 EPS1
+        1.22E-02

 OMEGA - CORR MATRIX FOR RANDOM EFFECTS - ETAS  *******
         ETA1      ETA2      ETA3      ETA4      ETA5
 ETA1
+        9.10E-02
 ETA2
+       .........  2.59E-02
 ETA3
+       ......... .........  2.52E-01
 ETA4
+       ......... ......... .........  3.70E-02
 ETA5
+       ......... ......... ......... ......... .........

 SIGMA - CORR MATRIX FOR RANDOM EFFECTS - EPSILONS  ***
         EPS1
 EPS1
+        3.17E-02
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 Elapsed finaloutput time in seconds:     0.01
 #CPUT: Total CPU Time in Seconds,        0.593
