Tue Oct  6 11:51:30 AM UTC 2026
$PROBLEM #1722 non-IOV FOCE at large sigma, estimated
$DATA warfarin_iov.csv IGNORE=@
$INPUT ID TIME DV EVID AMT CMT=DROP RATE MDV OCC
$SUBROUTINES ADVAN2 TRANS2
$PK
  CL = THETA(1)*EXP(ETA(1))
  V  = THETA(2)*EXP(ETA(2))
  KA = THETA(3)*EXP(ETA(3))
  S2 = V
$ERROR
  IPRED = F
  Y = IPRED*(1 + EPS(1))
$THETA (0, 0.2) (0, 10) (0, 1.5)
$OMEGA 0.09 0.04 0.30
$SIGMA 0.04
$ESTIMATION METHOD=1 MAXEVAL=9999 NSIG=3 SIGL=9 POSTHOC PRINT=1 NOABORT
$TABLE ID TIME CWRES ETA1 ETA2 ETA3 NOPRINT ONEHEADER FORMAT=s1PE15.8 FILE=sdtab

NM-TRAN MESSAGES
 WARNINGS AND ERRORS (IF ANY) FOR PROBLEM    1
 (WARNING  2) NM-TRAN INFERS THAT THE DATA ARE POPULATION.
Note: Analytical 2nd Derivatives are constructed in FSUBS but are never used.
      You may insert $ABBR DERIV2=NO after the first $PROB to save FSUBS construction and compilation time

1NONLINEAR MIXED EFFECTS MODEL PROGRAM (NONMEM) VERSION 7.6.0 (nm760)
 ORIGINALLY DEVELOPED BY STUART BEAL, LEWIS SHEINER, AND ALISON BOECKMANN
 CURRENT DEVELOPERS ARE ROBERT BAUER, ICON DEVELOPMENT SOLUTIONS,
 AND ALISON BOECKMANN. IMPLEMENTATION, EFFICIENCY, AND STANDARDIZATION
 PERFORMED BY NOUS INFOSYSTEMS.
 PROBLEM NO.:         1
 #1722 non-IOV FOCE at large sigma, estimated
 TOT. NO. OF OBS RECS:      220
 TOT. NO. OF INDIVIDUALS:       10
 ONE COMPARTMENT MODEL WITH FIRST-ORDER ABSORPTION (ADVAN2)
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 #TBLN:      1
 #METH: First Order Conditional Estimation
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
 #TERM:
0MINIMIZATION SUCCESSFUL
 NO. OF FUNCTION EVALUATIONS USED:      176
 NO. OF SIG. DIGITS IN FINAL EST.:  3.6

 ETABAR IS THE ARITHMETIC MEAN OF THE ETA-ESTIMATES,
 AND THE P-VALUE IS GIVEN FOR THE NULL HYPOTHESIS THAT THE TRUE MEAN IS 0.

 ETABAR:         1.4691E-01 -1.8009E-02 -5.5202E-02
 SE:             7.4713E-02  2.1532E-02  2.2811E-02
 N:                      10          10          10

 P VAL.:         4.9259E-02  4.0293E-01  1.5521E-02

 ETASHRINKSD(%)  3.5409E+00  2.1846E+01  4.0521E+01
 ETASHRINKVR(%)  6.9565E+00  3.8920E+01  6.4622E+01
 EBVSHRINKSD(%)  2.1152E+00  2.2467E+01  4.0794E+01
 EBVSHRINKVR(%)  4.1857E+00  3.9887E+01  6.4946E+01
 RELATIVEINF(%)  9.5454E+01  5.2504E+01  3.0639E+01
 EPSSHRINKSD(%)  4.4046E+00
 EPSSHRINKVR(%)  8.6152E+00


 TOTAL DATA POINTS NORMALLY DISTRIBUTED (N):          220
 N*LOG(2PI) CONSTANT TO OBJECTIVE FUNCTION:    404.33295461005599
 OBJECTIVE FUNCTION VALUE WITHOUT CONSTANT:    390.91305651859278
 OBJECTIVE FUNCTION VALUE WITH CONSTANT:       795.24601112864877
 REPORTED OBJECTIVE FUNCTION DOES NOT CONTAIN CONSTANT

 TOTAL EFFECTIVE ETAS (NIND*NETA):                            30


 #TERE:
 Elapsed estimation  time in seconds:     0.15
 Elapsed postprocess time in seconds:     0.02

 ********************                        FIRST ORDER CONDITIONAL ESTIMATION                      ********************
 #OBJT:**************                       MINIMUM VALUE OF OBJECTIVE FUNCTION                      ********************
 #OBJV:********************************************           390.913       *********************************************

 ********************                        FIRST ORDER CONDITIONAL ESTIMATION                      ********************
 ********************                             FINAL PARAMETER ESTIMATE                           ********************

 THETA - VECTOR OF FIXED EFFECTS PARAMETERS   *********
         TH 1      TH 2      TH 3
         1.44E-01  8.84E+00  1.23E+00

 OMEGA - COV MATRIX FOR RANDOM EFFECTS - ETAS  ********
         ETA1      ETA2      ETA3
 ETA1
+        8.32E-02
 ETA2
+        0.00E+00  8.12E-03
 ETA3
+        0.00E+00  0.00E+00  2.33E-02

 SIGMA - COV MATRIX FOR RANDOM EFFECTS - EPSILONS  ****
         EPS1
 EPS1
+        4.50E-02

 OMEGA - CORR MATRIX FOR RANDOM EFFECTS - ETAS  *******
         ETA1      ETA2      ETA3
 ETA1
+        2.88E-01
 ETA2
+        0.00E+00  9.01E-02
 ETA3
+        0.00E+00  0.00E+00  1.53E-01

 SIGMA - CORR MATRIX FOR RANDOM EFFECTS - EPSILONS  ***
         EPS1
 EPS1
+        2.12E-01
 Elapsed finaloutput time in seconds:     0.00
 #CPUT: Total CPU Time in Seconds,        0.200
