Sun Jun 28 01:11:11 PM UTC 2026
$PROBLEM Biphasic Freijer & Post inverse-Gaussian absorption -- NONMEM anchor for ferx FR1*igd()+FR2*igd() [#388]
; Reference fit for ferx's pathway-fraction mechanism: two inverse-Gaussian
; absorption pathways feeding a 1-cpt central compartment, split by a dose
; fraction FR1 / (1-FR1) -- the Freijer & Post (1997) BIPHASIC form. Mirrors
; examples/biphasic_igd_absorption.ferx and nonmem_anchor/freijer_ig.ctl.
;
; The dataset biphasic_ig_oral.csv is simulated FROM this biphasic model
; (nonmem_anchor/simulate_biphasic_ig_data.py, same truths), so unlike the
; single-IG anchor this is a matched (well-specified) fit: ferx and NONMEM should
; agree on OFV/THETA AND both recover the data-generating values.
;
; Identifiability: the two pathways are exchangeable (pathway 1 <-> 2 with
; FR1 <-> 1-FR1). The MAT1 < MAT2 bounds below (fast vs slow) break that label
; symmetry; keep the same convention in the ferx fit when comparing.

$INPUT ID TIME DV AMT EVID CMT MDV
$DATA biphasic_ig_oral.csv IGNORE=@

$SUBROUTINES ADVAN13 TOL=9
$MODEL
  COMP=(DEPOT,DEFDOSE)     ; 1 = inert dose carrier (F1=0); IG sum feeds central
  COMP=(CENTRAL,DEFOBS)    ; 2 = central (amount; concentration = A(2)/V)

$PK
  CL    = THETA(1)*EXP(ETA(1))
  V     = THETA(2)*EXP(ETA(2))
  FR1   = THETA(3)         ; fraction of dose through the fast pathway
  MAT1  = THETA(4)         ; fast-pathway mean absorption time (h)
  MAT2  = THETA(5)         ; slow-pathway mean absorption time (h)
  CV21 = THETA(6)         ; fast-pathway relative dispersion (Var/mean^2) = ferx CV2_1
  CV22 = THETA(7)         ; slow-pathway relative dispersion             = ferx CV2_2

  FR2 = 1.0 - FR1
  K20 = CL/V
  PI  = 3.14159265358979312

  ; PODO (last oral dose amount) and TDOS (its time) are NOT reserved variables --
  ; capture them at the dose record; NONMEM carries them forward for $DES to read.
  IF (AMT.GT.0.0.AND.CMT.EQ.1) PODO = AMT
  IF (AMT.GT.0.0.AND.CMT.EQ.1) TDOS = TIME
  ; F1=0: no bolus; PODO drives the two IG inputs in $DES (ferx igd() convention --
  ; each pathway's integral R_in = FRi*dose, so the total delivered is the dose).
  F1  = 0.0

$DES
  ; Time after the most recent dose (TDOS captured in $PK); = T here (dose at t=0).
  TAD = T - TDOS
  IF (TAD.LE.1.0E-10) TAD = 1.0E-10
  ; Each pathway: IGi = PODO * sqrt(MATi/(2*pi*CV2i*tad^3)) * exp(-(tad-MATi)^2/(2*CV2i*MATi*tad))
  AG1 = -(TAD - MAT1)**2 / (2.0*CV21*MAT1*TAD)
  IG1 = PODO*SQRT(MAT1/(2.0*PI*CV21*TAD**3))*EXP(AG1)
  AG2 = -(TAD - MAT2)**2 / (2.0*CV22*MAT2*TAD)
  IG2 = PODO*SQRT(MAT2/(2.0*PI*CV22*TAD**3))*EXP(AG2)
  RIN = FR1*IG1 + FR2*IG2        ; biphasic input rate (dose split FR1 / 1-FR1)
  DADT(1) = 0.0                  ; depot is an inert dose carrier
  DADT(2) = RIN - K20*A(2)       ; biphasic IG input straight into central

$ERROR
  IPRED = A(2)/V                 ; central concentration (mg/L)
  Y = IPRED*(1.0 + EPS(1))       ; proportional residual error

$THETA
  (0.1,   5.0,  100)   ; 1 CL    (L/h)
  (5.0,   50.0, 500)   ; 2 V     (L)
  (0.001, 0.6,  0.999) ; 3 FR1         fast-pathway fraction
  (0.05,  0.5,  2.0)   ; 4 MAT1  (h)   fast pathway (bounded < MAT2 to break label symmetry)
  (2.0,   4.0,  24)    ; 5 MAT2  (h)   slow pathway
  (0.001, 0.2,  10)    ; 6 CV21       fast-pathway dispersion
  (0.001, 0.5,  10)    ; 7 CV22       slow-pathway dispersion

$OMEGA
  0.09    ; IIV CL
  0.09    ; IIV V

$SIGMA
  0.0225  ; proportional residual variance (0.15^2)

$ESTIMATION METHOD=1 INTER MAXEVAL=9999 PRINT=5 NOABORT
$COVARIANCE
$TABLE ID TIME DV IPRED CWRES MDV NOPRINT ONEHEADER FILE=biphasic_ig.tab

NM-TRAN MESSAGES
 WARNINGS AND ERRORS (IF ANY) FOR PROBLEM    1
 (WARNING  2) NM-TRAN INFERS THAT THE DATA ARE POPULATION.
Note: Analytical 2nd Derivatives are constructed in FSUBS but are never used.
      You may insert $ABBR DERIV2=NO after the first $PROB to save FSUBS construction and compilation time

1NONLINEAR MIXED EFFECTS MODEL PROGRAM (NONMEM) VERSION 7.6.0 (nm760)
 ORIGINALLY DEVELOPED BY STUART BEAL, LEWIS SHEINER, AND ALISON BOECKMANN
 CURRENT DEVELOPERS ARE ROBERT BAUER, ICON DEVELOPMENT SOLUTIONS,
 AND ALISON BOECKMANN. IMPLEMENTATION, EFFICIENCY, AND STANDARDIZATION
 PERFORMED BY NOUS INFOSYSTEMS.
 PROBLEM NO.:         1
 Biphasic Freijer & Post inverse-Gaussian absorption -- NONMEM anchor for
 TOT. NO. OF OBS RECS:      240
 TOT. NO. OF INDIVIDUALS:       20
 GENERAL NONLINEAR KINETICS MODEL WITH STIFF/NONSTIFF EQUATIONS (LSODA, ADVAN13)
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 #TBLN:      1
 #METH: First Order Conditional Estimation with Interaction
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
 #TERM:
0MINIMIZATION SUCCESSFUL
 NO. OF FUNCTION EVALUATIONS USED:      275
 NO. OF SIG. DIGITS IN FINAL EST.:  3.2

 ETABAR IS THE ARITHMETIC MEAN OF THE ETA-ESTIMATES,
 AND THE P-VALUE IS GIVEN FOR THE NULL HYPOTHESIS THAT THE TRUE MEAN IS 0.

 ETABAR:         2.4962E-03 -2.3506E-03
 SE:             4.6951E-02  4.4549E-02
 N:                      20          20

 P VAL.:         9.5760E-01  9.5792E-01

 ETASHRINKSD(%)  4.1662E+00  3.8112E+00
 ETASHRINKVR(%)  8.1589E+00  7.4772E+00
 EBVSHRINKSD(%)  3.7839E+00  3.6775E+00
 EBVSHRINKVR(%)  7.4245E+00  7.2198E+00
 RELATIVEINF(%)  9.2565E+01  9.2769E+01
 EPSSHRINKSD(%)  7.6052E+00
 EPSSHRINKVR(%)  1.4632E+01


 TOTAL DATA POINTS NORMALLY DISTRIBUTED (N):          240
 N*LOG(2PI) CONSTANT TO OBJECTIVE FUNCTION:    441.09049593824290
 OBJECTIVE FUNCTION VALUE WITHOUT CONSTANT:   -754.21130706868632
 OBJECTIVE FUNCTION VALUE WITH CONSTANT:      -313.12081113044343
 REPORTED OBJECTIVE FUNCTION DOES NOT CONTAIN CONSTANT

 TOTAL EFFECTIVE ETAS (NIND*NETA):                            40


 #TERE:
 Elapsed estimation  time in seconds:    12.19
 Elapsed covariance  time in seconds:    16.11
 Elapsed postprocess time in seconds:     0.13

 ********************               FIRST ORDER CONDITIONAL ESTIMATION WITH INTERACTION              ********************
 #OBJT:**************                       MINIMUM VALUE OF OBJECTIVE FUNCTION                      ********************
 #OBJV:********************************************          -754.211       *********************************************

 ********************               FIRST ORDER CONDITIONAL ESTIMATION WITH INTERACTION              ********************
 ********************                             FINAL PARAMETER ESTIMATE                           ********************

 THETA - VECTOR OF FIXED EFFECTS PARAMETERS   *********
         TH 1      TH 2      TH 3      TH 4      TH 5      TH 6      TH 7
         5.37E+00  5.69E+01  6.44E-01  5.28E-01  4.12E+00  2.19E-01  3.45E-01

 OMEGA - COV MATRIX FOR RANDOM EFFECTS - ETAS  ********
         ETA1      ETA2
 ETA1
+        4.80E-02
 ETA2
+        0.00E+00  4.29E-02

 SIGMA - COV MATRIX FOR RANDOM EFFECTS - EPSILONS  ****
         EPS1
 EPS1
+        2.49E-02

 OMEGA - CORR MATRIX FOR RANDOM EFFECTS - ETAS  *******
         ETA1      ETA2
 ETA1
+        2.19E-01
 ETA2
+        0.00E+00  2.07E-01

 SIGMA - CORR MATRIX FOR RANDOM EFFECTS - EPSILONS  ***
         EPS1
 EPS1
+        1.58E-01

 ********************               FIRST ORDER CONDITIONAL ESTIMATION WITH INTERACTION              ********************
 ********************                            STANDARD ERROR OF ESTIMATE                          ********************

 THETA - VECTOR OF FIXED EFFECTS PARAMETERS   *********
         TH 1      TH 2      TH 3      TH 4      TH 5      TH 6      TH 7
         2.67E-01  4.71E+00  4.61E-02  2.50E-02  4.98E-01  2.47E-02  1.75E-01

 OMEGA - COV MATRIX FOR RANDOM EFFECTS - ETAS  ********
         ETA1      ETA2
 ETA1
+        1.63E-02
 ETA2
+       .........  1.41E-02

 SIGMA - COV MATRIX FOR RANDOM EFFECTS - EPSILONS  ****
         EPS1
 EPS1
+        2.13E-03

 OMEGA - CORR MATRIX FOR RANDOM EFFECTS - ETAS  *******
         ETA1      ETA2
 ETA1
+        3.73E-02
 ETA2
+       .........  3.41E-02

 SIGMA - CORR MATRIX FOR RANDOM EFFECTS - EPSILONS  ***
         EPS1
 EPS1
+        6.75E-03

 ********************               FIRST ORDER CONDITIONAL ESTIMATION WITH INTERACTION              ********************
 ********************                          COVARIANCE MATRIX OF ESTIMATE                         ********************

            TH 1      TH 2      TH 3      TH 4      TH 5      TH 6      TH 7      OM11      OM12      OM22      SG11
 TH 1
+        7.13E-02
 TH 2
+        7.45E-02  2.22E+01
 TH 3
+       -2.83E-04  1.75E-01  2.12E-03
 TH 4
+       -1.42E-03  3.80E-02  6.64E-04  6.25E-04
 TH 5
+       -1.76E-02 -1.74E+00 -1.27E-02  6.58E-05  2.48E-01
 TH 6
+       -1.66E-03  3.28E-02  5.55E-04  6.03E-04  1.30E-04  6.11E-04
 TH 7
+        1.92E-03 -6.75E-01 -7.33E-03 -2.02E-03  6.10E-02 -1.74E-03  3.06E-02
 OM11
+       -7.87E-04  1.78E-02  2.82E-04  1.27E-04 -1.87E-03  1.24E-04 -1.47E-03  2.67E-04
 OM12
+       ......... ......... ......... ......... ......... ......... ......... ......... .........
 OM22
+        7.04E-04 -3.40E-02 -2.23E-04 -1.18E-04  3.02E-03 -1.13E-04  1.17E-03 -6.68E-05 .........  2.00E-04
 SG11
+       -1.58E-05 -6.98E-04 -3.87E-06  1.30E-06  2.21E-04  2.58E-06 -3.69E-06 -1.09E-06 ......... -1.66E-06  4.55E-06

 ********************               FIRST ORDER CONDITIONAL ESTIMATION WITH INTERACTION              ********************
 ********************                          CORRELATION MATRIX OF ESTIMATE                        ********************

            TH 1      TH 2      TH 3      TH 4      TH 5      TH 6      TH 7      OM11      OM12      OM22      SG11
 TH 1
+        2.67E-01
 TH 2
+        5.93E-02  4.71E+00
 TH 3
+       -2.30E-02  8.07E-01  4.61E-02
 TH 4
+       -2.12E-01  3.23E-01  5.77E-01  2.50E-02
 TH 5
+       -1.32E-01 -7.44E-01 -5.56E-01  5.29E-03  4.98E-01
 TH 6
+       -2.52E-01  2.82E-01  4.87E-01  9.76E-01  1.05E-02  2.47E-02
 TH 7
+        4.11E-02 -8.19E-01 -9.10E-01 -4.63E-01  7.01E-01 -4.04E-01  1.75E-01
 OM11
+       -1.81E-01  2.32E-01  3.74E-01  3.10E-01 -2.31E-01  3.07E-01 -5.14E-01  1.63E-02
 OM12
+       ......... ......... ......... ......... ......... ......... ......... ......... .........
 OM22
+        1.86E-01 -5.11E-01 -3.42E-01 -3.33E-01  4.29E-01 -3.22E-01  4.74E-01 -2.89E-01 .........  1.41E-02
 SG11
+       -2.77E-02 -6.95E-02 -3.94E-02  2.44E-02  2.08E-01  4.90E-02 -9.90E-03 -3.12E-02 ......... -5.50E-02  2.13E-03
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 Elapsed finaloutput time in seconds:     0.01
 #CPUT: Total CPU Time in Seconds,       28.535
