Tue Jun 16 05:13:32 PM UTC 2026
$PROBLEM    Freijer & Post inverse-Gaussian absorption -- NONMEM
;           anchor for ferx igd() [#347]
; Reference fit for ferx's built-in igd(mat, cv2) input-rate function.

; Inverse-Gaussian density absorption straight into a 1-cpt central compartment.

;

; NOTE on the data: transit_oral.csv was simulated from a TRANSIT model, so this

; IG fit is mildly mis-specified (IG approximates the delayed-absorption shape).

; That is still a valid IMPLEMENTATION anchor: ferx-igd and NONMEM-igd should

; return the same OFV/THETA on identical data even when neither is the true DGP.

; For a matched IG-truth dataset, see README.md (regenerate from an IG model).
$INPUT      ID TIME DV AMT EVID CMT MDV
$DATA      transit_oral.csv IGNORE=@
$SUBROUTINE ADVAN13 TOL=9
$MODEL      COMP=(DEPOT,DEFDOSE) ; 1=inert dose carrier (F1=0); IG feeds central directly
            COMP=(CENTRAL,DEFOBS) ; 2=central (amount; concentration=A(2)/V)
$PK
  CL  = THETA(1)*EXP(ETA(1))
  V   = THETA(2)*EXP(ETA(2))
  MAT = THETA(3)           ; mean absorption time (h)
  CV2 = THETA(4)           ; relative dispersion (Var/mean^2) of the absorption time

  K20 = CL/V
  PI  = 3.14159265358979312

  ; PODO (last oral dose amount) and TDOS (its time) are NOT reserved variables --
  ; capture them at the dose record; NONMEM carries them forward for $DES to read.
  IF (AMT.GT.0.0.AND.CMT.EQ.1) PODO = AMT
  IF (AMT.GT.0.0.AND.CMT.EQ.1) TDOS = TIME
  ; F1=0: no bolus; PODO drives the IG input in $DES (ferx igd() convention --
  ; integral R_in = dose, fed straight into central). With bioavailability, BIO*PODO.
  F1  = 0.0

$DES
  ; Time after the most recent dose (TDOS captured in $PK); = T here (dose at t=0).
  TAD = T - TDOS
  IF (TAD.LE.1.0E-10) TAD = 1.0E-10
  ; R_in(tad) = PODO * sqrt(MAT/(2*pi*CV2*tad^3)) * exp(-(tad-MAT)^2/(2*CV2*MAT*tad))
  ARG = -(TAD - MAT)**2 / (2.0*CV2*MAT*TAD)
  RIN = PODO*SQRT(MAT/(2.0*PI*CV2*TAD**3))*EXP(ARG)
  DADT(1) = 0.0                  ; depot is an inert dose carrier
  DADT(2) = RIN - K20*A(2)       ; IG input straight into central

$ERROR
  IPRED = A(2)/V                 ; central concentration (mg/L)
  Y = IPRED*(1.0 + EPS(1))       ; proportional residual error

$THETA  (0.1,5.0,100) ; 1 CL   (L/h)
 (5.0,50.0,500) ; 2 V    (L)
 (0.05,2.0,24) ; 3 MAT  (h)   mean absorption time
 (0.001,0.3,10) ; 4 CV2        relative dispersion
$OMEGA  0.09  ;     IIV CL
 0.09  ;      IIV V
$SIGMA  0.0225  ; proportional residual variance (0.15^2)
$ESTIMATION METHOD=1 INTER MAXEVAL=9999 PRINT=5 NOABORT
$COVARIANCE
$TABLE      ID TIME DV IPRED CWRES MDV NOPRINT ONEHEADER FILE=igd.tab

NM-TRAN MESSAGES
 WARNINGS AND ERRORS (IF ANY) FOR PROBLEM    1
 (WARNING  2) NM-TRAN INFERS THAT THE DATA ARE POPULATION.
Note: Analytical 2nd Derivatives are constructed in FSUBS but are never used.
      You may insert $ABBR DERIV2=NO after the first $PROB to save FSUBS construction and compilation time

1NONLINEAR MIXED EFFECTS MODEL PROGRAM (NONMEM) VERSION 7.6.0 (nm760)
 ORIGINALLY DEVELOPED BY STUART BEAL, LEWIS SHEINER, AND ALISON BOECKMANN
 CURRENT DEVELOPERS ARE ROBERT BAUER, ICON DEVELOPMENT SOLUTIONS,
 AND ALISON BOECKMANN. IMPLEMENTATION, EFFICIENCY, AND STANDARDIZATION
 PERFORMED BY NOUS INFOSYSTEMS.
 PROBLEM NO.:         1
 Freijer & Post inverse-Gaussian absorption -- NONMEM
 TOT. NO. OF OBS RECS:      240
 TOT. NO. OF INDIVIDUALS:       20
 GENERAL NONLINEAR KINETICS MODEL WITH STIFF/NONSTIFF EQUATIONS (LSODA, ADVAN13)
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 #TBLN:      1
 #METH: First Order Conditional Estimation with Interaction
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
 #TERM:
0MINIMIZATION SUCCESSFUL
 NO. OF FUNCTION EVALUATIONS USED:      390
 NO. OF SIG. DIGITS IN FINAL EST.:  3.2

 ETABAR IS THE ARITHMETIC MEAN OF THE ETA-ESTIMATES,
 AND THE P-VALUE IS GIVEN FOR THE NULL HYPOTHESIS THAT THE TRUE MEAN IS 0.

 ETABAR:         1.4817E-03 -1.6053E-03
 SE:             4.1267E-02  4.5479E-02
 N:                      20          20

 P VAL.:         9.7136E-01  9.7184E-01

 ETASHRINKSD(%)  7.8277E+00  7.5676E+00
 ETASHRINKVR(%)  1.5043E+01  1.4562E+01
 EBVSHRINKSD(%)  7.5178E+00  7.1592E+00
 EBVSHRINKVR(%)  1.4470E+01  1.3806E+01
 RELATIVEINF(%)  8.5450E+01  8.6114E+01
 EPSSHRINKSD(%)  6.5873E+00
 EPSSHRINKVR(%)  1.2741E+01


 TOTAL DATA POINTS NORMALLY DISTRIBUTED (N):          240
 N*LOG(2PI) CONSTANT TO OBJECTIVE FUNCTION:    441.09049593824290
 OBJECTIVE FUNCTION VALUE WITHOUT CONSTANT:   -899.38044413907187
 OBJECTIVE FUNCTION VALUE WITH CONSTANT:      -458.28994820082897
 REPORTED OBJECTIVE FUNCTION DOES NOT CONTAIN CONSTANT

 TOTAL EFFECTIVE ETAS (NIND*NETA):                            40


 #TERE:
 Elapsed estimation  time in seconds:    12.32
 Elapsed covariance  time in seconds:     4.87
 Elapsed postprocess time in seconds:     0.10

 ********************               FIRST ORDER CONDITIONAL ESTIMATION WITH INTERACTION              ********************
 #OBJT:**************                       MINIMUM VALUE OF OBJECTIVE FUNCTION                      ********************
 #OBJV:********************************************          -899.380       *********************************************

 ********************               FIRST ORDER CONDITIONAL ESTIMATION WITH INTERACTION              ********************
 ********************                             FINAL PARAMETER ESTIMATE                           ********************

 THETA - VECTOR OF FIXED EFFECTS PARAMETERS   *********
         TH 1      TH 2      TH 3      TH 4
         5.61E+00  3.40E+01  6.07E+00  1.87E+00

 OMEGA - COV MATRIX FOR RANDOM EFFECTS - ETAS  ********
         ETA1      ETA2
 ETA1
+        4.01E-02
 ETA2
+        0.00E+00  4.84E-02

 SIGMA - COV MATRIX FOR RANDOM EFFECTS - EPSILONS  ****
         EPS1
 EPS1
+        5.83E-02

 OMEGA - CORR MATRIX FOR RANDOM EFFECTS - ETAS  *******
         ETA1      ETA2
 ETA1
+        2.00E-01
 ETA2
+        0.00E+00  2.20E-01

 SIGMA - CORR MATRIX FOR RANDOM EFFECTS - EPSILONS  ***
         EPS1
 EPS1
+        2.41E-01

 ********************               FIRST ORDER CONDITIONAL ESTIMATION WITH INTERACTION              ********************
 ********************                            STANDARD ERROR OF ESTIMATE                          ********************

 THETA - VECTOR OF FIXED EFFECTS PARAMETERS   *********
         TH 1      TH 2      TH 3      TH 4
         2.79E-01  4.06E+00  1.76E+00  5.42E-01

 OMEGA - COV MATRIX FOR RANDOM EFFECTS - ETAS  ********
         ETA1      ETA2
 ETA1
+        1.41E-02
 ETA2
+       .........  1.76E-02

 SIGMA - COV MATRIX FOR RANDOM EFFECTS - EPSILONS  ****
         EPS1
 EPS1
+        3.26E-03

 OMEGA - CORR MATRIX FOR RANDOM EFFECTS - ETAS  *******
         ETA1      ETA2
 ETA1
+        3.52E-02
 ETA2
+       .........  4.00E-02

 SIGMA - CORR MATRIX FOR RANDOM EFFECTS - EPSILONS  ***
         EPS1
 EPS1
+        6.74E-03

 ********************               FIRST ORDER CONDITIONAL ESTIMATION WITH INTERACTION              ********************
 ********************                          COVARIANCE MATRIX OF ESTIMATE                         ********************

            TH 1      TH 2      TH 3      TH 4      OM11      OM12      OM22      SG11
 TH 1
+        7.76E-02
 TH 2
+        3.32E-01  1.65E+01
 TH 3
+       -1.58E-01 -6.58E+00  3.09E+00
 TH 4
+       -4.99E-02 -2.02E+00  9.52E-01  2.94E-01
 OM11
+       -4.27E-04 -1.41E-02  5.68E-03  1.78E-03  1.99E-04
 OM12
+       ......... ......... ......... ......... ......... .........
 OM22
+        1.94E-03  5.25E-02 -2.47E-02 -7.64E-03 -7.87E-05 .........  3.10E-04
 SG11
+       -9.14E-05 -2.83E-04  2.28E-04  7.84E-05 -4.15E-06 ......... -1.35E-05  1.06E-05

 ********************               FIRST ORDER CONDITIONAL ESTIMATION WITH INTERACTION              ********************
 ********************                          CORRELATION MATRIX OF ESTIMATE                        ********************

            TH 1      TH 2      TH 3      TH 4      OM11      OM12      OM22      SG11
 TH 1
+        2.79E-01
 TH 2
+        2.93E-01  4.06E+00
 TH 3
+       -3.22E-01 -9.22E-01  1.76E+00
 TH 4
+       -3.30E-01 -9.16E-01  1.00E+00  5.42E-01
 OM11
+       -1.09E-01 -2.45E-01  2.29E-01  2.34E-01  1.41E-02
 OM12
+       ......... ......... ......... ......... ......... .........
 OM22
+        3.95E-01  7.34E-01 -7.99E-01 -8.00E-01 -3.17E-01 .........  1.76E-02
 SG11
+       -1.01E-01 -2.14E-02  3.99E-02  4.44E-02 -9.04E-02 ......... -2.36E-01  3.26E-03
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 Elapsed finaloutput time in seconds:     0.01
 #CPUT: Total CPU Time in Seconds,       17.354
