Fri Jul 10 06:00:55 PM UTC 2026
$PROBLEM In-domain inverse-Gaussian absorption -- NONMEM FOCEI anchor for ferx analytic pk one_cpt_ig (#790)
$INPUT ID TIME DV AMT EVID CMT MDV
$DATA ig_indomain.csv IGNORE=@

$SUBROUTINES ADVAN13 TOL=9
$MODEL
  COMP=(DEPOT,DEFDOSE)
  COMP=(CENTRAL,DEFOBS)

$PK
  CL  = THETA(1)*EXP(ETA(1))
  V   = THETA(2)*EXP(ETA(2))
  MAT = THETA(3)
  CV2 = THETA(4)
  K20 = CL/V
  PI  = 3.14159265358979312
  IF (AMT.GT.0.0.AND.CMT.EQ.1) PODO = AMT
  IF (AMT.GT.0.0.AND.CMT.EQ.1) TDOS = TIME
  F1  = 0.0

$DES
  TAD = T - TDOS
  IF (TAD.LE.1.0E-10) TAD = 1.0E-10
  ARG = -(TAD - MAT)**2 / (2.0*CV2*MAT*TAD)
  RIN = PODO*SQRT(MAT/(2.0*PI*CV2*TAD**3))*EXP(ARG)
  DADT(1) = 0.0
  DADT(2) = RIN - K20*A(2)

$ERROR
  IPRED = A(2)/V
  Y = IPRED*(1.0 + EPS(1))

$THETA
  (0.1,  4.5,  100)   ; 1 CL
  (5.0,  45.0, 500)   ; 2 V
  (0.05, 2.5,  24)    ; 3 MAT
  (0.001,0.4,  10)    ; 4 CV2
$OMEGA
  0.09    ; IIV CL
  0.09    ; IIV V
$SIGMA
  0.0225  ; proportional residual variance
$ESTIMATION METHOD=1 INTER MAXEVAL=9999 PRINT=5 NSIG=3 SIGL=9 NOABORT
$COVARIANCE

NM-TRAN MESSAGES
 WARNINGS AND ERRORS (IF ANY) FOR PROBLEM    1
 (WARNING  2) NM-TRAN INFERS THAT THE DATA ARE POPULATION.
Note: Analytical 2nd Derivatives are constructed in FSUBS but are never used.
      You may insert $ABBR DERIV2=NO after the first $PROB to save FSUBS construction and compilation time

1NONLINEAR MIXED EFFECTS MODEL PROGRAM (NONMEM) VERSION 7.6.0 (nm760)
 ORIGINALLY DEVELOPED BY STUART BEAL, LEWIS SHEINER, AND ALISON BOECKMANN
 CURRENT DEVELOPERS ARE ROBERT BAUER, ICON DEVELOPMENT SOLUTIONS,
 AND ALISON BOECKMANN. IMPLEMENTATION, EFFICIENCY, AND STANDARDIZATION
 PERFORMED BY NOUS INFOSYSTEMS.
 PROBLEM NO.:         1
 In-domain inverse-Gaussian absorption -- NONMEM FOCEI anchor for ferx an
 TOT. NO. OF OBS RECS:      240
 TOT. NO. OF INDIVIDUALS:       20
 GENERAL NONLINEAR KINETICS MODEL WITH STIFF/NONSTIFF EQUATIONS (LSODA, ADVAN13)
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 #TBLN:      1
 #METH: First Order Conditional Estimation with Interaction
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
 #TERM:
0MINIMIZATION SUCCESSFUL
 NO. OF FUNCTION EVALUATIONS USED:      157
 NO. OF SIG. DIGITS IN FINAL EST.:  3.1

 ETABAR IS THE ARITHMETIC MEAN OF THE ETA-ESTIMATES,
 AND THE P-VALUE IS GIVEN FOR THE NULL HYPOTHESIS THAT THE TRUE MEAN IS 0.

 ETABAR:         1.9480E-03 -1.9106E-03
 SE:             3.8282E-02  7.7695E-02
 N:                      20          20

 P VAL.:         9.5942E-01  9.8038E-01

 ETASHRINKSD(%)  4.8121E+00  1.3253E+00
 ETASHRINKVR(%)  9.3927E+00  2.6330E+00
 EBVSHRINKSD(%)  4.7118E+00  1.1794E+00
 EBVSHRINKVR(%)  9.2016E+00  2.3449E+00
 RELATIVEINF(%)  9.0782E+01  9.7637E+01
 EPSSHRINKSD(%)  7.7879E+00
 EPSSHRINKVR(%)  1.4969E+01


 TOTAL DATA POINTS NORMALLY DISTRIBUTED (N):          240
 N*LOG(2PI) CONSTANT TO OBJECTIVE FUNCTION:    441.09049593824290
 OBJECTIVE FUNCTION VALUE WITHOUT CONSTANT:   -1303.6393367130017
 OBJECTIVE FUNCTION VALUE WITH CONSTANT:      -862.54884077475890
 REPORTED OBJECTIVE FUNCTION DOES NOT CONTAIN CONSTANT

 TOTAL EFFECTIVE ETAS (NIND*NETA):                            40


 #TERE:
 Elapsed estimation  time in seconds:     7.50
 Elapsed covariance  time in seconds:     7.65
 Elapsed postprocess time in seconds:     0.00

 ********************               FIRST ORDER CONDITIONAL ESTIMATION WITH INTERACTION              ********************
 #OBJT:**************                       MINIMUM VALUE OF OBJECTIVE FUNCTION                      ********************
 #OBJV:********************************************         -1303.639       *********************************************

 ********************               FIRST ORDER CONDITIONAL ESTIMATION WITH INTERACTION              ********************
 ********************                             FINAL PARAMETER ESTIMATE                           ********************

 THETA - VECTOR OF FIXED EFFECTS PARAMETERS   *********
         TH 1      TH 2      TH 3      TH 4
         5.31E+00  4.82E+01  1.99E+00  2.98E-01

 OMEGA - COV MATRIX FOR RANDOM EFFECTS - ETAS  ********
         ETA1      ETA2
 ETA1
+        3.24E-02
 ETA2
+        0.00E+00  1.24E-01

 SIGMA - COV MATRIX FOR RANDOM EFFECTS - EPSILONS  ****
         EPS1
 EPS1
+        2.41E-02

 OMEGA - CORR MATRIX FOR RANDOM EFFECTS - ETAS  *******
         ETA1      ETA2
 ETA1
+        1.80E-01
 ETA2
+        0.00E+00  3.52E-01

 SIGMA - CORR MATRIX FOR RANDOM EFFECTS - EPSILONS  ***
         EPS1
 EPS1
+        1.55E-01

 ********************               FIRST ORDER CONDITIONAL ESTIMATION WITH INTERACTION              ********************
 ********************                            STANDARD ERROR OF ESTIMATE                          ********************

 THETA - VECTOR OF FIXED EFFECTS PARAMETERS   *********
         TH 1      TH 2      TH 3      TH 4
         2.21E-01  4.08E+00  2.44E-02  4.61E-03

 OMEGA - COV MATRIX FOR RANDOM EFFECTS - ETAS  ********
         ETA1      ETA2
 ETA1
+        7.86E-03
 ETA2
+       .........  4.13E-02

 SIGMA - COV MATRIX FOR RANDOM EFFECTS - EPSILONS  ****
         EPS1
 EPS1
+        2.45E-03

 OMEGA - CORR MATRIX FOR RANDOM EFFECTS - ETAS  *******
         ETA1      ETA2
 ETA1
+        2.19E-02
 ETA2
+       .........  5.87E-02

 SIGMA - CORR MATRIX FOR RANDOM EFFECTS - EPSILONS  ***
         EPS1
 EPS1
+        7.89E-03

 ********************               FIRST ORDER CONDITIONAL ESTIMATION WITH INTERACTION              ********************
 ********************                          COVARIANCE MATRIX OF ESTIMATE                         ********************

            TH 1      TH 2      TH 3      TH 4      OM11      OM12      OM22      SG11
 TH 1
+        4.88E-02
 TH 2
+        1.00E-02  1.67E+01
 TH 3
+        1.53E-03 -4.50E-02  5.95E-04
 TH 4
+        2.76E-04 -7.87E-03  1.10E-04  2.13E-05
 OM11
+        1.87E-04 -7.40E-03 -3.30E-05 -6.18E-06  6.18E-05
 OM12
+       ......... ......... ......... ......... ......... .........
 OM22
+        3.31E-03  1.49E-02  6.47E-05  1.36E-05  8.45E-05 .........  1.71E-03
 SG11
+        6.21E-05  1.94E-03  4.18E-06  1.65E-06 -4.29E-06 ......... -7.68E-06  5.99E-06

 ********************               FIRST ORDER CONDITIONAL ESTIMATION WITH INTERACTION              ********************
 ********************                          CORRELATION MATRIX OF ESTIMATE                        ********************

            TH 1      TH 2      TH 3      TH 4      OM11      OM12      OM22      SG11
 TH 1
+        2.21E-01
 TH 2
+        1.11E-02  4.08E+00
 TH 3
+        2.83E-01 -4.52E-01  2.44E-02
 TH 4
+        2.71E-01 -4.18E-01  9.75E-01  4.61E-03
 OM11
+        1.08E-01 -2.30E-01 -1.72E-01 -1.70E-01  7.86E-03
 OM12
+       ......... ......... ......... ......... ......... .........
 OM22
+        3.63E-01  8.81E-02  6.42E-02  7.15E-02  2.60E-01 .........  4.13E-02
 SG11
+        1.15E-01  1.94E-01  6.99E-02  1.46E-01 -2.23E-01 ......... -7.59E-02  2.45E-03
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 Elapsed finaloutput time in seconds:     0.01
 #CPUT: Total CPU Time in Seconds,       15.241
