Mon Sep 28 08:55:36 PM UTC 2026
$PROBLEM one_cpt_ig + IOV on CL and MAT, per-dose kernel (fixed at dose) -- ferx #1569 anchor
; The inverse-Gaussian counterpart of transit_iov_mtt.ctl: ferx's igd() ODE twin under IOV on
; an ABSORPTION parameter (MAT), with doses still absorbing when their occasion's successor
; begins. Each dose keeps the MAT of its own dose record; the disposition (K10) is the current
; record's (NONMEM end-of-interval, as ferx #1073). $DES superposes all four doses' Freijer &
; Post densities.
;
; The per-dose MAT is rebuilt at every record from the dose's captured OCCASION (ODn) through
; Lagrange weights in ODn = 1..3 -- see transit_iov_mtt.ctl for why an ETA-dependent kernel
; cannot simply be carried from the dose record.
;
; Data (ig_iov_mat.csv, simulate_absorption_iov_carryover_data.py): the transit_iov_mtt design
; -- 24 subjects, doses of 100 at 0/6/12/18 h, occasion 2 from the OBSERVATION record t = 8.5,
; occasion 3 from the DOSE record t = 18 -- simulated from this model. FOCEI estimate from the
; simulation truth; ferx is evaluated at NONMEM's optimum (tests/ig_iov_mat_nonmem_anchor.rs).

$INPUT ID TIME DV EVID AMT CMT MDV OCC
$DATA ig_iov_mat.csv IGNORE=@

$SUBROUTINES ADVAN13 TOL=12
$MODEL
  COMP=(CENTRAL,DEFDOSE,DEFOBS)   ; 1 = central (dose lands here; bolus suppressed by F1=0)

$PK
  TVCL  = THETA(1)
  TVV   = THETA(2)
  TVMAT = THETA(3)
  TVCV2 = THETA(4)

  ; ---- IOV on CL (current record) ----
  OCC1 = 0
  OCC2 = 0
  OCC3 = 0
  IF (OCC.EQ.1) OCC1 = 1
  IF (OCC.EQ.2) OCC2 = 1
  IF (OCC.EQ.3) OCC3 = 1
  IOVCL = OCC1*ETA(3) + OCC2*ETA(4) + OCC3*ETA(5)
  CL  = TVCL*EXP(ETA(1) + IOVCL)
  V   = TVV *EXP(ETA(2))
  K10 = CL/V

  ; ---- each occasion's MAT (IOV on MAT: ETA(6..8)) ----
  MAO1 = TVMAT*EXP(ETA(6))
  MAO2 = TVMAT*EXP(ETA(7))
  MAO3 = TVMAT*EXP(ETA(8))
  CV2  = TVCV2
  PI   = 3.14159265358979312

  ; ---- per dose: its time, amount and occasion, captured at its dose record ----------
  IF (NEWIND.NE.2) THEN
    NDS = 0
    OD1 = 1
    OD2 = 1
    OD3 = 1
    OD4 = 1
  ENDIF
  NEWD = 0
  IF (AMT.GT.0.0.AND.CMT.EQ.1) NEWD = 1
  NDS = NDS + NEWD
  IF (NEWD.EQ.1.AND.NDS.EQ.1) THEN
    TD1 = TIME
    AM1 = AMT
    OD1 = OCC
  ENDIF
  IF (NEWD.EQ.1.AND.NDS.EQ.2) THEN
    TD2 = TIME
    AM2 = AMT
    OD2 = OCC
  ENDIF
  IF (NEWD.EQ.1.AND.NDS.EQ.3) THEN
    TD3 = TIME
    AM3 = AMT
    OD3 = OCC
  ENDIF
  IF (NEWD.EQ.1.AND.NDS.EQ.4) THEN
    TD4 = TIME
    AM4 = AMT
    OD4 = OCC
  ENDIF
  ; ---- each dose's MAT from ITS occasion (Lagrange weights: 1 at ODn, 0 at the others)
  MA1 = MAO1*(2-OD1)*(3-OD1)/2 + MAO2*(OD1-1)*(3-OD1) + MAO3*(OD1-1)*(OD1-2)/2
  MA2 = MAO1*(2-OD2)*(3-OD2)/2 + MAO2*(OD2-1)*(3-OD2) + MAO3*(OD2-1)*(OD2-2)/2
  MA3 = MAO1*(2-OD3)*(3-OD3)/2 + MAO2*(OD3-1)*(3-OD3) + MAO3*(OD3-1)*(OD3-2)/2
  MA4 = MAO1*(2-OD4)*(3-OD4)/2 + MAO2*(OD4-1)*(3-OD4) + MAO3*(OD4-1)*(OD4-2)/2
  F1  = 0.0

$DES
  ; R_in = sum over arrived doses of AMn*sqrt(MAn/(2 pi CV2 tad^3))*exp(-(tad-MAn)^2/(2 CV2 MAn tad))
  RIN = 0.0
  TA1 = T - TD1
  TA2 = T - TD2
  TA3 = T - TD3
  TA4 = T - TD4
  IF (NDS.GE.1.AND.TA1.GT.0.0) RIN = RIN + AM1*SQRT(MA1/(2.0*PI*CV2*TA1**3))*EXP(-(TA1-MA1)**2/(2.0*CV2*MA1*TA1))
  IF (NDS.GE.2.AND.TA2.GT.0.0) RIN = RIN + AM2*SQRT(MA2/(2.0*PI*CV2*TA2**3))*EXP(-(TA2-MA2)**2/(2.0*CV2*MA2*TA2))
  IF (NDS.GE.3.AND.TA3.GT.0.0) RIN = RIN + AM3*SQRT(MA3/(2.0*PI*CV2*TA3**3))*EXP(-(TA3-MA3)**2/(2.0*CV2*MA3*TA3))
  IF (NDS.GE.4.AND.TA4.GT.0.0) RIN = RIN + AM4*SQRT(MA4/(2.0*PI*CV2*TA4**3))*EXP(-(TA4-MA4)**2/(2.0*CV2*MA4*TA4))
  DADT(1) = RIN - K10*A(1)

$ERROR
  IPRED = A(1)/V
  Y = IPRED*(1.0 + EPS(1))

$THETA
  (0.1,  5.0,  100)   ; 1 TVCL
  (1.0,  30.0, 500)   ; 2 TVV
  (0.05, 3.0,  24)    ; 3 TVMAT
  (0.01, 0.5,  5)     ; 4 TVCV2

$OMEGA
  0.09    ; IIV CL (ETA1)
  0.04    ; IIV V  (ETA2)

$OMEGA BLOCK(1) 0.04   ; IOV CL (ETA3), occasion 1
$OMEGA BLOCK(1) SAME   ;        (ETA4), occasion 2
$OMEGA BLOCK(1) SAME   ;        (ETA5), occasion 3
$OMEGA BLOCK(1) 0.09   ; IOV MAT (ETA6), occasion 1
$OMEGA BLOCK(1) SAME   ;         (ETA7), occasion 2
$OMEGA BLOCK(1) SAME   ;         (ETA8), occasion 3

$SIGMA
  0.01    ; proportional residual variance (0.1^2)

$ESTIMATION METHOD=1 INTER MAXEVAL=9999 PRINT=5 NOABORT FORMAT=s1PE23.16
$TABLE ID TIME DV IPRED PRED MDV OCC NOPRINT ONEHEADER FORMAT=s1PE21.13 FILE=ig_iov_mat.tab

NM-TRAN MESSAGES
 WARNINGS AND ERRORS (IF ANY) FOR PROBLEM    1
 (WARNING  2) NM-TRAN INFERS THAT THE DATA ARE POPULATION.
Note: Analytical 2nd Derivatives are constructed in FSUBS but are never used.
      You may insert $ABBR DERIV2=NO after the first $PROB to save FSUBS construction and compilation time

1NONLINEAR MIXED EFFECTS MODEL PROGRAM (NONMEM) VERSION 7.6.0 (nm760)
 ORIGINALLY DEVELOPED BY STUART BEAL, LEWIS SHEINER, AND ALISON BOECKMANN
 CURRENT DEVELOPERS ARE ROBERT BAUER, ICON DEVELOPMENT SOLUTIONS,
 AND ALISON BOECKMANN. IMPLEMENTATION, EFFICIENCY, AND STANDARDIZATION
 PERFORMED BY NOUS INFOSYSTEMS.
 PROBLEM NO.:         1
 one_cpt_ig + IOV on CL and MAT, per-dose kernel (fixed at dose) -- ferx
 TOT. NO. OF OBS RECS:      360
 TOT. NO. OF INDIVIDUALS:       24
 GENERAL NONLINEAR KINETICS MODEL WITH STIFF/NONSTIFF EQUATIONS (LSODA, ADVAN13)
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 #TBLN:      1
 #METH: First Order Conditional Estimation with Interaction
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
 #TERM:
0MINIMIZATION SUCCESSFUL
 NO. OF FUNCTION EVALUATIONS USED:      207
 NO. OF SIG. DIGITS IN FINAL EST.:  3.7

 ETABAR IS THE ARITHMETIC MEAN OF THE ETA-ESTIMATES,
 AND THE P-VALUE IS GIVEN FOR THE NULL HYPOTHESIS THAT THE TRUE MEAN IS 0.

 ETABAR:         5.6917E-03 -2.9612E-02  2.7153E-02  4.8355E-02 -7.2031E-02  1.6746E-02 -4.0508E-02  4.1800E-02
 SE:             4.3603E-02  3.9001E-02  1.7121E-02  3.3691E-02  2.6618E-02  6.2763E-02  4.6825E-02  4.4126E-02
 N:                      24          24          24          24          24          24          24          24

 P VAL.:         8.9614E-01  4.4769E-01  1.1275E-01  1.5121E-01  6.8077E-03  7.8962E-01  3.8698E-01  3.4350E-01

 ETASHRINKSD(%)  1.0921E+01  1.1388E+01  5.2984E+01  8.2811E+00  2.0555E+01  1.0000E-10  1.9304E+01  2.3726E+01
 ETASHRINKVR(%)  2.0650E+01  2.1480E+01  7.7895E+01  1.5876E+01  3.6886E+01  1.0000E-10  3.4881E+01  4.1823E+01
 EBVSHRINKSD(%)  9.9887E+00  1.2647E+01  3.2081E+01  2.4972E+01  2.5920E+01  1.5314E+00  1.8905E+01  1.6660E+01
 EBVSHRINKVR(%)  1.8980E+01  2.3694E+01  5.3869E+01  4.3708E+01  4.5122E+01  3.0394E+00  3.4235E+01  3.0544E+01
 RELATIVEINF(%)  1.0000E-10  6.7013E+01  1.0000E-10  1.0000E-10  1.0000E-10  9.5506E+01  6.1541E+01  6.3811E+01
 EPSSHRINKSD(%)  2.0565E+01
 EPSSHRINKVR(%)  3.6902E+01


 TOTAL DATA POINTS NORMALLY DISTRIBUTED (N):          360
 N*LOG(2PI) CONSTANT TO OBJECTIVE FUNCTION:    661.63574390736437
 OBJECTIVE FUNCTION VALUE WITHOUT CONSTANT:   -439.79344871664671
 OBJECTIVE FUNCTION VALUE WITH CONSTANT:       221.84229519071766
 REPORTED OBJECTIVE FUNCTION DOES NOT CONTAIN CONSTANT

 TOTAL EFFECTIVE ETAS (NIND*NETA):                           192


 #TERE:
 Elapsed estimation  time in seconds:    84.28
 Elapsed postprocess time in seconds:     0.75

 ********************               FIRST ORDER CONDITIONAL ESTIMATION WITH INTERACTION              ********************
 #OBJT:**************                       MINIMUM VALUE OF OBJECTIVE FUNCTION                      ********************
 #OBJV:********************************************          -439.793       *********************************************

 ********************               FIRST ORDER CONDITIONAL ESTIMATION WITH INTERACTION              ********************
 ********************                             FINAL PARAMETER ESTIMATE                           ********************

 THETA - VECTOR OF FIXED EFFECTS PARAMETERS   *********
         TH 1      TH 2      TH 3      TH 4
         4.73E+00  2.55E+01  3.48E+00  6.27E-01

 OMEGA - COV MATRIX FOR RANDOM EFFECTS - ETAS  ********
         ETA1      ETA2      ETA3      ETA4      ETA5      ETA6      ETA7      ETA8
 ETA1
+        5.75E-02
 ETA2
+        0.00E+00  4.76E-02
 ETA3
+        0.00E+00  0.00E+00  3.52E-02
 ETA4
+        0.00E+00  0.00E+00  0.00E+00  3.52E-02
 ETA5
+        0.00E+00  0.00E+00  0.00E+00  0.00E+00  3.52E-02
 ETA6
+        0.00E+00  0.00E+00  0.00E+00  0.00E+00  0.00E+00  8.33E-02
 ETA7
+        0.00E+00  0.00E+00  0.00E+00  0.00E+00  0.00E+00  0.00E+00  8.33E-02
 ETA8
+        0.00E+00  0.00E+00  0.00E+00  0.00E+00  0.00E+00  0.00E+00  0.00E+00  8.33E-02

 SIGMA - COV MATRIX FOR RANDOM EFFECTS - EPSILONS  ****
         EPS1
 EPS1
+        8.79E-03

 OMEGA - CORR MATRIX FOR RANDOM EFFECTS - ETAS  *******
         ETA1      ETA2      ETA3      ETA4      ETA5      ETA6      ETA7      ETA8
 ETA1
+        2.40E-01
 ETA2
+        0.00E+00  2.18E-01
 ETA3
+        0.00E+00  0.00E+00  1.88E-01
 ETA4
+        0.00E+00  0.00E+00  0.00E+00  1.88E-01
 ETA5
+        0.00E+00  0.00E+00  0.00E+00  0.00E+00  1.88E-01
 ETA6
+        0.00E+00  0.00E+00  0.00E+00  0.00E+00  0.00E+00  2.89E-01
 ETA7
+        0.00E+00  0.00E+00  0.00E+00  0.00E+00  0.00E+00  0.00E+00  2.89E-01
 ETA8
+        0.00E+00  0.00E+00  0.00E+00  0.00E+00  0.00E+00  0.00E+00  0.00E+00  2.89E-01

 SIGMA - CORR MATRIX FOR RANDOM EFFECTS - EPSILONS  ***
         EPS1
 EPS1
+        9.37E-02
 Elapsed finaloutput time in seconds:     0.01
 #CPUT: Total CPU Time in Seconds,       85.064
