Mon Jul 13 05:50:32 PM UTC 2026
$PROBLEM Infusion (RATE>0) into a first-order absorption depot — reference for ferx-core #719 (gap 2)
; Anchors ferx's infusion-into-built-in-absorption support (the dose is a zero-order source
; feeding the absorption kernel, so R_in becomes the convolution R_in_inf = (F*amt/T)*[G(t)-
; G(t-T)]) against NONMEM's native ADVAN2 zero-order-into-depot behaviour: a RATE>0 dose into the
; depot fills it at a constant rate over T = AMT/RATE = 100/25 = 4 h, and first-order KA then
; carries it to central — exactly the convolution of the first-order kernel with the infusion.
; Pure evaluation at fixed thetas (MAXEVAL=0); PRED is the reference for the ferx test.
$DATA inf_first_order.csv IGNORE=@
$INPUT ID TIME DV EVID AMT CMT RATE MDV
$SUBROUTINES ADVAN2 TRANS2
$PK
  CL = THETA(1)
  V  = THETA(2)
  KA = THETA(3)
  S2 = V
$ERROR
  IPRED = F
  Y     = IPRED*(1+EPS(1))
$THETA 1.0 FIX  20.0 FIX  0.6 FIX   ; CL V KA
$OMEGA 0 FIX
$SIGMA 0.01 FIX
$ESTIMATION MAXEVAL=0 METHOD=0 POSTHOC NOABORT
$TABLE ID TIME EVID PRED IPRED NOPRINT ONEHEADER FILE=sdtab1

NM-TRAN MESSAGES
 WARNINGS AND ERRORS (IF ANY) FOR PROBLEM    1
 (WARNING  2) NM-TRAN INFERS THAT THE DATA ARE POPULATION.
 (WARNING  46) ETA VARIABLES ARE NOT USED, BUT DATA ARE POPULATION TYPE.
 (DATA WARNING   4) RECORD         2, DATA ITEM   3, CONTENTS:
 THE DV DATA ITEM IS NULL, BUT THE MDV DATA ITEM IS 0 AND NO $SIMULATION
 RECORD IS PRESENT.
 (DATA WARNING   4) RECORD         3, DATA ITEM   3, CONTENTS:
 THE DV DATA ITEM IS NULL, BUT THE MDV DATA ITEM IS 0 AND NO $SIMULATION
 RECORD IS PRESENT.
Note: Analytical 2nd Derivatives are constructed in FSUBS but are never used.
      You may insert $ABBR DERIV2=NO after the first $PROB to save FSUBS construction and compilation time
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
1NONLINEAR MIXED EFFECTS MODEL PROGRAM (NONMEM) VERSION 7.6.0 (nm760)
 ORIGINALLY DEVELOPED BY STUART BEAL, LEWIS SHEINER, AND ALISON BOECKMANN
 CURRENT DEVELOPERS ARE ROBERT BAUER, ICON DEVELOPMENT SOLUTIONS,
 AND ALISON BOECKMANN. IMPLEMENTATION, EFFICIENCY, AND STANDARDIZATION
 PERFORMED BY NOUS INFOSYSTEMS.
 PROBLEM NO.:         1
 Infusion (RATE>0) into a first-order absorption depot — reference for
 TOT. NO. OF OBS RECS:        5
 TOT. NO. OF INDIVIDUALS:        1
 ONE COMPARTMENT MODEL WITH FIRST-ORDER ABSORPTION (ADVAN2)
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 #TBLN:      1
 #METH: First Order (Evaluation)
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 Elapsed evaluation time in seconds:     0.00
 Elapsed postprocess time in seconds:     0.03

 ********************                             FIRST ORDER (EVALUATION)                           ********************
 #OBJT:**************                       MINIMUM VALUE OF OBJECTIVE FUNCTION                      ********************
 #OBJV:********************************************           481.987       *********************************************

 ********************                             FIRST ORDER (EVALUATION)                           ********************
 ********************                             FINAL PARAMETER ESTIMATE                           ********************

 THETA - VECTOR OF FIXED EFFECTS PARAMETERS   *********
         TH 1      TH 2      TH 3
         1.00E+00  2.00E+01  6.00E-01

 OMEGA - COV MATRIX FOR RANDOM EFFECTS - ETAS  ********
         ETA1
 ETA1
+        0.00E+00

 SIGMA - COV MATRIX FOR RANDOM EFFECTS - EPSILONS  ****
         EPS1
 EPS1
+        1.00E-02

 OMEGA - CORR MATRIX FOR RANDOM EFFECTS - ETAS  *******
         ETA1
 ETA1
+        0.00E+00

 SIGMA - CORR MATRIX FOR RANDOM EFFECTS - EPSILONS  ***
         EPS1
 EPS1
+        1.00E-01
 Elapsed finaloutput time in seconds:     0.00
 #CPUT: Total CPU Time in Seconds,        0.050
