Sat Sep  5 01:01:56 PM UTC 2026
$PROBLEM #1226 lagged arrival vs obs ordering (advan13, lag=0.29999999999986676)
$INPUT ID TIME DV AMT EVID CMT MDV
$DATA data.csv IGNORE=@
$SUBROUTINES ADVAN13 TOL=9
$MODEL
  COMP=(CENTRAL,DEFDOSE,DEFOBS)
$PK
  CL    = THETA(1)
  V     = THETA(2)
  ALAG1 = THETA(3)
  K     = CL/V
  IF (AMT.GT.0.0) TDOS = TIME
  ARR = TDOS + ALAG1
  SEP = 8.2 - ARR
$DES
  DADT(1) = -K*A(1)
$ERROR
  IPRED = A(1)/V
  Y = IPRED + EPS(1)
$THETA
  1.0 FIX
  10.0 FIX
  0.29999999999986676 FIX
$OMEGA 0 FIX
$SIGMA 1 FIX
$ESTIMATION METHOD=0 MAXEVAL=0 PRINT=1 NOABORT
$TABLE ID TIME PRED IPRED ALAG1 ARR SEP EVID NOPRINT ONEHEADER FORMAT=s1PE23.16 FILE=before_advan13.tab

NM-TRAN MESSAGES
 WARNINGS AND ERRORS (IF ANY) FOR PROBLEM    1
 (WARNING  2) NM-TRAN INFERS THAT THE DATA ARE POPULATION.
 (WARNING  46) ETA VARIABLES ARE NOT USED, BUT DATA ARE POPULATION TYPE.
Note: Analytical 2nd Derivatives are constructed in FSUBS but are never used.
      You may insert $ABBR DERIV2=NO after the first $PROB to save FSUBS construction and compilation time

1NONLINEAR MIXED EFFECTS MODEL PROGRAM (NONMEM) VERSION 7.6.0 (nm760)
 ORIGINALLY DEVELOPED BY STUART BEAL, LEWIS SHEINER, AND ALISON BOECKMANN
 CURRENT DEVELOPERS ARE ROBERT BAUER, ICON DEVELOPMENT SOLUTIONS,
 AND ALISON BOECKMANN. IMPLEMENTATION, EFFICIENCY, AND STANDARDIZATION
 PERFORMED BY NOUS INFOSYSTEMS.
 PROBLEM NO.:         1
 #1226 lagged arrival vs obs ordering (advan13, lag=0.29999999999986676)
 TOT. NO. OF OBS RECS:        2
 TOT. NO. OF INDIVIDUALS:        1
 GENERAL NONLINEAR KINETICS MODEL WITH STIFF/NONSTIFF EQUATIONS (LSODA, ADVAN13)
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 #TBLN:      1
 #METH: First Order (Evaluation)
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 Elapsed evaluation time in seconds:     0.01
 Elapsed postprocess time in seconds:     0.01

 ********************                             FIRST ORDER (EVALUATION)                           ********************
 #OBJT:**************                       MINIMUM VALUE OF OBJECTIVE FUNCTION                      ********************
 #OBJV:********************************************           391.481       *********************************************

 ********************                             FIRST ORDER (EVALUATION)                           ********************
 ********************                             FINAL PARAMETER ESTIMATE                           ********************

 THETA - VECTOR OF FIXED EFFECTS PARAMETERS   *********
         TH 1      TH 2      TH 3
         1.00E+00  1.00E+01  3.00E-01

 OMEGA - COV MATRIX FOR RANDOM EFFECTS - ETAS  ********
         ETA1
 ETA1
+        0.00E+00

 SIGMA - COV MATRIX FOR RANDOM EFFECTS - EPSILONS  ****
         EPS1
 EPS1
+        1.00E+00

 OMEGA - CORR MATRIX FOR RANDOM EFFECTS - ETAS  *******
         ETA1
 ETA1
+        0.00E+00

 SIGMA - CORR MATRIX FOR RANDOM EFFECTS - EPSILONS  ***
         EPS1
 EPS1
+        1.00E+00
 Elapsed finaloutput time in seconds:     0.00
 #CPUT: Total CPU Time in Seconds,        0.038
