Tue Sep  1 01:30:34 PM UTC 2026
$PROBLEM Lagged zero-order absorption -- NONMEM anchor for ferx zero_order(dur=DUR, lag=LAG) [#1171]
; ferx:   d/dt(central) = zero_order(dur=DUR, lag=LAG) - CL/V*central ;  y = central/V
; NONMEM: ADVAN13 $DES carries elimination only; the zero-order input is NONMEM's own
;         duration-modeled dose (RATE=-2 in the data + D1=DUR) shifted by ALAG1=LAG.
;         Unlike the PODO/F1=0 trick in mixed_zero_first.ctl, this superposes MULTIPLE
;         doses correctly -- required here, because the second dose's window must open
;         while drug from the first is still present.
;
; This is the single-lag (lag_cmt = 0) case, the only member of the per-route-lag family
; NONMEM can express: ALAGn is per-compartment, so a route lag COMPOSED with a
; compartment lag needs two compartments and stops being the same object (see the note
; in tests/dose_form_lag_nonmem_anchor.rs).
;
; MAXEVAL=0 POSTHOC at fixed THETA: the target of this anchor is the per-record IPRED
; column, not the OFV. ferx's OFV path (compute_predictions_with_tv) is already correct;
; the defect is in the sdtab IPRED path (compute_predictions_with_states), so an
; OFV-only anchor would pass vacuously in both directions.

$INPUT ID TIME DV AMT RATE EVID CMT MDV
$DATA lagged_zo_nm.csv IGNORE=@

$SUBROUTINES ADVAN13 TOL=9
$MODEL
  COMP=(CENTRAL,DEFDOSE,DEFOBS)

$PK
  CL  = THETA(1)*EXP(ETA(1))
  V   = THETA(2)*EXP(ETA(2))
  DUR = THETA(3)
  LAG = THETA(4)
  D1    = DUR
  ALAG1 = LAG
  K10   = CL/V

$DES
  DADT(1) = -K10*A(1)

$ERROR
  IPRED = A(1)/V
  Y = IPRED*(1.0 + EPS(1))

$THETA
  5.0  FIX   ; 1 CL  (L/h)
  50.0 FIX   ; 2 V   (L)
  2.0  FIX   ; 3 DUR (h)  zero-order input duration
  1.5  FIX   ; 4 LAG (h)  zero-order route lag

$OMEGA
  0.09   ; IIV CL
  0.04   ; IIV V

$SIGMA
  0.0225 ; proportional residual variance (0.15^2)

$ESTIMATION METHOD=1 INTER MAXEVAL=0 POSTHOC PRINT=1 NOABORT
$TABLE ID TIME DV PRED IPRED CWRES ETA1 ETA2 MDV NOPRINT ONEHEADER FILE=lagged_zo.tab

NM-TRAN MESSAGES
 WARNINGS AND ERRORS (IF ANY) FOR PROBLEM    1
 (WARNING  2) NM-TRAN INFERS THAT THE DATA ARE POPULATION.
Note: Analytical 2nd Derivatives are constructed in FSUBS but are never used.
      You may insert $ABBR DERIV2=NO after the first $PROB to save FSUBS construction and compilation time

1NONLINEAR MIXED EFFECTS MODEL PROGRAM (NONMEM) VERSION 7.6.0 (nm760)
 ORIGINALLY DEVELOPED BY STUART BEAL, LEWIS SHEINER, AND ALISON BOECKMANN
 CURRENT DEVELOPERS ARE ROBERT BAUER, ICON DEVELOPMENT SOLUTIONS,
 AND ALISON BOECKMANN. IMPLEMENTATION, EFFICIENCY, AND STANDARDIZATION
 PERFORMED BY NOUS INFOSYSTEMS.
 PROBLEM NO.:         1
 Lagged zero-order absorption -- NONMEM anchor for ferx zero_order(dur=DU
 TOT. NO. OF OBS RECS:      120
 TOT. NO. OF INDIVIDUALS:       12
 GENERAL NONLINEAR KINETICS MODEL WITH STIFF/NONSTIFF EQUATIONS (LSODA, ADVAN13)
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 #TBLN:      1
 #METH: First Order Conditional Estimation with Interaction (Evaluation)
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 Elapsed evaluation time in seconds:     0.06
 Elapsed postprocess time in seconds:     0.08

 ********************         FIRST ORDER CONDITIONAL ESTIMATION WITH INTERACTION (EVALUATION)       ********************
 #OBJT:**************                       MINIMUM VALUE OF OBJECTIVE FUNCTION                      ********************
 #OBJV:********************************************          -264.651       *********************************************

 ********************         FIRST ORDER CONDITIONAL ESTIMATION WITH INTERACTION (EVALUATION)       ********************
 ********************                             FINAL PARAMETER ESTIMATE                           ********************

 THETA - VECTOR OF FIXED EFFECTS PARAMETERS   *********
         TH 1      TH 2      TH 3      TH 4
         5.00E+00  5.00E+01  2.00E+00  1.50E+00

 OMEGA - COV MATRIX FOR RANDOM EFFECTS - ETAS  ********
         ETA1      ETA2
 ETA1
+        9.00E-02
 ETA2
+        0.00E+00  4.00E-02

 SIGMA - COV MATRIX FOR RANDOM EFFECTS - EPSILONS  ****
         EPS1
 EPS1
+        2.25E-02

 OMEGA - CORR MATRIX FOR RANDOM EFFECTS - ETAS  *******
         ETA1      ETA2
 ETA1
+        3.00E-01
 ETA2
+        0.00E+00  2.00E-01

 SIGMA - CORR MATRIX FOR RANDOM EFFECTS - EPSILONS  ***
         EPS1
 EPS1
+        1.50E-01
 Elapsed finaloutput time in seconds:     0.02
 #CPUT: Total CPU Time in Seconds,        0.172
