Sat Aug 15 12:36:58 AM UTC 2026
$PROBLEM Logit-normal pathway fraction, SAEM with MU_ referencing -- anchor for ferx logit mu-referencing [#918]
; Reference SAEM fit for ferx's logit-normal mu-referencing. Parallel dual
; first-order absorption (fast KA1 / slow KA2) into a 1-cpt central compartment,
; split by a dose fraction FR1 that carries IIV *on the logit scale*:
;
;     FR1_i = 1 / (1 + EXP(-(MU_3 + ETA(3))))  ,  MU_3 = THETA(3)
;
; This is the NONMEM-canonical logit mu-reference: THETA(3) is declared on the
; logit scale, so MU_3 = THETA(3) with no link function, and the SAEM M-step
; updates it by the closed-form mean-eta shift. ferx detects the same structure
; automatically from `FR1 = 1/(1+exp(-(LOGIT_FR1 + ETA_FR1)))` (issue #918);
; before that fix it warned "individual parameter(s) not mu-referenced: FR1" and
; sent THETA(3) through the numeric M-step instead.
;
; The dataset logit_fraction_oral.csv is simulated FROM this model
; (nonmem_anchor/simulate_logit_fraction_data.py, same truths), so this is a
; matched (well-specified) fit: NONMEM and ferx should agree AND both recover the
; data-generating values.
;
; Truths: CL=5, V=50, FR1=0.6 (logit 0.405465), KA1=2.0, KA2=0.2,
;         omega^2 = 0.09 (CL), 0.09 (V), 0.25 (logit FR1), sigma^2 = 0.0064.
;
; Identifiability: the two pathways are exchangeable (pathway 1 <-> 2 with
; FR1 <-> 1-FR1, KA1 <-> KA2). The KA1 > KA2 bounds below (fast vs slow) break
; that label symmetry; keep the same convention in the ferx fit when comparing.

$INPUT ID TIME DV AMT EVID CMT MDV
$DATA logit_fraction_oral.csv IGNORE=@

$SUBROUTINES ADVAN13 TOL=9
$MODEL
  COMP=(DEPOT,DEFDOSE)     ; 1 = inert dose carrier (F1=0); first-order sum feeds central
  COMP=(CENTRAL,DEFOBS)    ; 2 = central (amount; concentration = A(2)/V)

$PK
  MU_1 = LOG(THETA(1))
  MU_2 = LOG(THETA(2))
  MU_3 = THETA(3)          ; already on the logit scale -- identity link

  CL  = EXP(MU_1 + ETA(1))
  V   = EXP(MU_2 + ETA(2))
  FR1 = 1.0/(1.0 + EXP(-(MU_3 + ETA(3))))   ; logit-normal fraction in (0,1)
  KA1 = THETA(4)           ; fast-pathway absorption rate (1/h)
  KA2 = THETA(5)           ; slow-pathway absorption rate (1/h)

  FR2 = 1.0 - FR1
  K20 = CL/V

  ; PODO (last oral dose amount) and TDOS (its time) captured at the dose record;
  ; NONMEM carries them forward for $DES to read.
  IF (AMT.GT.0.0.AND.CMT.EQ.1) PODO = AMT
  IF (AMT.GT.0.0.AND.CMT.EQ.1) TDOS = TIME
  ; F1=0: no bolus; PODO drives the two first-order inputs in $DES (each pathway's
  ; integral R_in = FRi*dose, so the total delivered is the dose).
  F1  = 0.0

$DES
  TAD = T - TDOS
  IF (TAD.LE.1.0E-10) TAD = 1.0E-10
  FO1 = FR1*PODO*KA1*EXP(-KA1*TAD)
  FO2 = FR2*PODO*KA2*EXP(-KA2*TAD)
  RIN = FO1 + FO2                ; parallel input rate (dose split FR1 / 1-FR1)
  DADT(1) = 0.0                  ; depot is an inert dose carrier
  DADT(2) = RIN - K20*A(2)       ; dual first-order input straight into central

$ERROR
  IPRED = A(2)/V                 ; central concentration (mg/L)
  Y = IPRED*(1.0 + EPS(1))       ; proportional residual error

$THETA
  (0.1,   5.0,  100)    ; 1 CL    (L/h)
  (5.0,   50.0, 500)    ; 2 V     (L)
  (-10.0, -0.405465, 10.0) ; 3 LOGIT_FR1   logit of the fast-pathway fraction (start FR1 = 0.4)
  (0.5,   2.0,  24)     ; 4 KA1   (1/h) fast pathway (bounded > KA2 to break label symmetry)
  (0.01,  0.2,  0.5)    ; 5 KA2   (1/h) slow pathway

$OMEGA
  0.09    ; IIV CL
  0.09    ; IIV V
  0.25    ; IIV logit FR1

$SIGMA
  0.0064  ; proportional residual variance (0.08^2)

$ESTIMATION METHOD=SAEM INTERACTION NBURN=2000 NITER=1000 ISAMPLE=10 PRINT=200 SEED=918 NOABORT
$ESTIMATION METHOD=IMP INTERACTION EONLY=1 NITER=10 ISAMPLE=3000 PRINT=1 SEED=918 NOABORT
; No $COVARIANCE: this anchor compares point estimates, not standard errors, and
; printing the R matrix aborts this NONMEM 7.5.1 build on the SAEM+IMP chain.
$TABLE ID TIME DV IPRED CWRES MDV NOPRINT ONEHEADER FILE=logit_fraction_saem.tab

NM-TRAN MESSAGES
 WARNINGS AND ERRORS (IF ANY) FOR PROBLEM    1
 (WARNING  2) NM-TRAN INFERS THAT THE DATA ARE POPULATION.
Note: Analytical 2nd Derivatives are constructed in FSUBS but are never used.
      You may insert $ABBR DERIV2=NO after the first $PROB to save FSUBS construction and compilation time

1NONLINEAR MIXED EFFECTS MODEL PROGRAM (NONMEM) VERSION 7.5.1
 ORIGINALLY DEVELOPED BY STUART BEAL, LEWIS SHEINER, AND ALISON BOECKMANN
 CURRENT DEVELOPERS ARE ROBERT BAUER, ICON DEVELOPMENT SOLUTIONS,
 AND ALISON BOECKMANN. IMPLEMENTATION, EFFICIENCY, AND STANDARDIZATION
 PERFORMED BY NOUS INFOSYSTEMS.
 PROBLEM NO.:         1
 Logit-normal pathway fraction, SAEM with MU_ referencing -- anchor for f
 TOT. NO. OF OBS RECS:      960
 TOT. NO. OF INDIVIDUALS:       60
 GENERAL NONLINEAR KINETICS MODEL WITH STIFF/NONSTIFF EQUATIONS (LSODA, ADVAN13)
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 #TBLN:      1
 #METH: Stochastic Approximation Expectation-Maximization
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
 #TERM:
 STOCHASTIC PORTION WAS NOT TESTED FOR CONVERGENCE
 REDUCED STOCHASTIC PORTION WAS COMPLETED

 ETABAR IS THE ARITHMETIC MEAN OF THE ETA-ESTIMATES,
 AND THE P-VALUE IS GIVEN FOR THE NULL HYPOTHESIS THAT THE TRUE MEAN IS 0.

 ETABAR:         2.5790E-06  1.2227E-06  1.9350E-06
 SE:             3.8373E-02  4.3281E-02  4.5617E-02
 N:                      60          60          60

 P VAL.:         9.9995E-01  9.9998E-01  9.9997E-01

 ETASHRINKSD(%)  1.0303E+00  1.4486E+00  1.7352E+01
 ETASHRINKVR(%)  2.0500E+00  2.8761E+00  3.1694E+01
 EBVSHRINKSD(%)  1.0303E+00  1.4473E+00  1.7354E+01
 EBVSHRINKVR(%)  2.0500E+00  2.8736E+00  3.1697E+01
 RELATIVEINF(%)  9.7902E+01  9.6110E+01  6.7561E+01
 EPSSHRINKSD(%)  8.7472E+00
 EPSSHRINKVR(%)  1.6729E+01


 TOTAL DATA POINTS NORMALLY DISTRIBUTED (N):          960
 N*LOG(2PI) CONSTANT TO OBJECTIVE FUNCTION:    1764.3619837529716
 OBJECTIVE FUNCTION VALUE WITHOUT CONSTANT:   -4603.9955974827953
 OBJECTIVE FUNCTION VALUE WITH CONSTANT:      -2839.6336137298240
 REPORTED OBJECTIVE FUNCTION DOES NOT CONTAIN CONSTANT

 TOTAL EFFECTIVE ETAS (NIND*NETA):                           180
 NIND*NETA*LOG(2PI) CONSTANT TO OBJECTIVE FUNCTION:    330.81787195368219
 OBJECTIVE FUNCTION VALUE WITHOUT CONSTANT:   -4603.9955974827953
 OBJECTIVE FUNCTION VALUE WITH CONSTANT:      -4273.1777255291136
 REPORTED OBJECTIVE FUNCTION DOES NOT CONTAIN CONSTANT


 #TERE:
 Elapsed estimation  time in seconds:  1199.18

 ********************                STOCHASTIC APPROXIMATION EXPECTATION-MAXIMIZATION               ********************
 #OBJT:**************                        FINAL VALUE OF LIKELIHOOD FUNCTION                      ********************
 #OBJV:********************************************    -4603.996       **************************************************

 ********************                STOCHASTIC APPROXIMATION EXPECTATION-MAXIMIZATION               ********************
 ********************                             FINAL PARAMETER ESTIMATE                           ********************

 THETA - VECTOR OF FIXED EFFECTS PARAMETERS   *********
         TH 1      TH 2      TH 3      TH 4      TH 5
         5.29E+00  5.57E+01  4.22E-01  2.06E+00  2.23E-01

 OMEGA - COV MATRIX FOR RANDOM EFFECTS - ETAS  ********
         ETA1      ETA2      ETA3
 ETA1
+        9.02E-02
 ETA2
+        0.00E+00  1.16E-01
 ETA3
+        0.00E+00  0.00E+00  1.83E-01

 SIGMA - COV MATRIX FOR RANDOM EFFECTS - EPSILONS  ****
         EPS1
 EPS1
+        6.54E-03

 OMEGA - CORR MATRIX FOR RANDOM EFFECTS - ETAS  *******
         ETA1      ETA2      ETA3
 ETA1
+        3.00E-01
 ETA2
+        0.00E+00  3.40E-01
 ETA3
+        0.00E+00  0.00E+00  4.28E-01

 SIGMA - CORR MATRIX FOR RANDOM EFFECTS - EPSILONS  ***
         EPS1
 EPS1
+        8.09E-02
 #TBLN:      2
 #METH: Objective Function Evaluation by Importance Sampling
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
 #TERM:
 EXPECTATION ONLY PROCESS WAS NOT TESTED FOR CONVERGENCE
