Sun Jun 28 05:50:37 PM UTC 2026
$PROBLEM Mixed zero+first-order absorption -- NONMEM anchor for ferx FZO1*first_order(ka=KA)+FZO*zero_order(dur=DUR) [#505]
; Reference fit for ferx's mixed absorption: a zero-order (constant-rate over a
; modeled duration) input plus a first-order (Bateman) input feeding a 1-cpt central
; compartment in parallel, split by a dose fraction FZO / (1-FZO). Mirrors
; examples/mixed_absorption.ferx and the biphasic IG anchor -- same $DES + F1=0 +
; PODO trick, with one IG density replaced by a first-order input and the other by a
; zero-order rectangle.
;
; The dataset mixed_oral.csv is simulated FROM this model
; (nonmem_anchor/simulate_mixed_data.py, same truths), so this is a matched
; (well-specified) fit: ferx and NONMEM should agree on OFV/THETA AND both recover
; the data-generating values.
;
; No pathway-label symmetry here (zero-order and first-order are distinguishable), so
; no ordering bound is needed -- unlike the parallel / biphasic anchors.

$INPUT ID TIME DV AMT EVID CMT MDV
$DATA mixed_oral.csv IGNORE=@

$SUBROUTINES ADVAN13 TOL=9
$MODEL
  COMP=(DEPOT,DEFDOSE)     ; 1 = inert dose carrier (F1=0); zero+first sum feeds central
  COMP=(CENTRAL,DEFOBS)    ; 2 = central (amount; concentration = A(2)/V)

$PK
  CL  = THETA(1)*EXP(ETA(1))
  V   = THETA(2)*EXP(ETA(2))
  FZO = THETA(3)           ; fraction of dose through the zero-order pathway
  KA  = THETA(4)           ; first-order absorption rate (1/h)
  DUR = THETA(5)           ; zero-order input duration (h)

  FZO1 = 1.0 - FZO         ; first-order-pathway fraction
  K20  = CL/V

  IF (AMT.GT.0.0.AND.CMT.EQ.1) PODO = AMT
  IF (AMT.GT.0.0.AND.CMT.EQ.1) TDOS = TIME
  ; F1=0: no bolus; PODO drives the two inputs in $DES (zero-order pathway delivers
  ; FZO*dose over DUR, first-order pathway delivers FZO1*dose -- total = dose).
  F1  = 0.0

$DES
  TAD = T - TDOS
  IF (TAD.LE.1.0E-10) TAD = 1.0E-10
  ; First-order pathway: RFO = FZO1 * PODO * KA * exp(-KA*tad).
  RFO = FZO1*PODO*KA*EXP(-KA*TAD)
  ; Zero-order pathway: constant FZO*PODO/DUR over (0, DUR], 0 after the cutoff.
  RZO = 0.0
  IF (TAD.LE.DUR) RZO = FZO*PODO/DUR
  RIN = RFO + RZO                ; mixed input rate (dose split FZO / 1-FZO)
  DADT(1) = 0.0                  ; depot is an inert dose carrier
  DADT(2) = RIN - K20*A(2)       ; zero+first-order input straight into central

$ERROR
  IPRED = A(2)/V                 ; central concentration (mg/L)
  Y = IPRED*(1.0 + EPS(1))       ; proportional residual error

$THETA
  (0.1,   5.0,  100)   ; 1 CL    (L/h)
  (5.0,   50.0, 500)   ; 2 V     (L)
  (0.001, 0.4,  0.999) ; 3 FZO         zero-order-pathway fraction
  (0.05,  1.0,  24)    ; 4 KA    (1/h) first-order pathway
  (0.05,  3.0,  24)    ; 5 DUR   (h)   zero-order duration

$OMEGA
  0.09    ; IIV CL
  0.09    ; IIV V

$SIGMA
  0.0225  ; proportional residual variance (0.15^2)

$ESTIMATION METHOD=1 INTER MAXEVAL=9999 PRINT=5 NOABORT
$COVARIANCE
$TABLE ID TIME DV IPRED CWRES MDV NOPRINT ONEHEADER FILE=mixed_zero_first.tab

NM-TRAN MESSAGES
 WARNINGS AND ERRORS (IF ANY) FOR PROBLEM    1
 (WARNING  2) NM-TRAN INFERS THAT THE DATA ARE POPULATION.
Note: Analytical 2nd Derivatives are constructed in FSUBS but are never used.
      You may insert $ABBR DERIV2=NO after the first $PROB to save FSUBS construction and compilation time

1NONLINEAR MIXED EFFECTS MODEL PROGRAM (NONMEM) VERSION 7.6.0 (nm760)
 ORIGINALLY DEVELOPED BY STUART BEAL, LEWIS SHEINER, AND ALISON BOECKMANN
 CURRENT DEVELOPERS ARE ROBERT BAUER, ICON DEVELOPMENT SOLUTIONS,
 AND ALISON BOECKMANN. IMPLEMENTATION, EFFICIENCY, AND STANDARDIZATION
 PERFORMED BY NOUS INFOSYSTEMS.
 PROBLEM NO.:         1
 Mixed zero+first-order absorption -- NONMEM anchor for ferx FZO1*first_o
 TOT. NO. OF OBS RECS:      240
 TOT. NO. OF INDIVIDUALS:       20
 GENERAL NONLINEAR KINETICS MODEL WITH STIFF/NONSTIFF EQUATIONS (LSODA, ADVAN13)
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 #TBLN:      1
 #METH: First Order Conditional Estimation with Interaction
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
 #TERM:
0MINIMIZATION SUCCESSFUL
 HOWEVER, PROBLEMS OCCURRED WITH THE MINIMIZATION.
 REGARD THE RESULTS OF THE ESTIMATION STEP CAREFULLY, AND ACCEPT THEM ONLY
 AFTER CHECKING THAT THE COVARIANCE STEP PRODUCES REASONABLE OUTPUT.
 NO. OF FUNCTION EVALUATIONS USED:      432
 NO. OF SIG. DIGITS IN FINAL EST.:  3.1

 ETABAR IS THE ARITHMETIC MEAN OF THE ETA-ESTIMATES,
 AND THE P-VALUE IS GIVEN FOR THE NULL HYPOTHESIS THAT THE TRUE MEAN IS 0.

 ETABAR:         2.2899E-03 -2.2473E-03
 SE:             4.7047E-02  4.4415E-02
 N:                      20          20

 P VAL.:         9.6118E-01  9.5965E-01

 ETASHRINKSD(%)  3.7884E+00  3.8331E+00
 ETASHRINKVR(%)  7.4333E+00  7.5192E+00
 EBVSHRINKSD(%)  3.4011E+00  3.6929E+00
 EBVSHRINKVR(%)  6.6866E+00  7.2495E+00
 RELATIVEINF(%)  9.3290E+01  9.2727E+01
 EPSSHRINKSD(%)  7.6323E+00
 EPSSHRINKVR(%)  1.4682E+01


 TOTAL DATA POINTS NORMALLY DISTRIBUTED (N):          240
 N*LOG(2PI) CONSTANT TO OBJECTIVE FUNCTION:    441.09049593824290
 OBJECTIVE FUNCTION VALUE WITHOUT CONSTANT:   -698.96623392335277
 OBJECTIVE FUNCTION VALUE WITH CONSTANT:      -257.87573798510988
 REPORTED OBJECTIVE FUNCTION DOES NOT CONTAIN CONSTANT

 TOTAL EFFECTIVE ETAS (NIND*NETA):                            40


 #TERE:
 Elapsed estimation  time in seconds:    21.54
0R MATRIX ALGORITHMICALLY NON-POSITIVE-SEMIDEFINITE
 BUT NONSINGULAR
0R MATRIX IS OUTPUT
0COVARIANCE STEP ABORTED
 Elapsed covariance  time in seconds:    14.23
 Elapsed postprocess time in seconds:     0.14

 ********************               FIRST ORDER CONDITIONAL ESTIMATION WITH INTERACTION              ********************
 #OBJT:**************                       MINIMUM VALUE OF OBJECTIVE FUNCTION                      ********************
 #OBJV:********************************************          -698.966       *********************************************

 ********************               FIRST ORDER CONDITIONAL ESTIMATION WITH INTERACTION              ********************
 ********************                             FINAL PARAMETER ESTIMATE                           ********************

 THETA - VECTOR OF FIXED EFFECTS PARAMETERS   *********
         TH 1      TH 2      TH 3      TH 4      TH 5
         5.39E+00  5.56E+01  2.93E-01  8.64E-01  3.04E+00

 OMEGA - COV MATRIX FOR RANDOM EFFECTS - ETAS  ********
         ETA1      ETA2
 ETA1
+        4.78E-02
 ETA2
+        0.00E+00  4.27E-02

 SIGMA - COV MATRIX FOR RANDOM EFFECTS - EPSILONS  ****
         EPS1
 EPS1
+        2.52E-02

 OMEGA - CORR MATRIX FOR RANDOM EFFECTS - ETAS  *******
         ETA1      ETA2
 ETA1
+        2.19E-01
 ETA2
+        0.00E+00  2.07E-01

 SIGMA - CORR MATRIX FOR RANDOM EFFECTS - EPSILONS  ***
         EPS1
 EPS1
+        1.59E-01
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 Elapsed finaloutput time in seconds:     0.02
 #CPUT: Total CPU Time in Seconds,       36.020
