Sat Aug 29 04:37:03 PM UTC 2026
$PROBLEM #1124 TAD-dependent DES on a closed-form-eligible absorption model
; Anchor for ferx issue #1124. The ODE right-hand side reads time-after-dose on a
; model whose absorption ferx can serve in CLOSED FORM (a single built-in
; `first_order` input-rate forcing into a linear one-compartment disposition).
; That fast path never evaluates the right-hand side, so the TAD term was dropped
; from the predictions entirely -- output was bit-identical to the same model with
; the term deleted. This anchor pins the corrected route against NONMEM.
;
; TWO DOSES, and no lagtime:
;   - Two doses are required. Under a single dose TAD == TAFD, so a one-dose
;     anchor cannot distinguish a TAD defect from a TAFD one and would agree with
;     a wrong engine. The second dose at t=12 re-anchors TAD strictly inside the
;     observation range, with records on both sides (11.5 and 12.5).
;   - No lagtime, so unlike tad_lag_B this needs no MTIME/MTDIFF: TDOS switches
;     exactly AT a dose record, and NONMEM already breaks the integration there.
;     (Verified against the independent RK4 reference in
;     mr_tad_deterministic_truth.py rather than assumed -- MTIME construction is
;     where the tad_lag anchors went wrong twice, see this file's README entry.)
;   - No WT column. tad_lag_{A,B} carry a FIXED-zero-exponent WT purely to force
;     ferx onto its event-driven predictor (#1110); #1124 routes a model-time-
;     reading RHS there directly, so that workaround is obsolete here.
;
; NONMEM uses an explicit DEPOT compartment; the ferx twin is a one-state model
; whose `first_order(ka=KA)` forcing delivers KA*D*exp(-KA*(t-t_dose)) into
; central -- exactly the outflow of this depot. Same system, same dataset.
$INPUT ID TIME DV MDV EVID AMT CMT
$DATA mr_tad.csv IGNORE=@
$SUBROUTINES ADVAN13 TOL=9
$MODEL COMP=(DEPOT,DEFDOSE) COMP=(CENTRAL)
$PK
  CL = THETA(1)*EXP(ETA(1))
  V  = THETA(2)
  KA = THETA(3)
$DES
  TDOS = 0.0
  IF (T.GE.12.0) TDOS = 12.0
  TADX = T - TDOS
  DADT(1) = -KA*A(1)
  DADT(2) =  KA*A(1) - (CL/V)*A(2)*(1.0 + THETA(4)*TADX)
$ERROR
  IPRED = A(2)/V
  Y     = IPRED*(1.0 + EPS(1))
$THETA
 (0.001, 1.0)   ; TVCL
 (0.001, 20.0)  ; TVV
 (0.001, 0.8)   ; TVKA
 (0.0,   0.3)   ; THETA_TAD
$OMEGA
 0.09   ; ETA_CL
$SIGMA
 0.01   ; proportional, variance
$ESTIMATION METHOD=1 INTERACTION MAXEVAL=0 POSTHOC PRINT=1
$TABLE ID TIME IPRED CWRES NOPRINT ONEHEADER FILE=mr_tad.tab

NM-TRAN MESSAGES
 WARNINGS AND ERRORS (IF ANY) FOR PROBLEM    1
 (WARNING  2) NM-TRAN INFERS THAT THE DATA ARE POPULATION.
Note: Analytical 2nd Derivatives are constructed in FSUBS but are never used.
      You may insert $ABBR DERIV2=NO after the first $PROB to save FSUBS construction and compilation time

1NONLINEAR MIXED EFFECTS MODEL PROGRAM (NONMEM) VERSION 7.6.0 (nm760)
 ORIGINALLY DEVELOPED BY STUART BEAL, LEWIS SHEINER, AND ALISON BOECKMANN
 CURRENT DEVELOPERS ARE ROBERT BAUER, ICON DEVELOPMENT SOLUTIONS,
 AND ALISON BOECKMANN. IMPLEMENTATION, EFFICIENCY, AND STANDARDIZATION
 PERFORMED BY NOUS INFOSYSTEMS.
 PROBLEM NO.:         1
 #1124 TAD-dependent DES on a closed-form-eligible absorption model
 TOT. NO. OF OBS RECS:      156
 TOT. NO. OF INDIVIDUALS:       12
 GENERAL NONLINEAR KINETICS MODEL WITH STIFF/NONSTIFF EQUATIONS (LSODA, ADVAN13)
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 #TBLN:      1
 #METH: First Order Conditional Estimation with Interaction (Evaluation)
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 Elapsed evaluation time in seconds:     0.05
 Elapsed postprocess time in seconds:     0.07

 ********************         FIRST ORDER CONDITIONAL ESTIMATION WITH INTERACTION (EVALUATION)       ********************
 #OBJT:**************                       MINIMUM VALUE OF OBJECTIVE FUNCTION                      ********************
 #OBJV:********************************************          -234.478       *********************************************

 ********************         FIRST ORDER CONDITIONAL ESTIMATION WITH INTERACTION (EVALUATION)       ********************
 ********************                             FINAL PARAMETER ESTIMATE                           ********************

 THETA - VECTOR OF FIXED EFFECTS PARAMETERS   *********
         TH 1      TH 2      TH 3      TH 4
         1.00E+00  2.00E+01  8.00E-01  3.00E-01

 OMEGA - COV MATRIX FOR RANDOM EFFECTS - ETAS  ********
         ETA1
 ETA1
+        9.00E-02

 SIGMA - COV MATRIX FOR RANDOM EFFECTS - EPSILONS  ****
         EPS1
 EPS1
+        1.00E-02

 OMEGA - CORR MATRIX FOR RANDOM EFFECTS - ETAS  *******
         ETA1
 ETA1
+        3.00E-01

 SIGMA - CORR MATRIX FOR RANDOM EFFECTS - EPSILONS  ***
         EPS1
 EPS1
+        1.00E-01
 Elapsed finaloutput time in seconds:     0.01
 #CPUT: Total CPU Time in Seconds,        0.140
