Fri Oct  9 12:33:11 PM UTC 2026
$PROBLEM NPDE/NPD with a correlated combined residual (ferx #1733, arm A)
; Twin of tests/fixtures/npde_block_sigma_a.ferx on npde_block_sigma_a.csv
; (simulate_npde_block_sigma_data.py). The ferx twin DECLARES rho = 0.5 and is
; scored at a parameter set carrying the FITTED rho = -0.9; this stream FIXes
; the fitted value, so it is the reference for what the ferx NPDE must
; simulate. Before #1733 ferx drew at the declaration.
;
; Y = F + F*EPS(1) + EPS(2) is ferx's combined(PROP, ADD):
;   Var = F^2*s1^2 + s2^2 + 2*F*cov,  cov = rho*s1*s2 = -0.9*0.2*1.0 = -0.18.
; Two doses, the second landing on residual drug, so F spans ~1..20 and both
; the proportional and the cross term are live across the records.
;
; ESAMPLE/SEED mirror ferx's nsim/seed; WRESCHOL selects the Cholesky
; decorrelation ferx implements (see npde_iov_chol.ctl).
$INPUT ID TIME DV EVID AMT CMT MDV
$DATA npde_block_sigma_a.csv IGNORE=@
$SUBROUTINES ADVAN1 TRANS2

$PK
  CL = THETA(1)*EXP(ETA(1))
  V  = THETA(2)
  S1 = V

$ERROR
  IPRED = F
  Y = F + F*EPS(1) + EPS(2)

$THETA
  1.0  FIX   ; TVCL
  10.0 FIX   ; TVV

$OMEGA 0.09 FIX          ; ETA_CL

$SIGMA BLOCK(2) 0.04 -0.18 1.0 FIX   ; PROP, ADD at the fitted rho = -0.9

$ESTIMATION MAXEVAL=0 METHOD=1 INTER NOABORT POSTHOC PRINT=1
$TABLE ID TIME DV MDV NPDE NPD ESAMPLE=2000 SEED=1733 WRESCHOL
       ONEHEADER NOAPPEND NOPRINT FORMAT=s1PE23.16 FILE=npde_block_sigma_a.tab

NM-TRAN MESSAGES
 WARNINGS AND ERRORS (IF ANY) FOR PROBLEM    1
 (WARNING  2) NM-TRAN INFERS THAT THE DATA ARE POPULATION.
Note: Analytical 2nd Derivatives are constructed in FSUBS but are never used.
      You may insert $ABBR DERIV2=NO after the first $PROB to save FSUBS construction and compilation time

1NONLINEAR MIXED EFFECTS MODEL PROGRAM (NONMEM) VERSION 7.6.0 (nm760)
 ORIGINALLY DEVELOPED BY STUART BEAL, LEWIS SHEINER, AND ALISON BOECKMANN
 CURRENT DEVELOPERS ARE ROBERT BAUER, ICON DEVELOPMENT SOLUTIONS,
 AND ALISON BOECKMANN. IMPLEMENTATION, EFFICIENCY, AND STANDARDIZATION
 PERFORMED BY NOUS INFOSYSTEMS.
 PROBLEM NO.:         1
 NPDE/NPD with a correlated combined residual (ferx #1733, arm A)
 TOT. NO. OF OBS RECS:      210
 TOT. NO. OF INDIVIDUALS:       30
 ONE COMPARTMENT MODEL (ADVAN1)
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 #TBLN:      1
 #METH: First Order Conditional Estimation with Interaction (Evaluation)
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 Elapsed evaluation time in seconds:     0.02
 Elapsed postprocess time in seconds:     0.23

 ********************         FIRST ORDER CONDITIONAL ESTIMATION WITH INTERACTION (EVALUATION)       ********************
 #OBJT:**************                       MINIMUM VALUE OF OBJECTIVE FUNCTION                      ********************
 #OBJV:********************************************           217.069       *********************************************

 ********************         FIRST ORDER CONDITIONAL ESTIMATION WITH INTERACTION (EVALUATION)       ********************
 ********************                             FINAL PARAMETER ESTIMATE                           ********************

 THETA - VECTOR OF FIXED EFFECTS PARAMETERS   *********
         TH 1      TH 2
         1.00E+00  1.00E+01

 OMEGA - COV MATRIX FOR RANDOM EFFECTS - ETAS  ********
         ETA1
 ETA1
+        9.00E-02

 SIGMA - COV MATRIX FOR RANDOM EFFECTS - EPSILONS  ****
         EPS1      EPS2
 EPS1
+        4.00E-02
 EPS2
+       -1.80E-01  1.00E+00

 OMEGA - CORR MATRIX FOR RANDOM EFFECTS - ETAS  *******
         ETA1
 ETA1
+        3.00E-01

 SIGMA - CORR MATRIX FOR RANDOM EFFECTS - EPSILONS  ***
         EPS1      EPS2
 EPS1
+        2.00E-01
 EPS2
+       -9.00E-01  1.00E+00
 Elapsed finaloutput time in seconds:     0.01
 #CPUT: Total CPU Time in Seconds,        0.290
