Fri Oct  9 12:33:36 PM UTC 2026
$PROBLEM NPDE/NPD with a cross-endpoint correlated residual via L2 (ferx #1733, arm B)
; Twin of tests/fixtures/npde_block_sigma_b.ferx on npde_block_sigma_b.csv
; (simulate_npde_block_sigma_data.py). Each sample is a total (FREE = 0) /
; unbound (FREE = 1) pair sharing an L2 id; EPS(1) acts on the total row,
; EPS(2) on the unbound row, and $SIGMA BLOCK(2) correlates them across the
; pair: cov = rho*s1*s2 = -0.8*0.05*0.30 = -0.012. The ferx twin DECLARES
; rho = 0.5 and is scored at the FITTED -0.8.
;
; Whether NONMEM's $TABLE NPDE simulation honours L2 is itself measured by
; this run (ferx #1733 plan, row 6): the anchor test pins either answer.
$INPUT ID TIME DV EVID AMT CMT MDV FREE L2
$DATA npde_block_sigma_b.csv IGNORE=@
$SUBROUTINES ADVAN1 TRANS2

$PK
  CL = THETA(1)*EXP(ETA(1))
  V  = THETA(2)
  S1 = V

$ERROR
  IPRED = F
  Y = F + F*((1 - FREE)*EPS(1) + FREE*EPS(2))

$THETA
  1.0  FIX   ; TVCL
  10.0 FIX   ; TVV

$OMEGA 0.09 FIX          ; ETA_CL

$SIGMA BLOCK(2) 0.0025 -0.012 0.09 FIX   ; PROP_TOTAL, PROP_UNBOUND at rho = -0.8

$ESTIMATION MAXEVAL=0 METHOD=1 INTER NOABORT POSTHOC PRINT=1
$TABLE ID TIME DV MDV FREE NPDE NPD ESAMPLE=2000 SEED=1733 WRESCHOL
       ONEHEADER NOAPPEND NOPRINT FORMAT=s1PE23.16 FILE=npde_block_sigma_b.tab

NM-TRAN MESSAGES
 WARNINGS AND ERRORS (IF ANY) FOR PROBLEM    1
 (WARNING  2) NM-TRAN INFERS THAT THE DATA ARE POPULATION.
Note: Analytical 2nd Derivatives are constructed in FSUBS but are never used.
      You may insert $ABBR DERIV2=NO after the first $PROB to save FSUBS construction and compilation time

1NONLINEAR MIXED EFFECTS MODEL PROGRAM (NONMEM) VERSION 7.6.0 (nm760)
 ORIGINALLY DEVELOPED BY STUART BEAL, LEWIS SHEINER, AND ALISON BOECKMANN
 CURRENT DEVELOPERS ARE ROBERT BAUER, ICON DEVELOPMENT SOLUTIONS,
 AND ALISON BOECKMANN. IMPLEMENTATION, EFFICIENCY, AND STANDARDIZATION
 PERFORMED BY NOUS INFOSYSTEMS.
 PROBLEM NO.:         1
 NPDE/NPD with a cross-endpoint correlated residual via L2 (ferx #1733, a
 TOT. NO. OF OBS RECS:      240
 TOT. NO. OF INDIVIDUALS:       30
 ONE COMPARTMENT MODEL (ADVAN1)
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 #TBLN:      1
 #METH: First Order Conditional Estimation with Interaction (Evaluation)
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 Elapsed evaluation time in seconds:     0.04
 Elapsed postprocess time in seconds:     0.49

 ********************         FIRST ORDER CONDITIONAL ESTIMATION WITH INTERACTION (EVALUATION)       ********************
 #OBJT:**************                       MINIMUM VALUE OF OBJECTIVE FUNCTION                      ********************
 #OBJV:********************************************           179.239       *********************************************

 ********************         FIRST ORDER CONDITIONAL ESTIMATION WITH INTERACTION (EVALUATION)       ********************
 ********************                             FINAL PARAMETER ESTIMATE                           ********************

 THETA - VECTOR OF FIXED EFFECTS PARAMETERS   *********
         TH 1      TH 2
         1.00E+00  1.00E+01

 OMEGA - COV MATRIX FOR RANDOM EFFECTS - ETAS  ********
         ETA1
 ETA1
+        9.00E-02

 SIGMA - COV MATRIX FOR RANDOM EFFECTS - EPSILONS  ****
         EPS1      EPS2
 EPS1
+        2.50E-03
 EPS2
+       -1.20E-02  9.00E-02

 OMEGA - CORR MATRIX FOR RANDOM EFFECTS - ETAS  *******
         ETA1
 ETA1
+        3.00E-01

 SIGMA - CORR MATRIX FOR RANDOM EFFECTS - EPSILONS  ***
         EPS1      EPS2
 EPS1
+        5.00E-02
 EPS2
+       -8.00E-01  3.00E-01
 Elapsed finaloutput time in seconds:     0.02
 #CPUT: Total CPU Time in Seconds,        0.566
