Fri Sep 11 11:58:36 PM UTC 2026
$PROBLEM NPDE/NPD + IOV anchor (ferx #734) -- 1-cpt IV bolus, IOV on CL
; Twin of tests/fixtures/npde_iov_anchor.ferx on the identical dataset
; (npde_iov_anchor.csv, written by tests/gen_npde_iov_anchor.rs).
;
; Every parameter is FIXed at the value the data was simulated under, so the
; reference distribution NONMEM builds for $TABLE NPDE/NPD is the same
; population model ferx's compute_npde_npd builds -- the only difference is the
; Monte-Carlo stream. ESAMPLE/SEED mirror the ferx nsim/seed.
;
; ferx's `one_cpt_iv(cl=CL, v=V)` predicts a concentration A1/V, which is
; ADVAN1 TRANS2 with S1 = V.
$INPUT ID TIME DV EVID AMT CMT MDV OCC
$DATA npde_iov_anchor.csv IGNORE=@
$SUBROUTINES ADVAN1 TRANS2

$PK
  OC1 = 0
  OC2 = 0
  OC3 = 0
  IF(OCC.EQ.1) OC1 = 1
  IF(OCC.EQ.2) OC2 = 1
  IF(OCC.EQ.3) OC3 = 1
  KAPCL = OC1*ETA(3) + OC2*ETA(4) + OC3*ETA(5)
  CL = THETA(1)*EXP(ETA(1) + KAPCL)
  V  = THETA(2)*EXP(ETA(2))
  S1 = V

$ERROR
  IPRED = F
  Y = F*(1 + EPS(1))

$THETA
  5.0  FIX   ; TVCL
  50.0 FIX   ; TVV

$OMEGA 0.09 FIX          ; ETA_CL  (BSV)
$OMEGA 0.04 FIX          ; ETA_V   (BSV)
$OMEGA BLOCK(1) 0.09 FIX ; KAPPA_CL, occasion 1
$OMEGA BLOCK(1) SAME     ; occasion 2
$OMEGA BLOCK(1) SAME     ; occasion 3

$SIGMA 0.01 FIX          ; proportional, sd 0.1

$ESTIMATION MAXEVAL=0 METHOD=1 INTER NOABORT POSTHOC PRINT=1
$TABLE ID TIME DV NPDE NPD ESAMPLE=2000 SEED=734
       ONEHEADER NOAPPEND NOPRINT FORMAT=s1PE23.16 FILE=npde_iov_anchor.tab

NM-TRAN MESSAGES
 WARNINGS AND ERRORS (IF ANY) FOR PROBLEM    1
 (WARNING  2) NM-TRAN INFERS THAT THE DATA ARE POPULATION.
Note: Analytical 2nd Derivatives are constructed in FSUBS but are never used.
      You may insert $ABBR DERIV2=NO after the first $PROB to save FSUBS construction and compilation time

1NONLINEAR MIXED EFFECTS MODEL PROGRAM (NONMEM) VERSION 7.5.1
 ORIGINALLY DEVELOPED BY STUART BEAL, LEWIS SHEINER, AND ALISON BOECKMANN
 CURRENT DEVELOPERS ARE ROBERT BAUER, ICON DEVELOPMENT SOLUTIONS,
 AND ALISON BOECKMANN. IMPLEMENTATION, EFFICIENCY, AND STANDARDIZATION
 PERFORMED BY NOUS INFOSYSTEMS.
 PROBLEM NO.:         1
 NPDE/NPD + IOV anchor (ferx #734) -- 1-cpt IV bolus, IOV on CL
 TOT. NO. OF OBS RECS:      540
 TOT. NO. OF INDIVIDUALS:       60
 ONE COMPARTMENT MODEL (ADVAN1)
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 #TBLN:      1
 #METH: First Order Conditional Estimation with Interaction (Evaluation)
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 Elapsed evaluation time in seconds:     0.02
 Elapsed postprocess time in seconds:     1.26

 ********************         FIRST ORDER CONDITIONAL ESTIMATION WITH INTERACTION (EVALUATION)       ********************
 #OBJT:**************                       MINIMUM VALUE OF OBJECTIVE FUNCTION                      ********************
 #OBJV:********************************************    -1062.880       **************************************************

 ********************         FIRST ORDER CONDITIONAL ESTIMATION WITH INTERACTION (EVALUATION)       ********************
 ********************                             FINAL PARAMETER ESTIMATE                           ********************

 THETA - VECTOR OF FIXED EFFECTS PARAMETERS   *********
         TH 1      TH 2
         5.00E+00  5.00E+01

 OMEGA - COV MATRIX FOR RANDOM EFFECTS - ETAS  ********
         ETA1      ETA2      ETA3      ETA4      ETA5
 ETA1
+        9.00E-02
 ETA2
+        0.00E+00  4.00E-02
 ETA3
+        0.00E+00  0.00E+00  9.00E-02
 ETA4
+        0.00E+00  0.00E+00  0.00E+00  9.00E-02
 ETA5
+        0.00E+00  0.00E+00  0.00E+00  0.00E+00  9.00E-02

 SIGMA - COV MATRIX FOR RANDOM EFFECTS - EPSILONS  ****
         EPS1
 EPS1
+        1.00E-02

 OMEGA - CORR MATRIX FOR RANDOM EFFECTS - ETAS  *******
         ETA1      ETA2      ETA3      ETA4      ETA5
 ETA1
+        3.00E-01
 ETA2
+        0.00E+00  2.00E-01
 ETA3
+        0.00E+00  0.00E+00  3.00E-01
 ETA4
+        0.00E+00  0.00E+00  0.00E+00  3.00E-01
 ETA5
+        0.00E+00  0.00E+00  0.00E+00  0.00E+00  3.00E-01

 SIGMA - CORR MATRIX FOR RANDOM EFFECTS - EPSILONS  ***
         EPS1
 EPS1
+        1.00E-01
 Elapsed finaloutput time in seconds:     0.01
 #CPUT: Total CPU Time in Seconds,        1.337
