Thu Jul 23 08:11:58 PM UTC 2026
$PROBLEM oral_central_inf_advan4_f06
; #376: 2-cpt ORAL model (ADVAN4), infusion (RATE>0) into CMT=2 (central,
; depot bypass), F2=0.6. F2 duration-scaling (#419) on a 2-cpt oral central
; infusion: duration = F*AMT/RATE = 0.6*100/25 = 2.4 h at held rate 25.
$INPUT ID TIME DV AMT CMT EVID RATE SS II
$DATA oral_central_inf_advan4.csv IGNORE=@
$SUBROUTINES ADVAN4 TRANS4
$PK
  CL = 5
  V2 = 50
  Q  = 3
  V3 = 80
  KA = 1
  F2 = 0.6
  S2 = V2
$ERROR
  Y = F * (1 + EPS(1))
$THETA (5.0 FIX)   ; CL (unused; NONMEM needs >=1 THETA)
$OMEGA 0 FIX
$SIGMA 0.01 FIX
$ESTIMATION MAXEVAL=0 PRINT=1 NOABORT
$TABLE ID TIME CMT PRED NOPRINT ONEHEADER FILE=oral_central_inf_advan4_f06.tab FORMAT=,1PE17.10

NM-TRAN MESSAGES
 WARNINGS AND ERRORS (IF ANY) FOR PROBLEM    1
 (WARNING  2) NM-TRAN INFERS THAT THE DATA ARE POPULATION.
 (WARNING  46) ETA VARIABLES ARE NOT USED, BUT DATA ARE POPULATION TYPE.
Note: Analytical 2nd Derivatives are constructed in FSUBS but are never used.
      You may insert $ABBR DERIV2=NO after the first $PROB to save FSUBS construction and compilation time

1NONLINEAR MIXED EFFECTS MODEL PROGRAM (NONMEM) VERSION 7.6.0 (nm760)
 ORIGINALLY DEVELOPED BY STUART BEAL, LEWIS SHEINER, AND ALISON BOECKMANN
 CURRENT DEVELOPERS ARE ROBERT BAUER, ICON DEVELOPMENT SOLUTIONS,
 AND ALISON BOECKMANN. IMPLEMENTATION, EFFICIENCY, AND STANDARDIZATION
 PERFORMED BY NOUS INFOSYSTEMS.
 PROBLEM NO.:         1
 oral_central_inf_advan4_f06
 TOT. NO. OF OBS RECS:        5
 TOT. NO. OF INDIVIDUALS:        1
 TWO COMPARTMENT MODEL WITH FIRST-ORDER ABSORPTION (ADVAN4)
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 #TBLN:      1
 #METH: First Order (Evaluation)
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 Elapsed evaluation time in seconds:     0.01
 Elapsed postprocess time in seconds:     0.01

 ********************                             FIRST ORDER (EVALUATION)                           ********************
 #OBJT:**************                       MINIMUM VALUE OF OBJECTIVE FUNCTION                      ********************
 #OBJV:********************************************          2892.303       *********************************************

 ********************                             FIRST ORDER (EVALUATION)                           ********************
 ********************                             FINAL PARAMETER ESTIMATE                           ********************

 THETA - VECTOR OF FIXED EFFECTS PARAMETERS   *********
         TH 1
         5.00E+00

 OMEGA - COV MATRIX FOR RANDOM EFFECTS - ETAS  ********
         ETA1
 ETA1
+        0.00E+00

 SIGMA - COV MATRIX FOR RANDOM EFFECTS - EPSILONS  ****
         EPS1
 EPS1
+        1.00E-02

 OMEGA - CORR MATRIX FOR RANDOM EFFECTS - ETAS  *******
         ETA1
 ETA1
+        0.00E+00

 SIGMA - CORR MATRIX FOR RANDOM EFFECTS - EPSILONS  ***
         EPS1
 EPS1
+        1.00E-01
 Elapsed finaloutput time in seconds:     0.00
 #CPUT: Total CPU Time in Seconds,        0.029
