Sun Jun 28 05:50:34 PM UTC 2026
$PROBLEM Parallel dual first-order absorption -- NONMEM anchor for ferx FR1*first_order(ka=KA1)+FR2*first_order(ka=KA2) [#505]
; Reference fit for ferx's parallel (dual first-order) absorption: two first-order
; (Bateman) absorption pathways feeding a 1-cpt central compartment, split by a dose
; fraction FR1 / (1-FR1). Mirrors examples/parallel_absorption.ferx and the biphasic
; IG anchor (nonmem_anchor/freijer_biphasic_ig.ctl) -- same $DES + F1=0 + PODO trick,
; with each IG density replaced by a first-order input KA*exp(-KA*tad).
;
; The dataset parallel_oral.csv is simulated FROM this model
; (nonmem_anchor/simulate_parallel_data.py, same truths), so this is a matched
; (well-specified) fit: ferx and NONMEM should agree on OFV/THETA AND both recover
; the data-generating values.
;
; Identifiability: the two pathways are exchangeable (pathway 1 <-> 2 with
; FR1 <-> 1-FR1, KA1 <-> KA2). The KA1 > KA2 bounds below (fast vs slow) break that
; label symmetry; keep the same convention in the ferx fit when comparing.

$INPUT ID TIME DV AMT EVID CMT MDV
$DATA parallel_oral.csv IGNORE=@

$SUBROUTINES ADVAN13 TOL=9
$MODEL
  COMP=(DEPOT,DEFDOSE)     ; 1 = inert dose carrier (F1=0); first-order sum feeds central
  COMP=(CENTRAL,DEFOBS)    ; 2 = central (amount; concentration = A(2)/V)

$PK
  CL  = THETA(1)*EXP(ETA(1))
  V   = THETA(2)*EXP(ETA(2))
  FR1 = THETA(3)           ; fraction of dose through the fast pathway
  KA1 = THETA(4)           ; fast-pathway absorption rate (1/h)
  KA2 = THETA(5)           ; slow-pathway absorption rate (1/h)

  FR2 = 1.0 - FR1
  K20 = CL/V

  ; PODO (last oral dose amount) and TDOS (its time) captured at the dose record;
  ; NONMEM carries them forward for $DES to read.
  IF (AMT.GT.0.0.AND.CMT.EQ.1) PODO = AMT
  IF (AMT.GT.0.0.AND.CMT.EQ.1) TDOS = TIME
  ; F1=0: no bolus; PODO drives the two first-order inputs in $DES (each pathway's
  ; integral R_in = FRi*dose, so the total delivered is the dose).
  F1  = 0.0

$DES
  ; Time after the most recent dose (TDOS captured in $PK); = T here (dose at t=0).
  TAD = T - TDOS
  IF (TAD.LE.1.0E-10) TAD = 1.0E-10
  ; Each pathway: first-order (Bateman) input FOi = FRi * PODO * KAi * exp(-KAi*tad).
  FO1 = FR1*PODO*KA1*EXP(-KA1*TAD)
  FO2 = FR2*PODO*KA2*EXP(-KA2*TAD)
  RIN = FO1 + FO2                ; parallel input rate (dose split FR1 / 1-FR1)
  DADT(1) = 0.0                  ; depot is an inert dose carrier
  DADT(2) = RIN - K20*A(2)       ; dual first-order input straight into central

$ERROR
  IPRED = A(2)/V                 ; central concentration (mg/L)
  Y = IPRED*(1.0 + EPS(1))       ; proportional residual error

$THETA
  (0.1,   5.0,  100)   ; 1 CL    (L/h)
  (5.0,   50.0, 500)   ; 2 V     (L)
  (0.001, 0.6,  0.999) ; 3 FR1         fast-pathway fraction
  (0.5,   1.5,  24)    ; 4 KA1   (1/h) fast pathway (bounded > KA2 to break label symmetry)
  (0.01,  0.3,  0.5)   ; 5 KA2   (1/h) slow pathway

$OMEGA
  0.09    ; IIV CL
  0.09    ; IIV V

$SIGMA
  0.0225  ; proportional residual variance (0.15^2)

$ESTIMATION METHOD=1 INTER MAXEVAL=9999 PRINT=5 NOABORT
$COVARIANCE
$TABLE ID TIME DV IPRED CWRES MDV NOPRINT ONEHEADER FILE=parallel_first_order.tab

NM-TRAN MESSAGES
 WARNINGS AND ERRORS (IF ANY) FOR PROBLEM    1
 (WARNING  2) NM-TRAN INFERS THAT THE DATA ARE POPULATION.
Note: Analytical 2nd Derivatives are constructed in FSUBS but are never used.
      You may insert $ABBR DERIV2=NO after the first $PROB to save FSUBS construction and compilation time

1NONLINEAR MIXED EFFECTS MODEL PROGRAM (NONMEM) VERSION 7.6.0 (nm760)
 ORIGINALLY DEVELOPED BY STUART BEAL, LEWIS SHEINER, AND ALISON BOECKMANN
 CURRENT DEVELOPERS ARE ROBERT BAUER, ICON DEVELOPMENT SOLUTIONS,
 AND ALISON BOECKMANN. IMPLEMENTATION, EFFICIENCY, AND STANDARDIZATION
 PERFORMED BY NOUS INFOSYSTEMS.
 PROBLEM NO.:         1
 Parallel dual first-order absorption -- NONMEM anchor for ferx FR1*first
 TOT. NO. OF OBS RECS:      240
 TOT. NO. OF INDIVIDUALS:       20
 GENERAL NONLINEAR KINETICS MODEL WITH STIFF/NONSTIFF EQUATIONS (LSODA, ADVAN13)
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 #TBLN:      1
 #METH: First Order Conditional Estimation with Interaction
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
 #TERM:
0MINIMIZATION SUCCESSFUL
 NO. OF FUNCTION EVALUATIONS USED:      273
 NO. OF SIG. DIGITS IN FINAL EST.:  3.6

 ETABAR IS THE ARITHMETIC MEAN OF THE ETA-ESTIMATES,
 AND THE P-VALUE IS GIVEN FOR THE NULL HYPOTHESIS THAT THE TRUE MEAN IS 0.

 ETABAR:         2.3622E-03 -2.2604E-03
 SE:             4.6770E-02  4.4547E-02
 N:                      20          20

 P VAL.:         9.5972E-01  9.5953E-01

 ETASHRINKSD(%)  4.1027E+00  3.9485E+00
 ETASHRINKVR(%)  8.0370E+00  7.7411E+00
 EBVSHRINKSD(%)  3.7182E+00  3.7915E+00
 EBVSHRINKVR(%)  7.2982E+00  7.4392E+00
 RELATIVEINF(%)  9.2690E+01  9.2549E+01
 EPSSHRINKSD(%)  7.5973E+00
 EPSSHRINKVR(%)  1.4617E+01


 TOTAL DATA POINTS NORMALLY DISTRIBUTED (N):          240
 N*LOG(2PI) CONSTANT TO OBJECTIVE FUNCTION:    441.09049593824290
 OBJECTIVE FUNCTION VALUE WITHOUT CONSTANT:   -688.01937696349034
 OBJECTIVE FUNCTION VALUE WITH CONSTANT:      -246.92888102524745
 REPORTED OBJECTIVE FUNCTION DOES NOT CONTAIN CONSTANT

 TOTAL EFFECTIVE ETAS (NIND*NETA):                            40


 #TERE:
 Elapsed estimation  time in seconds:    11.68
 Elapsed covariance  time in seconds:     8.72
 Elapsed postprocess time in seconds:     0.11

 ********************               FIRST ORDER CONDITIONAL ESTIMATION WITH INTERACTION              ********************
 #OBJT:**************                       MINIMUM VALUE OF OBJECTIVE FUNCTION                      ********************
 #OBJV:********************************************          -688.019       *********************************************

 ********************               FIRST ORDER CONDITIONAL ESTIMATION WITH INTERACTION              ********************
 ********************                             FINAL PARAMETER ESTIMATE                           ********************

 THETA - VECTOR OF FIXED EFFECTS PARAMETERS   *********
         TH 1      TH 2      TH 3      TH 4      TH 5
         5.40E+00  5.53E+01  6.39E-01  1.37E+00  2.55E-01

 OMEGA - COV MATRIX FOR RANDOM EFFECTS - ETAS  ********
         ETA1      ETA2
 ETA1
+        4.76E-02
 ETA2
+        0.00E+00  4.30E-02

 SIGMA - COV MATRIX FOR RANDOM EFFECTS - EPSILONS  ****
         EPS1
 EPS1
+        2.52E-02

 OMEGA - CORR MATRIX FOR RANDOM EFFECTS - ETAS  *******
         ETA1      ETA2
 ETA1
+        2.18E-01
 ETA2
+        0.00E+00  2.07E-01

 SIGMA - CORR MATRIX FOR RANDOM EFFECTS - EPSILONS  ***
         EPS1
 EPS1
+        1.59E-01

 ********************               FIRST ORDER CONDITIONAL ESTIMATION WITH INTERACTION              ********************
 ********************                            STANDARD ERROR OF ESTIMATE                          ********************

 THETA - VECTOR OF FIXED EFFECTS PARAMETERS   *********
         TH 1      TH 2      TH 3      TH 4      TH 5
         2.76E-01  4.25E+00  5.38E-02  9.76E-02  3.37E-02

 OMEGA - COV MATRIX FOR RANDOM EFFECTS - ETAS  ********
         ETA1      ETA2
 ETA1
+        1.58E-02
 ETA2
+       .........  1.44E-02

 SIGMA - COV MATRIX FOR RANDOM EFFECTS - EPSILONS  ****
         EPS1
 EPS1
+        2.22E-03

 OMEGA - CORR MATRIX FOR RANDOM EFFECTS - ETAS  *******
         ETA1      ETA2
 ETA1
+        3.62E-02
 ETA2
+       .........  3.47E-02

 SIGMA - CORR MATRIX FOR RANDOM EFFECTS - EPSILONS  ***
         EPS1
 EPS1
+        6.99E-03

 ********************               FIRST ORDER CONDITIONAL ESTIMATION WITH INTERACTION              ********************
 ********************                          COVARIANCE MATRIX OF ESTIMATE                         ********************

            TH 1      TH 2      TH 3      TH 4      TH 5      OM11      OM12      OM22      SG11
 TH 1
+        7.59E-02
 TH 2
+        1.52E-01  1.81E+01
 TH 3
+        4.62E-03  1.10E-01  2.89E-03
 TH 4
+       -7.79E-03 -3.87E-02 -4.10E-03  9.53E-03
 TH 5
+       -6.94E-04  1.03E-01  1.05E-04  6.79E-04  1.13E-03
 OM11
+       -6.28E-04  5.30E-03 -2.17E-04  4.71E-04  1.37E-04  2.49E-04
 OM12
+       ......... ......... ......... ......... ......... ......... .........
 OM22
+        6.21E-04 -3.21E-02  8.69E-06 -4.10E-05 -2.90E-04 -6.45E-05 .........  2.08E-04
 SG11
+       -3.38E-05 -8.44E-04 -3.92E-05  7.64E-05 -4.29E-06  2.12E-06 ......... -1.88E-06  4.93E-06

 ********************               FIRST ORDER CONDITIONAL ESTIMATION WITH INTERACTION              ********************
 ********************                          CORRELATION MATRIX OF ESTIMATE                        ********************

            TH 1      TH 2      TH 3      TH 4      TH 5      OM11      OM12      OM22      SG11
 TH 1
+        2.76E-01
 TH 2
+        1.29E-01  4.25E+00
 TH 3
+        3.12E-01  4.79E-01  5.38E-02
 TH 4
+       -2.89E-01 -9.33E-02 -7.81E-01  9.76E-02
 TH 5
+       -7.49E-02  7.21E-01  5.83E-02  2.07E-01  3.37E-02
 OM11
+       -1.44E-01  7.91E-02 -2.56E-01  3.06E-01  2.59E-01  1.58E-02
 OM12
+       ......... ......... ......... ......... ......... ......... .........
 OM22
+        1.56E-01 -5.23E-01  1.12E-02 -2.91E-02 -5.98E-01 -2.84E-01 .........  1.44E-02
 SG11
+       -5.53E-02 -8.94E-02 -3.28E-01  3.53E-01 -5.74E-02  6.07E-02 ......... -5.87E-02  2.22E-03
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 Elapsed finaloutput time in seconds:     0.02
 #CPUT: Total CPU Time in Seconds,       20.554
