Wed Sep  2 11:58:00 AM UTC 2026
$PROBLEM Joint PK-TTE, RATE>0 into the absorption compartment -- external anchor for #1187
; ferx's joint PK-TTE cumulative hazard has two production routes: the #570 shared single
; solve (`ode_predictions_and_chz` -> `active_infusions`) and the two-solve fallback
; (`ode_cumhaz_hazard` -> `ode_dense_solve_states` -> `gated_infusions`). Only the second
; resolved infusions through the unguarded helper, so a RATE>0 dose into a built-in
; absorption compartment was delivered TWICE on that arm -- once by the convolved
; `R_in_inf` kernel and again as a plain `+rate`.
;
; NONMEM integrates the augmented system ONCE and has no such split, so it is the outside
; reference. Identical to `../pktte-engine-split/pktte_eta0.ctl` except the dose carries
; RATE=50 (AMT=100 -> T=2h zero-order fill of the depot). ADVAN2's zero-order-into-depot
; behaviour is what ferx's `first_order()` + `R_in_inf` convolution reproduces, already
; anchored by `tests/infusion_absorption_nonmem_anchor.rs`.
;
; Compared object is the CUMULATIVE HAZARD A(3), not the OFV: a likelihood model (F_FLAG=1)
; carries different additive constants in NONMEM than in ferx. A(3) is constant-free.
;
; MAXEVAL=0 POSTHOC, every THETA FIX, OMEGA 0 FIX so both tools evaluate at eta = 0.

$INPUT ID TIME DV EVID AMT CMT RATE MDV
$DATA pktte_inf.csv IGNORE=@

$SUBROUTINES ADVAN13 TOL=9
$MODEL
  COMP=(DEPOT,DEFDOSE)
  COMP=(CENTRAL)
  COMP=(CHZ)

$PK
  CL   = THETA(1)*EXP(ETA(1))
  V    = THETA(2)
  KA   = THETA(3)
  H0   = THETA(4)
  BETA = THETA(5)
  K20  = CL/V

$DES
  CONCD   = A(2)/V
  DADT(1) = -KA*A(1)
  DADT(2) =  KA*A(1) - K20*A(2)
  DADT(3) =  H0*EXP(BETA*CONCD)

$ERROR
  CONC = A(2)/V
  HAZ  = H0*EXP(BETA*CONC)
  CHZ  = A(3)
  SUR  = EXP(-CHZ)
  IPRED = CONC
  F_FLAG = 0
  IF (CMT.EQ.3) F_FLAG = 1
  ; Single-level IFs only: NM-TRAN error 326 rejects a random variable assigned inside a
  ; NESTED if-structure, so the CMT/DV test is folded into one condition per branch.
  Y = IPRED*(1.0 + EPS(1))
  IF (CMT.EQ.3.AND.DV.EQ.1) Y = SUR*HAZ
  IF (CMT.EQ.3.AND.DV.EQ.0) Y = SUR

$THETA
  1.00 FIX   ; 1 CL   (L/h)
  10.0 FIX   ; 2 V    (L)
  1.00 FIX   ; 3 KA   (1/h)
  0.02 FIX   ; 4 H0   baseline hazard
  0.50 FIX   ; 5 BETA concentration effect on log-hazard

$OMEGA
  0 FIX      ; IIV CL -- zeroed so ferx and NONMEM are compared at the SAME point (eta=0)

$SIGMA
  0.01       ; proportional residual variance (0.10^2)

$ESTIMATION METHOD=1 LAPLACE INTER NUMERICAL SLOW MAXEVAL=0 POSTHOC PRINT=1 NOABORT
; FORMAT is load-bearing: $TABLE's default prints 5 significant figures, so a banked
; reference of 1.2217E-01 carries +/-5e-6 of its own rounding = 4.1e-5 relative. That is
; the floor on any tolerance the anchor can assert, regardless of how close ferx actually
; is. s1PE15.8 gives 9 significant figures and moves the floor to ~1e-9.
$TABLE ID TIME CMT DV IPRED CHZ HAZ ETA1 MDV NOPRINT ONEHEADER NOAPPEND
       FORMAT=s1PE15.8 FILE=pktte_inf.tab

NM-TRAN MESSAGES
 WARNINGS AND ERRORS (IF ANY) FOR PROBLEM    1
 (WARNING  2) NM-TRAN INFERS THAT THE DATA ARE POPULATION.
Note: Analytical 2nd Derivatives are constructed in FSUBS but are never used.
      You may insert $ABBR DERIV2=NO after the first $PROB to save FSUBS construction and compilation time

1NONLINEAR MIXED EFFECTS MODEL PROGRAM (NONMEM) VERSION 7.6.0 (nm760)
 ORIGINALLY DEVELOPED BY STUART BEAL, LEWIS SHEINER, AND ALISON BOECKMANN
 CURRENT DEVELOPERS ARE ROBERT BAUER, ICON DEVELOPMENT SOLUTIONS,
 AND ALISON BOECKMANN. IMPLEMENTATION, EFFICIENCY, AND STANDARDIZATION
 PERFORMED BY NOUS INFOSYSTEMS.
 PROBLEM NO.:         1
 Joint PK-TTE, RATE>0 into the absorption compartment -- external anchor
 TOT. NO. OF OBS RECS:        9
 TOT. NO. OF INDIVIDUALS:        1
 GENERAL NONLINEAR KINETICS MODEL WITH STIFF/NONSTIFF EQUATIONS (LSODA, ADVAN13)
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 #TBLN:      1
 #METH: Laplacian Conditional Estimation with Interaction (Evaluation)
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 Elapsed evaluation time in seconds:     0.00
 Elapsed postprocess time in seconds:     0.00

 ********************          LAPLACIAN CONDITIONAL ESTIMATION WITH INTERACTION (EVALUATION)        ********************
 #OBJT:**************                       MINIMUM VALUE OF OBJECTIVE FUNCTION                      ********************
 #OBJV:********************************************          6782.093       *********************************************

 ********************          LAPLACIAN CONDITIONAL ESTIMATION WITH INTERACTION (EVALUATION)        ********************
 ********************                             FINAL PARAMETER ESTIMATE                           ********************

 THETA - VECTOR OF FIXED EFFECTS PARAMETERS   *********
         TH 1      TH 2      TH 3      TH 4      TH 5
         1.00E+00  1.00E+01  1.00E+00  2.00E-02  5.00E-01

 OMEGA - COV MATRIX FOR RANDOM EFFECTS - ETAS  ********
         ETA1
 ETA1
+        0.00E+00

 SIGMA - COV MATRIX FOR RANDOM EFFECTS - EPSILONS  ****
         EPS1
 EPS1
+        1.00E-02

 OMEGA - CORR MATRIX FOR RANDOM EFFECTS - ETAS  *******
         ETA1
 ETA1
+        0.00E+00

 SIGMA - CORR MATRIX FOR RANDOM EFFECTS - EPSILONS  ***
         EPS1
 EPS1
+        1.00E-01
 Elapsed finaloutput time in seconds:     0.00
 #CPUT: Total CPU Time in Seconds,        0.034
