Fri Sep 11 03:10:12 AM UTC 2026
; #254 parameter-prior anchor — STEP 1, the null control.
;
; One-compartment oral warfarin, with the structural parameters written on the
; LOG scale (CL = EXP(THETA(1))) so that a NONMEM $PRIOR NWPRI normal prior on
; THETA(1) is a normal prior on exactly the coordinate ferx penalizes. This run
; carries NO prior: it fixes the common baseline the priored run is compared
; against, so the anchor is a DELTA and every normalization constant — NONMEM's
; and ferx's alike — cancels.
;
; Estimation is evaluation-only (MAXEVAL=0) at a fixed point, deliberately: the
; quantity under test is the OBJECTIVE, not an optimizer's path to a minimum, and
; pinning the point removes any chance that the two engines' minimizers land
; somewhere different and confound the comparison.
$PROBLEM warfarin 1-cpt oral, log-parameterised, no prior

$INPUT ID TIME DV EVID AMT DROP RATE MDV
$DATA ../data/warfarin.csv IGNORE=@

$SUBROUTINE ADVAN2 TRANS2

$PK
  CL = EXP(THETA(1) + ETA(1))
  V  = EXP(THETA(2) + ETA(2))
  KA = EXP(THETA(3))
  S2 = V

$ERROR
  IPRED = F
  Y = IPRED * (1 + EPS(1))

; LOG-scale typical values. exp(-2.0217) = 0.13246, exp(2.0450) = 7.7297,
; exp(-0.3212) = 0.72526 — the unpriored ferx optimum, so both engines are
; evaluated at the same point.
$THETA -2.0000      ; log CL
$THETA  2.0450      ; log V
$THETA -0.3212      ; log KA

$OMEGA 0.0455       ; IIV CL
$OMEGA 0.0145       ; IIV V

$SIGMA 0.01055      ; proportional

$ESTIMATION METHOD=1 INTERACTION MAXEVAL=0 PRINT=1 NOABORT

NM-TRAN MESSAGES
 WARNINGS AND ERRORS (IF ANY) FOR PROBLEM    1
 (WARNING  2) NM-TRAN INFERS THAT THE DATA ARE POPULATION.
Note: Analytical 2nd Derivatives are constructed in FSUBS but are never used.
      You may insert $ABBR DERIV2=NO after the first $PROB to save FSUBS construction and compilation time

1NONLINEAR MIXED EFFECTS MODEL PROGRAM (NONMEM) VERSION 7.5.1
 ORIGINALLY DEVELOPED BY STUART BEAL, LEWIS SHEINER, AND ALISON BOECKMANN
 CURRENT DEVELOPERS ARE ROBERT BAUER, ICON DEVELOPMENT SOLUTIONS,
 AND ALISON BOECKMANN. IMPLEMENTATION, EFFICIENCY, AND STANDARDIZATION
 PERFORMED BY NOUS INFOSYSTEMS.
 PROBLEM NO.:         1
 warfarin 1-cpt oral, log-parameterised, no prior
 TOT. NO. OF OBS RECS:      110
 TOT. NO. OF INDIVIDUALS:       10
 ONE COMPARTMENT MODEL WITH FIRST-ORDER ABSORPTION (ADVAN2)
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 #TBLN:      1
 #METH: First Order Conditional Estimation with Interaction (Evaluation)
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 Elapsed evaluation time in seconds:     0.00
 Elapsed postprocess time in seconds:     0.00

 ********************         FIRST ORDER CONDITIONAL ESTIMATION WITH INTERACTION (EVALUATION)       ********************
 #OBJT:**************                       MINIMUM VALUE OF OBJECTIVE FUNCTION                      ********************
 #OBJV:********************************************      177.826       **************************************************

 ********************         FIRST ORDER CONDITIONAL ESTIMATION WITH INTERACTION (EVALUATION)       ********************
 ********************                             FINAL PARAMETER ESTIMATE                           ********************

 THETA - VECTOR OF FIXED EFFECTS PARAMETERS   *********
         TH 1      TH 2      TH 3
        -2.00E+00  2.04E+00 -3.21E-01

 OMEGA - COV MATRIX FOR RANDOM EFFECTS - ETAS  ********
         ETA1      ETA2
 ETA1
+        4.55E-02
 ETA2
+        0.00E+00  1.45E-02

 SIGMA - COV MATRIX FOR RANDOM EFFECTS - EPSILONS  ****
         EPS1
 EPS1
+        1.06E-02

 OMEGA - CORR MATRIX FOR RANDOM EFFECTS - ETAS  *******
         ETA1      ETA2
 ETA1
+        2.13E-01
 ETA2
+        0.00E+00  1.20E-01

 SIGMA - CORR MATRIX FOR RANDOM EFFECTS - EPSILONS  ***
         EPS1
 EPS1
+        1.03E-01
 Elapsed finaloutput time in seconds:     0.00
 #CPUT: Total CPU Time in Seconds,        0.015
