Fri Sep 11 03:13:04 AM UTC 2026
; #254 parameter-prior anchor — the CENTERED reference run (step 1 of 2).
;
; Paired with `prior_theta_nwpri_centered.ctl`, which is identical except for ONE
; number: `$THETAP`'s first entry. That is deliberate — the anchor is a difference
; of two NONMEM runs varying a single input, so every additive constant NONMEM
; carries (its own normalisation of the prior density, the data term, whatever
; either engine includes or drops) cancels exactly, and what remains is the
; prior's quadratic contribution alone.
;
;   centered run : THETAP(1) = -2.0000    == THETA(1), so its quadratic term is 0
;   this run     : THETAP(1) = -1.8971200 == log(0.15), so it is not
;
;   expected difference = ((-2.0000 + 1.8971200) / 0.30)^2 = 0.1176027...
;
; Why NTHETA=3 and not 1: NWPRI's `NTHETA` must cover every THETA in the
; estimation problem, so thetas 2 and 3 are given prior means exactly equal to
; their own values (zero quadratic contribution) and a variance of 1e6 (flat).
; They contribute the same constant to both runs and drop out.
;
; `CL = EXP(THETA(1) + ETA(1))` makes THETA(1) log CL — the same coordinate ferx
; penalizes for an identity-packed theta — so this is a normal prior on the same
; quantity, with the same mean and the same SD, as the ferx twin.
;
; MAXEVAL=0: the quantity under test is the OBJECTIVE, not an optimizer's path to
; a minimum. Pinning the point removes any chance the two engines' minimizers
; land somewhere different and confound the comparison.
$PROBLEM warfarin 1-cpt oral, log-parameterised, NWPRI on log CL (centered)

$INPUT ID TIME DV EVID AMT DROP RATE MDV
$DATA ../data/warfarin.csv IGNORE=@

$SUBROUTINE ADVAN2 TRANS2

$PRIOR NWPRI NTHETA=3 NETA=2 NTHP=3 NETP=0

$PK
  CL = EXP(THETA(1) + ETA(1))
  V  = EXP(THETA(2) + ETA(2))
  KA = EXP(THETA(3))
  S2 = V

$ERROR
  IPRED = F
  Y = IPRED * (1 + EPS(1))

$THETA -2.0000      ; log CL
$THETA  2.0450      ; log V
$THETA -0.3212      ; log KA

$OMEGA 0.0455       ; IIV CL
$OMEGA 0.0145       ; IIV V

$SIGMA 0.01055      ; proportional

; --- prior block -----------------------------------------------------------
; THETAP(1) = log(0.15); the other two sit on their own values (inert).
$THETAP (-2.0000 FIX) (2.0450 FIX) (-0.3212 FIX)

; Lower triangle of the prior VARIANCE matrix, as a BLOCK — NWPRI requires the
; `BLOCK(n) FIX` form here and rejects per-element `FIX` with "INPUTS SPECIFIED
; TO ROUTINE NWPRI ARE INAPPROPRIATE".
;
;   0.30^2 = 0.09 on log CL (the prior under test);
;   100 on the other two — flat for a log-scale parameter of order 1, and they
;   already sit on their own prior means, so their quadratic term is 0 in BOTH
;   runs and cancels in the difference.
$THETAPV BLOCK(3) FIX
 0.09
 0.0   100.0
 0.0   0.0    100.0

$ESTIMATION METHOD=1 INTERACTION MAXEVAL=0 PRINT=1 NOABORT

NM-TRAN MESSAGES
 WARNINGS AND ERRORS (IF ANY) FOR PROBLEM    1
 (WARNING  2) NM-TRAN INFERS THAT THE DATA ARE POPULATION.
Note: Analytical 2nd Derivatives are constructed in FSUBS but are never used.
      You may insert $ABBR DERIV2=NO after the first $PROB to save FSUBS construction and compilation time

1NONLINEAR MIXED EFFECTS MODEL PROGRAM (NONMEM) VERSION 7.5.1
 ORIGINALLY DEVELOPED BY STUART BEAL, LEWIS SHEINER, AND ALISON BOECKMANN
 CURRENT DEVELOPERS ARE ROBERT BAUER, ICON DEVELOPMENT SOLUTIONS,
 AND ALISON BOECKMANN. IMPLEMENTATION, EFFICIENCY, AND STANDARDIZATION
 PERFORMED BY NOUS INFOSYSTEMS.
 PROBLEM NO.:         1
 warfarin 1-cpt oral, log-parameterised, NWPRI on log CL (centered)
 TOT. NO. OF OBS RECS:      110
 TOT. NO. OF INDIVIDUALS:       10
 ONE COMPARTMENT MODEL WITH FIRST-ORDER ABSORPTION (ADVAN2)
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 #TBLN:      1
 #METH: First Order Conditional Estimation with Interaction (Evaluation)
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 Elapsed evaluation time in seconds:     0.00
 Elapsed postprocess time in seconds:     0.00

 ********************         FIRST ORDER CONDITIONAL ESTIMATION WITH INTERACTION (EVALUATION)       ********************
 #OBJT:**************                       MINIMUM VALUE OF OBJECTIVE FUNCTION                      ********************
 #OBJV:********************************************      177.826       **************************************************

 ********************         FIRST ORDER CONDITIONAL ESTIMATION WITH INTERACTION (EVALUATION)       ********************
 ********************                             FINAL PARAMETER ESTIMATE                           ********************

 THETA - VECTOR OF FIXED EFFECTS PARAMETERS   *********
         TH 1      TH 2      TH 3
        -2.00E+00  2.04E+00 -3.21E-01

 OMEGA - COV MATRIX FOR RANDOM EFFECTS - ETAS  ********
         ETA1      ETA2
 ETA1
+        4.55E-02
 ETA2
+        0.00E+00  1.45E-02

 SIGMA - COV MATRIX FOR RANDOM EFFECTS - EPSILONS  ****
         EPS1
 EPS1
+        1.06E-02

 OMEGA - CORR MATRIX FOR RANDOM EFFECTS - ETAS  *******
         ETA1      ETA2
 ETA1
+        2.13E-01
 ETA2
+        0.00E+00  1.20E-01

 SIGMA - CORR MATRIX FOR RANDOM EFFECTS - EPSILONS  ***
         EPS1
 EPS1
+        1.03E-01
 Elapsed finaloutput time in seconds:     0.00
 #CPUT: Total CPU Time in Seconds,        0.029
