Tue Jun 16 05:14:01 PM UTC 2026
$PROBLEM    Savic 2007 transit-compartment absorption -- NONMEM anchor
;           for ferx transit() [#343]
; Reference fit for ferx's built-in transit(n, mtt) input-rate function.

; One-compartment oral disposition; Savic continuous-N transit absorption.

; Fit this, then fit examples/transit_savic.ferx in ferx on the SAME data and

; compare OFV + THETA estimates (see README.md).
$INPUT      ID TIME DV AMT EVID CMT MDV
$DATA      transit_oral.csv IGNORE=@
$SUBROUTINE ADVAN13 TOL=9
$MODEL      COMP=(DEPOT,DEFDOSE) ; 1=depot   (oral dose lands here; bolus suppressed by F1=0)
            COMP=(CENTRAL,DEFOBS) ; 2=central (amount; concentration=A(2)/V)
$PK
  TVCL  = THETA(1)
  TVV   = THETA(2)
  TVKA  = THETA(3)
  TVMTT = THETA(4)
  TVN   = THETA(5)

  CL  = TVCL*EXP(ETA(1))
  V   = TVV *EXP(ETA(2))
  KA  = TVKA
  MTT = TVMTT
  NN  = TVN

  KTR = (NN + 1.0)/MTT
  K20 = CL/V

  ; ---- ln Gamma(NN+1) via Lanczos g=7, n=9 --------------------------------
  ; Byte-for-byte the coefficients in ferx src/stats/special.rs::ln_gamma, so
  ; the gamma special-function is NOT a source of ferx-vs-NONMEM discrepancy.
  ; ferx evaluates with x = NN+1, x' = x-1 = NN; reflection branch (x<0.5) is
  ; never reached here because NN >= 0.
  XX  = NN
  AA  = 0.99999999999980993
  AA  = AA + 676.5203681218851      / (XX + 1.0)
  AA  = AA - 1259.1392167224028     / (XX + 2.0)
  AA  = AA + 771.32342877765313     / (XX + 3.0)
  AA  = AA - 176.61502916214059     / (XX + 4.0)
  AA  = AA + 12.507343278686905     / (XX + 5.0)
  AA  = AA - 0.13857109526572012    / (XX + 6.0)
  AA  = AA + 9.9843695780195716E-06 / (XX + 7.0)
  AA  = AA + 1.5056327351493116E-07 / (XX + 8.0)
  TG  = XX + 7.5
  LNG = 0.91893853320467274 + (XX + 0.5)*LOG(TG) - TG + LOG(AA)   ; = ln Gamma(NN+1)

  ; ---- dose routing: feed transit(), not a bolus --------------------------
  ; PODO (last oral dose amount) and TDOS (its time) are NOT reserved variables
  ; in NONMEM -- capture them at the dose record. NONMEM carries a variable's
  ; value forward across records, so $DES reads them on later observation rows.
  IF (AMT.GT.0.0.AND.CMT.EQ.1) PODO = AMT
  IF (AMT.GT.0.0.AND.CMT.EQ.1) TDOS = TIME
  ; F1=0 suppresses the depot bolus; PODO drives R_in in $DES. The NONMEM analogue
  ; of ferx delivering the dose as R_in and suppressing the instantaneous bolus
  ; (no double counting; integral R_in = dose). With bioavailability, use BIO*PODO.
  F1  = 0.0

$DES
  ; Time after the most recent dose: T is the absolute integration time and TDOS
  ; the captured dose time, so TAD = T - TDOS (= T here, the dose being at t=0).
  TAD = T - TDOS
  IF (TAD.LE.1.0E-10) TAD = 1.0E-10
  ; R_in(tad) = PODO * KTR*(KTR*tad)^NN * exp(-KTR*tad) / Gamma(NN+1), log-domain.
  LNR = LOG(PODO) + LOG(KTR) + NN*LOG(KTR*TAD) - KTR*TAD - LNG
  RIN = EXP(LNR)
  DADT(1) = RIN - KA*A(1)
  DADT(2) = KA*A(1) - K20*A(2)

$ERROR
  IPRED = A(2)/V                 ; central concentration (mg/L)
  Y = IPRED*(1.0 + EPS(1))       ; proportional residual error

$THETA  (0.1,5.0,100) ; 1 TVCL  (L/h)
 (5.0,50.0,500) ; 2 TVV   (L)
 (0.05,1.0,24) ; 3 TVKA  (1/h)
 (0.05,1.0,24) ; 4 TVMTT (h)   KTR=(N+1)/MTT
 (0.1,3.0,30) ; 5 TVN   transit compartments (continuous)
$OMEGA  0.09  ; IIV CL  (~30% CV)
 0.09  ; IIV V   (~30% CV)
$SIGMA  0.0225  ; proportional residual variance (0.15^2)
$ESTIMATION METHOD=1 INTER MAXEVAL=9999 PRINT=5 NOABORT
$COVARIANCE
$TABLE      ID TIME DV IPRED CWRES MDV NOPRINT ONEHEADER
            FILE=savic.tab

NM-TRAN MESSAGES
 WARNINGS AND ERRORS (IF ANY) FOR PROBLEM    1
 (WARNING  2) NM-TRAN INFERS THAT THE DATA ARE POPULATION.
Note: Analytical 2nd Derivatives are constructed in FSUBS but are never used.
      You may insert $ABBR DERIV2=NO after the first $PROB to save FSUBS construction and compilation time

1NONLINEAR MIXED EFFECTS MODEL PROGRAM (NONMEM) VERSION 7.6.0 (nm760)
 ORIGINALLY DEVELOPED BY STUART BEAL, LEWIS SHEINER, AND ALISON BOECKMANN
 CURRENT DEVELOPERS ARE ROBERT BAUER, ICON DEVELOPMENT SOLUTIONS,
 AND ALISON BOECKMANN. IMPLEMENTATION, EFFICIENCY, AND STANDARDIZATION
 PERFORMED BY NOUS INFOSYSTEMS.
 PROBLEM NO.:         1
 Savic 2007 transit-compartment absorption -- NONMEM anchor
 TOT. NO. OF OBS RECS:      240
 TOT. NO. OF INDIVIDUALS:       20
 GENERAL NONLINEAR KINETICS MODEL WITH STIFF/NONSTIFF EQUATIONS (LSODA, ADVAN13)
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 #TBLN:      1
 #METH: First Order Conditional Estimation with Interaction
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
 #TERM:
0MINIMIZATION SUCCESSFUL
 NO. OF FUNCTION EVALUATIONS USED:      206
 NO. OF SIG. DIGITS IN FINAL EST.:  3.6

 ETABAR IS THE ARITHMETIC MEAN OF THE ETA-ESTIMATES,
 AND THE P-VALUE IS GIVEN FOR THE NULL HYPOTHESIS THAT THE TRUE MEAN IS 0.

 ETABAR:         2.5137E-03 -2.1524E-03
 SE:             4.6939E-02  4.4719E-02
 N:                      20          20

 P VAL.:         9.5729E-01  9.6161E-01

 ETASHRINKSD(%)  4.1765E+00  3.6293E+00
 ETASHRINKVR(%)  8.1787E+00  7.1269E+00
 EBVSHRINKSD(%)  3.7836E+00  3.4977E+00
 EBVSHRINKVR(%)  7.4241E+00  6.8731E+00
 RELATIVEINF(%)  9.2557E+01  9.3108E+01
 EPSSHRINKSD(%)  7.6157E+00
 EPSSHRINKVR(%)  1.4651E+01


 TOTAL DATA POINTS NORMALLY DISTRIBUTED (N):          240
 N*LOG(2PI) CONSTANT TO OBJECTIVE FUNCTION:    441.09049593824290
 OBJECTIVE FUNCTION VALUE WITHOUT CONSTANT:   -1077.1256237639013
 OBJECTIVE FUNCTION VALUE WITH CONSTANT:      -636.03512782565849
 REPORTED OBJECTIVE FUNCTION DOES NOT CONTAIN CONSTANT

 TOTAL EFFECTIVE ETAS (NIND*NETA):                            40


 #TERE:
 Elapsed estimation  time in seconds:     7.38
 Elapsed covariance  time in seconds:     8.22
 Elapsed postprocess time in seconds:     0.11

 ********************               FIRST ORDER CONDITIONAL ESTIMATION WITH INTERACTION              ********************
 #OBJT:**************                       MINIMUM VALUE OF OBJECTIVE FUNCTION                      ********************
 #OBJV:********************************************         -1077.126       *********************************************

 ********************               FIRST ORDER CONDITIONAL ESTIMATION WITH INTERACTION              ********************
 ********************                             FINAL PARAMETER ESTIMATE                           ********************

 THETA - VECTOR OF FIXED EFFECTS PARAMETERS   *********
         TH 1      TH 2      TH 3      TH 4      TH 5
         5.39E+00  5.62E+01  9.52E-01  9.65E-01  3.13E+00

 OMEGA - COV MATRIX FOR RANDOM EFFECTS - ETAS  ********
         ETA1      ETA2
 ETA1
+        4.80E-02
 ETA2
+        0.00E+00  4.31E-02

 SIGMA - COV MATRIX FOR RANDOM EFFECTS - EPSILONS  ****
         EPS1
 EPS1
+        2.55E-02

 OMEGA - CORR MATRIX FOR RANDOM EFFECTS - ETAS  *******
         ETA1      ETA2
 ETA1
+        2.19E-01
 ETA2
+        0.00E+00  2.08E-01

 SIGMA - CORR MATRIX FOR RANDOM EFFECTS - EPSILONS  ***
         EPS1
 EPS1
+        1.60E-01

 ********************               FIRST ORDER CONDITIONAL ESTIMATION WITH INTERACTION              ********************
 ********************                            STANDARD ERROR OF ESTIMATE                          ********************

 THETA - VECTOR OF FIXED EFFECTS PARAMETERS   *********
         TH 1      TH 2      TH 3      TH 4      TH 5
         2.73E-01  2.85E+00  7.66E-02  4.39E-02  1.19E-01

 OMEGA - COV MATRIX FOR RANDOM EFFECTS - ETAS  ********
         ETA1      ETA2
 ETA1
+        1.58E-02
 ETA2
+       .........  1.41E-02

 SIGMA - COV MATRIX FOR RANDOM EFFECTS - EPSILONS  ****
         EPS1
 EPS1
+        2.26E-03

 OMEGA - CORR MATRIX FOR RANDOM EFFECTS - ETAS  *******
         ETA1      ETA2
 ETA1
+        3.62E-02
 ETA2
+       .........  3.40E-02

 SIGMA - CORR MATRIX FOR RANDOM EFFECTS - EPSILONS  ***
         EPS1
 EPS1
+        7.08E-03

 ********************               FIRST ORDER CONDITIONAL ESTIMATION WITH INTERACTION              ********************
 ********************                          COVARIANCE MATRIX OF ESTIMATE                         ********************

            TH 1      TH 2      TH 3      TH 4      TH 5      OM11      OM12      OM22      SG11
 TH 1
+        7.45E-02
 TH 2
+        1.01E-01  8.12E+00
 TH 3
+        1.39E-03 -3.26E-03  5.87E-03
 TH 4
+       -2.98E-04 -1.78E-02  2.97E-03  1.93E-03
 TH 5
+        4.49E-03  4.65E-02 -5.84E-03 -4.65E-03  1.41E-02
 OM11
+       -6.61E-04  4.42E-04 -4.36E-04 -1.63E-04  1.49E-04  2.51E-04
 OM12
+       ......... ......... ......... ......... ......... ......... .........
 OM22
+        5.25E-04 -1.65E-02  1.63E-04 -3.41E-06  9.96E-05 -5.97E-05 .........  1.99E-04
 SG11
+       -4.14E-05  2.40E-04 -5.00E-05 -2.10E-05  1.47E-05  2.29E-06 ......... -4.40E-06  5.10E-06

 ********************               FIRST ORDER CONDITIONAL ESTIMATION WITH INTERACTION              ********************
 ********************                          CORRELATION MATRIX OF ESTIMATE                        ********************

            TH 1      TH 2      TH 3      TH 4      TH 5      OM11      OM12      OM22      SG11
 TH 1
+        2.73E-01
 TH 2
+        1.30E-01  2.85E+00
 TH 3
+        6.66E-02 -1.50E-02  7.66E-02
 TH 4
+       -2.49E-02 -1.42E-01  8.82E-01  4.39E-02
 TH 5
+        1.38E-01  1.37E-01 -6.41E-01 -8.90E-01  1.19E-01
 OM11
+       -1.53E-01  9.80E-03 -3.59E-01 -2.34E-01  7.93E-02  1.58E-02
 OM12
+       ......... ......... ......... ......... ......... ......... .........
 OM22
+        1.36E-01 -4.10E-01  1.50E-01 -5.50E-03  5.93E-02 -2.67E-01 .........  1.41E-02
 SG11
+       -6.71E-02  3.74E-02 -2.89E-01 -2.11E-01  5.45E-02  6.40E-02 ......... -1.38E-01  2.26E-03
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 Elapsed finaloutput time in seconds:     0.01
 #CPUT: Total CPU Time in Seconds,       15.813
