Fri Aug 21 09:19:49 PM UTC 2026
$PROBLEM ferx #1028 anchor -- TIME in the structural readout ([scaling] y vs $ERROR IPRED)
$INPUT ID TIME DV MDV EVID AMT CMT
$DATA scaling_time_readout.csv IGNORE=@

$SUBROUTINE ADVAN13 TOL=9

$MODEL
  COMP=(CENTRAL, DEFDOSE)

$PK
  CL   = THETA(1)
  V    = THETA(2)
  BETA = THETA(3)
  T50  = THETA(4)
  K    = CL/V

$DES
  DADT(1) = -K*A(1)

$ERROR
  IPRED = A(1)/V + BETA*TIME/(TIME + T50)
  Y = IPRED*(1+EPS(1))

$THETA
  (5.0 FIX)   ; CL
  (50.0 FIX)  ; V
  (3.0 FIX)   ; BETA  -- Emax of the response-vs-time term
  (4.0 FIX)   ; T50   -- half-maximal time

$OMEGA 0 FIX
$SIGMA 0.01 FIX

$ESTIMATION MAXEVAL=0 METHOD=1 INTER
$TABLE ID TIME IPRED NOPRINT ONEHEADER FILE=sdtab.tab

NM-TRAN MESSAGES
 WARNINGS AND ERRORS (IF ANY) FOR PROBLEM    1
 (WARNING  2) NM-TRAN INFERS THAT THE DATA ARE POPULATION.
 (WARNING  46) ETA VARIABLES ARE NOT USED, BUT DATA ARE POPULATION TYPE.
Note: Analytical 2nd Derivatives are constructed in FSUBS but are never used.
      You may insert $ABBR DERIV2=NO after the first $PROB to save FSUBS construction and compilation time

1NONLINEAR MIXED EFFECTS MODEL PROGRAM (NONMEM) VERSION 7.6.0 (nm760)
 ORIGINALLY DEVELOPED BY STUART BEAL, LEWIS SHEINER, AND ALISON BOECKMANN
 CURRENT DEVELOPERS ARE ROBERT BAUER, ICON DEVELOPMENT SOLUTIONS,
 AND ALISON BOECKMANN. IMPLEMENTATION, EFFICIENCY, AND STANDARDIZATION
 PERFORMED BY NOUS INFOSYSTEMS.
 PROBLEM NO.:         1
 ferx #1028 anchor -- TIME in the structural readout ([scaling] y vs $ERR
 TOT. NO. OF OBS RECS:        7
 TOT. NO. OF INDIVIDUALS:        1
 GENERAL NONLINEAR KINETICS MODEL WITH STIFF/NONSTIFF EQUATIONS (LSODA, ADVAN13)
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 #TBLN:      1
 #METH: First Order Conditional Estimation with Interaction (Evaluation)
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 Elapsed evaluation time in seconds:     0.00
 Elapsed postprocess time in seconds:     0.01

 ********************         FIRST ORDER CONDITIONAL ESTIMATION WITH INTERACTION (EVALUATION)       ********************
 #OBJT:**************                       MINIMUM VALUE OF OBJECTIVE FUNCTION                      ********************
 #OBJV:********************************************           681.410       *********************************************

 ********************         FIRST ORDER CONDITIONAL ESTIMATION WITH INTERACTION (EVALUATION)       ********************
 ********************                             FINAL PARAMETER ESTIMATE                           ********************

 THETA - VECTOR OF FIXED EFFECTS PARAMETERS   *********
         TH 1      TH 2      TH 3      TH 4
         5.00E+00  5.00E+01  3.00E+00  4.00E+00

 OMEGA - COV MATRIX FOR RANDOM EFFECTS - ETAS  ********
         ETA1
 ETA1
+        0.00E+00

 SIGMA - COV MATRIX FOR RANDOM EFFECTS - EPSILONS  ****
         EPS1
 EPS1
+        1.00E-02

 OMEGA - CORR MATRIX FOR RANDOM EFFECTS - ETAS  *******
         ETA1
 ETA1
+        0.00E+00

 SIGMA - CORR MATRIX FOR RANDOM EFFECTS - EPSILONS  ***
         EPS1
 EPS1
+        1.00E-01
 Elapsed finaloutput time in seconds:     0.00
 #CPUT: Total CPU Time in Seconds,        0.014
