Fri Aug 21 09:23:50 AM UTC 2026
$PROBLEM ferx #1001 anchor BIG -- proportional residual error, sigma = 2.0 SD
; The fit a mis-ordered `[error_model] DV ~ proportional(S_SMALL)` silently got
; before #1001, when `S_BIG` occupied the leading sigma slot. Identical to
; sigma_order_small.ctl except for the $SIGMA line.
$INPUT ID TIME AMT EVID MDV CMT DV
$DATA sigma_order.csv IGNORE=@

$SUBROUTINE ADVAN1 TRANS1

$PK
  KE = THETA(1)*EXP(ETA(1))
  V  = THETA(2)
  K  = KE
  S1 = V

$ERROR
  IPRED = F
  Y = IPRED*(1+EPS(1))

$THETA
  (0.1 FIX)   ; TVKE
  (10.0 FIX)  ; TVV

$OMEGA 0.09 FIX
$SIGMA 4.0 FIX   ; 2.0**2 -- S_BIG

$ESTIMATION MAXEVAL=0 METHOD=1 INTER
$TABLE ID TIME IPRED NOPRINT ONEHEADER FILE=sigma_order_big.tab

NM-TRAN MESSAGES
 WARNINGS AND ERRORS (IF ANY) FOR PROBLEM    1
 (WARNING  2) NM-TRAN INFERS THAT THE DATA ARE POPULATION.
Note: Analytical 2nd Derivatives are constructed in FSUBS but are never used.
      You may insert $ABBR DERIV2=NO after the first $PROB to save FSUBS construction and compilation time

1NONLINEAR MIXED EFFECTS MODEL PROGRAM (NONMEM) VERSION 7.6.0 (nm760)
 ORIGINALLY DEVELOPED BY STUART BEAL, LEWIS SHEINER, AND ALISON BOECKMANN
 CURRENT DEVELOPERS ARE ROBERT BAUER, ICON DEVELOPMENT SOLUTIONS,
 AND ALISON BOECKMANN. IMPLEMENTATION, EFFICIENCY, AND STANDARDIZATION
 PERFORMED BY NOUS INFOSYSTEMS.
 PROBLEM NO.:         1
 ferx #1001 anchor BIG -- proportional residual error, sigma = 2.0 SD
 TOT. NO. OF OBS RECS:       24
 TOT. NO. OF INDIVIDUALS:        6
 ONE COMPARTMENT MODEL (ADVAN1)
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 #TBLN:      1
 #METH: First Order Conditional Estimation with Interaction (Evaluation)
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 Elapsed evaluation time in seconds:     0.06
 Elapsed postprocess time in seconds:     0.04

 ********************         FIRST ORDER CONDITIONAL ESTIMATION WITH INTERACTION (EVALUATION)       ********************
 #OBJT:**************                       MINIMUM VALUE OF OBJECTIVE FUNCTION                      ********************
 #OBJV:********************************************           103.829       *********************************************

 ********************         FIRST ORDER CONDITIONAL ESTIMATION WITH INTERACTION (EVALUATION)       ********************
 ********************                             FINAL PARAMETER ESTIMATE                           ********************

 THETA - VECTOR OF FIXED EFFECTS PARAMETERS   *********
         TH 1      TH 2
         1.00E-01  1.00E+01

 OMEGA - COV MATRIX FOR RANDOM EFFECTS - ETAS  ********
         ETA1
 ETA1
+        9.00E-02

 SIGMA - COV MATRIX FOR RANDOM EFFECTS - EPSILONS  ****
         EPS1
 EPS1
+        4.00E+00

 OMEGA - CORR MATRIX FOR RANDOM EFFECTS - ETAS  *******
         ETA1
 ETA1
+        3.00E-01

 SIGMA - CORR MATRIX FOR RANDOM EFFECTS - EPSILONS  ***
         EPS1
 EPS1
+        2.00E+00
 Elapsed finaloutput time in seconds:     0.01
 #CPUT: Total CPU Time in Seconds,        0.102
