Fri Aug 21 08:17:26 PM UTC 2026
$PROBLEM ferx #1020 anchor -- signed ODE readout (change from baseline)
; One-compartment IV bolus written as $DES, read out through an arbitrary output
; expression that crosses zero: Y = A(1)/V - BASE. NONMEM applies no
; non-negativity guard to $ERROR output, so IPRED goes negative once the
; concentration falls below BASE. Anchor for ferx's Form C
; `[scaling] y = central / V - BASE`, which the ODE overshoot guard clamped at 0
; before #1020. All parameters FIX, MAXEVAL=0: this is a prediction anchor.
$INPUT ID TIME DV MDV EVID AMT CMT
$DATA signed_readout.csv IGNORE=@

$SUBROUTINE ADVAN13 TOL=9

$MODEL
  COMP=(CENTRAL, DEFDOSE)

$PK
  CL   = THETA(1)
  V    = THETA(2)
  BASE = THETA(3)
  K    = CL/V

$DES
  DADT(1) = -K*A(1)

$ERROR
  IPRED = A(1)/V - BASE
  Y = IPRED + EPS(1)

$THETA
  (4.0 FIX)   ; CL
  (12.0 FIX)  ; V
  (2.0 FIX)   ; BASE

$OMEGA 0 FIX
$SIGMA 0.01 FIX

$ESTIMATION MAXEVAL=0 METHOD=1 INTER
$TABLE ID TIME IPRED NOPRINT ONEHEADER FILE=sdtab.tab

NM-TRAN MESSAGES
 WARNINGS AND ERRORS (IF ANY) FOR PROBLEM    1
 (WARNING  2) NM-TRAN INFERS THAT THE DATA ARE POPULATION.
 (WARNING  46) ETA VARIABLES ARE NOT USED, BUT DATA ARE POPULATION TYPE.
Note: Analytical 2nd Derivatives are constructed in FSUBS but are never used.
      You may insert $ABBR DERIV2=NO after the first $PROB to save FSUBS construction and compilation time

1NONLINEAR MIXED EFFECTS MODEL PROGRAM (NONMEM) VERSION 7.5.1
 ORIGINALLY DEVELOPED BY STUART BEAL, LEWIS SHEINER, AND ALISON BOECKMANN
 CURRENT DEVELOPERS ARE ROBERT BAUER, ICON DEVELOPMENT SOLUTIONS,
 AND ALISON BOECKMANN. IMPLEMENTATION, EFFICIENCY, AND STANDARDIZATION
 PERFORMED BY NOUS INFOSYSTEMS.
 PROBLEM NO.:         1
 ferx #1020 anchor -- signed ODE readout (change from baseline)
 TOT. NO. OF OBS RECS:        5
 TOT. NO. OF INDIVIDUALS:        1
 GENERAL NONLINEAR KINETICS MODEL WITH STIFF/NONSTIFF EQUATIONS (LSODA, ADVAN13)
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 #TBLN:      1
 #METH: First Order Conditional Estimation with Interaction (Evaluation)
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 Elapsed evaluation time in seconds:     0.00
 Elapsed postprocess time in seconds:     0.01

 ********************         FIRST ORDER CONDITIONAL ESTIMATION WITH INTERACTION (EVALUATION)       ********************
 #OBJT:**************                       MINIMUM VALUE OF OBJECTIVE FUNCTION                      ********************
 #OBJV:********************************************     4811.451       **************************************************

 ********************         FIRST ORDER CONDITIONAL ESTIMATION WITH INTERACTION (EVALUATION)       ********************
 ********************                             FINAL PARAMETER ESTIMATE                           ********************

 THETA - VECTOR OF FIXED EFFECTS PARAMETERS   *********
         TH 1      TH 2      TH 3
         4.00E+00  1.20E+01  2.00E+00

 OMEGA - COV MATRIX FOR RANDOM EFFECTS - ETAS  ********
         ETA1
 ETA1
+        0.00E+00

 SIGMA - COV MATRIX FOR RANDOM EFFECTS - EPSILONS  ****
         EPS1
 EPS1
+        1.00E-02

 OMEGA - CORR MATRIX FOR RANDOM EFFECTS - ETAS  *******
         ETA1
 ETA1
+        0.00E+00

 SIGMA - CORR MATRIX FOR RANDOM EFFECTS - EPSILONS  ***
         EPS1
 EPS1
+        1.00E-01
 Elapsed finaloutput time in seconds:     0.00
 #CPUT: Total CPU Time in Seconds,        0.015
