Thu Sep  3 07:35:13 AM UTC 2026
$PROBLEM SS dose x ODE-accumulated hazard (#1210) -- r1_drug
$INPUT ID TIME DV EVID AMT CMT RATE MDV SS II
$DATA ss.csv IGNORE=@
$SUBROUTINES ADVAN13 TOL=9
$MODEL
  COMP=(DEPOT,DEFDOSE)
  COMP=(CENTRAL)
  COMP=(CHZ)
$PK
  CL   = THETA(1)*EXP(ETA(1))
  V    = THETA(2)
  KA   = THETA(3)
  H0   = THETA(4)
  BETA = THETA(5)
  K20  = CL/V
  TREC = 0
$DES
  CONCD   = A(2)/V
  DADT(1) = -KA*A(1)
  DADT(2) =  KA*A(1) - K20*A(2)
  GATE = 0
  IF (T.GE.TREC) GATE = 1
  DADT(3) =  GATE*H0*EXP(BETA*CONCD)
$ERROR
  CONC = A(2)/V
  HAZ  = H0*EXP(BETA*CONC)
  CHZ  = A(3)
  SUR  = EXP(-CHZ)
  IPRED = CONC
  F_FLAG = 0
  IF (CMT.EQ.3) F_FLAG = 1
  Y = IPRED*(1.0 + EPS(1))
  IF (CMT.EQ.3.AND.DV.EQ.1) Y = SUR*HAZ
  IF (CMT.EQ.3.AND.DV.EQ.0) Y = SUR
$THETA
  1.00 FIX
  10.0 FIX
  1.00 FIX
  0.02 FIX
  0.5 FIX
$OMEGA 0 FIX
$SIGMA 0.01
$ESTIMATION METHOD=1 LAPLACE INTER NUMERICAL SLOW MAXEVAL=0 POSTHOC PRINT=1 NOABORT
$TABLE ID TIME CMT DV EVID IPRED CHZ HAZ MDV NOPRINT ONEHEADER NOAPPEND FORMAT=s1PE15.8 FILE=r1_drug.tab

NM-TRAN MESSAGES
 WARNINGS AND ERRORS (IF ANY) FOR PROBLEM    1
 (WARNING  2) NM-TRAN INFERS THAT THE DATA ARE POPULATION.
Note: Analytical 2nd Derivatives are constructed in FSUBS but are never used.
      You may insert $ABBR DERIV2=NO after the first $PROB to save FSUBS construction and compilation time

1NONLINEAR MIXED EFFECTS MODEL PROGRAM (NONMEM) VERSION 7.6.0 (nm760)
 ORIGINALLY DEVELOPED BY STUART BEAL, LEWIS SHEINER, AND ALISON BOECKMANN
 CURRENT DEVELOPERS ARE ROBERT BAUER, ICON DEVELOPMENT SOLUTIONS,
 AND ALISON BOECKMANN. IMPLEMENTATION, EFFICIENCY, AND STANDARDIZATION
 PERFORMED BY NOUS INFOSYSTEMS.
 PROBLEM NO.:         1
 SS dose x ODE-accumulated hazard (#1210) -- r1_drug
 TOT. NO. OF OBS RECS:        4
 TOT. NO. OF INDIVIDUALS:        1
 GENERAL NONLINEAR KINETICS MODEL WITH STIFF/NONSTIFF EQUATIONS (LSODA, ADVAN13)
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 #TBLN:      1
 #METH: Laplacian Conditional Estimation with Interaction (Evaluation)
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
0PRED EXIT CODE = 1
0INDIVIDUAL NO.       1   ID= 1.00000000000000E+00   (WITHIN-INDIVIDUAL) DATA REC NO.   1
 THETA=
  1.00E+00   1.00E+01   1.00E+00   2.00E-02   5.00E-01
 NUMERICAL DIFFICULTIES WITH STEADY STATE SOLUTION
0PROGRAM TERMINATED BY OBJ
 MESSAGE ISSUED UPON EVALUATION OF OBJ. FUNCTION
 #CPUT: Total CPU Time in Seconds,        0.031
