Sat Aug 29 03:19:20 PM UTC 2026
$PROBLEM #1121 review F2 - SS bolus with ALAG >= II; pre-arrival window holds a virtual pulse
$INPUT ID TIME DV AMT RATE EVID CMT MDV WT SS II LG
$DATA e7f.csv IGNORE=@

$SUBROUTINE ADVAN13 TOL=9

$MODEL
  COMP=(CENTRAL,DEFDOSE,DEFOBS)

$PK
  CL    = THETA(1)*(WT/70)**THETA(3)*EXP(ETA(1))
  V     = THETA(2)*EXP(ETA(2))
  ALAG1 = LG
  S1    = V

$DES
  DADT(1) = -(CL/V)*A(1)

$ERROR
  IPRED = F
  Y     = IPRED*(1+EPS(1))

$THETA
  (0, 10.0)  ; 1 TVCL
  (0, 50.0)  ; 2 TVV
  (0, 0.75)  ; 3 WTEXP

$OMEGA
  0.09  ; ETA_CL
  0.09  ; ETA_V

$SIGMA
  0.0025 ; PROP variance (sd 0.05)

$ESTIMATION METHOD=1 INTERACTION MAXEVAL=0 POSTHOC PRINT=1 NOABORT
$TABLE ID TIME WT DV IPRED CL V ALAG1
       ONEHEADER NOPRINT FILE=e7f.tab

NM-TRAN MESSAGES
 WARNINGS AND ERRORS (IF ANY) FOR PROBLEM    1
 (WARNING  2) NM-TRAN INFERS THAT THE DATA ARE POPULATION.
Note: Analytical 2nd Derivatives are constructed in FSUBS but are never used.
      You may insert $ABBR DERIV2=NO after the first $PROB to save FSUBS construction and compilation time

1NONLINEAR MIXED EFFECTS MODEL PROGRAM (NONMEM) VERSION 7.6.0 (nm760)
 ORIGINALLY DEVELOPED BY STUART BEAL, LEWIS SHEINER, AND ALISON BOECKMANN
 CURRENT DEVELOPERS ARE ROBERT BAUER, ICON DEVELOPMENT SOLUTIONS,
 AND ALISON BOECKMANN. IMPLEMENTATION, EFFICIENCY, AND STANDARDIZATION
 PERFORMED BY NOUS INFOSYSTEMS.
 PROBLEM NO.:         1
 #1121 review F2 - SS bolus with ALAG >= II; pre-arrival window holds a v
 TOT. NO. OF OBS RECS:       22
 TOT. NO. OF INDIVIDUALS:        2
 GENERAL NONLINEAR KINETICS MODEL WITH STIFF/NONSTIFF EQUATIONS (LSODA, ADVAN13)
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 #TBLN:      1
 #METH: First Order Conditional Estimation with Interaction (Evaluation)
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 Elapsed evaluation time in seconds:     0.03
 Elapsed postprocess time in seconds:     0.05

 ********************         FIRST ORDER CONDITIONAL ESTIMATION WITH INTERACTION (EVALUATION)       ********************
 #OBJT:**************                       MINIMUM VALUE OF OBJECTIVE FUNCTION                      ********************
 #OBJV:********************************************           -50.237       *********************************************

 ********************         FIRST ORDER CONDITIONAL ESTIMATION WITH INTERACTION (EVALUATION)       ********************
 ********************                             FINAL PARAMETER ESTIMATE                           ********************

 THETA - VECTOR OF FIXED EFFECTS PARAMETERS   *********
         TH 1      TH 2      TH 3
         1.00E+01  5.00E+01  7.50E-01

 OMEGA - COV MATRIX FOR RANDOM EFFECTS - ETAS  ********
         ETA1      ETA2
 ETA1
+        9.00E-02
 ETA2
+        0.00E+00  9.00E-02

 SIGMA - COV MATRIX FOR RANDOM EFFECTS - EPSILONS  ****
         EPS1
 EPS1
+        2.50E-03

 OMEGA - CORR MATRIX FOR RANDOM EFFECTS - ETAS  *******
         ETA1      ETA2
 ETA1
+        3.00E-01
 ETA2
+        0.00E+00  3.00E-01

 SIGMA - CORR MATRIX FOR RANDOM EFFECTS - EPSILONS  ***
         EPS1
 EPS1
+        5.00E-02
 Elapsed finaloutput time in seconds:     0.01
 #CPUT: Total CPU Time in Seconds,        0.118
