Tue Sep 29 02:21:41 PM UTC 2026
$PROBLEM ferx #1576 anchor: an SS=1 record resets the system at its record (ADVAN2)
; IDs 1-6: an SS=1 regimen with a later SS=1 (2: at 120; 3: at 400, < 50 II), a later non-SS
; dose (4, control); a bolus before a mid-timeline SS=1 (5); SS=1 alone (6).
; ID 41: SS=1 on every dose record, q12h (the TDM idiom).
; IDs 51-53: a bolus row before (51) / after (52) a co-timed SS=1 row; SS=1 alone (53).
; Pure evaluation at fixed thetas (MAXEVAL=0); PRED is the reference for
; tests/ss_reset_nonmem_anchor.rs.
$DATA ss_reset.csv IGNORE=@
$INPUT ID TIME DV EVID AMT CMT MDV II SS RATE
$SUBROUTINES ADVAN2 TRANS2
$PK
  CL = THETA(1)*EXP(ETA(1))
  V  = THETA(2)
  KA = THETA(3)
  S2 = V
$ERROR
  IPRED = F
  Y     = IPRED*(1+EPS(1))
$THETA 2.0 FIX  20.0 FIX  0.15 FIX
$OMEGA 0 FIX
$SIGMA 0.01 FIX
$ESTIMATION MAXEVAL=0 METHOD=0 NOABORT
$TABLE ID TIME EVID PRED NOPRINT ONEHEADER NOAPPEND FORMAT=s1PE23.16 FILE=sdtab

NM-TRAN MESSAGES
 WARNINGS AND ERRORS (IF ANY) FOR PROBLEM    1
 (WARNING  2) NM-TRAN INFERS THAT THE DATA ARE POPULATION.
Note: Analytical 2nd Derivatives are constructed in FSUBS but are never used.
      You may insert $ABBR DERIV2=NO after the first $PROB to save FSUBS construction and compilation time

1NONLINEAR MIXED EFFECTS MODEL PROGRAM (NONMEM) VERSION 7.6.0 (nm760)
 ORIGINALLY DEVELOPED BY STUART BEAL, LEWIS SHEINER, AND ALISON BOECKMANN
 CURRENT DEVELOPERS ARE ROBERT BAUER, ICON DEVELOPMENT SOLUTIONS,
 AND ALISON BOECKMANN. IMPLEMENTATION, EFFICIENCY, AND STANDARDIZATION
 PERFORMED BY NOUS INFOSYSTEMS.
 PROBLEM NO.:         1
 ferx #1576 anchor: an SS=1 record resets the system at its record (ADVAN
 TOT. NO. OF OBS RECS:       53
 TOT. NO. OF INDIVIDUALS:       10
 ONE COMPARTMENT MODEL WITH FIRST-ORDER ABSORPTION (ADVAN2)
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 #TBLN:      1
 #METH: First Order (Evaluation)
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 Elapsed evaluation time in seconds:     0.01
 Elapsed postprocess time in seconds:     0.01

 ********************                             FIRST ORDER (EVALUATION)                           ********************
 #OBJT:**************                       MINIMUM VALUE OF OBJECTIVE FUNCTION                      ********************
 #OBJV:********************************************          4953.356       *********************************************

 ********************                             FIRST ORDER (EVALUATION)                           ********************
 ********************                             FINAL PARAMETER ESTIMATE                           ********************

 THETA - VECTOR OF FIXED EFFECTS PARAMETERS   *********
         TH 1      TH 2      TH 3
         2.00E+00  2.00E+01  1.50E-01

 OMEGA - COV MATRIX FOR RANDOM EFFECTS - ETAS  ********
         ETA1
 ETA1
+        0.00E+00

 SIGMA - COV MATRIX FOR RANDOM EFFECTS - EPSILONS  ****
         EPS1
 EPS1
+        1.00E-02

 OMEGA - CORR MATRIX FOR RANDOM EFFECTS - ETAS  *******
         ETA1
 ETA1
+        0.00E+00

 SIGMA - CORR MATRIX FOR RANDOM EFFECTS - EPSILONS  ***
         EPS1
 EPS1
+        1.00E-01
 Elapsed finaloutput time in seconds:     0.00
 #CPUT: Total CPU Time in Seconds,        0.055
