Tue Sep 29 02:22:20 PM UTC 2026
$PROBLEM ferx #1576: mid-timeline SS=1 into a transit(n=3) chain, prior regimen in flight (ADVAN13)
$DATA ss_reset_transit.csv IGNORE=@
$INPUT ID TIME DV EVID AMT CMT MDV II SS
$SUBROUTINES ADVAN13 TOL=12
$MODEL
  COMP=(DEPOT,DEFDOSE)
  COMP=(TR1)
  COMP=(TR2)
  COMP=(TR3)
  COMP=(CENTRAL)
  COMP=(OBS,DEFOBS)
$PK
  CL  = THETA(1)*EXP(ETA(1))
  V   = THETA(2)
  MTT = THETA(3)
  KTR = 4/MTT
  S6  = 1
$DES
  DADT(1) = -KTR*A(1)
  DADT(2) =  KTR*A(1) - KTR*A(2)
  DADT(3) =  KTR*A(2) - KTR*A(3)
  DADT(4) =  KTR*A(3) - KTR*A(4)
  DADT(5) =  KTR*A(4) - (CL/V)*A(5)
  DADT(6) =  0
$ERROR
  IPRED = A(5)/V
  Y     = IPRED+EPS(1)
$THETA 2.0 FIX  20.0 FIX  6.0 FIX
$OMEGA 0 FIX
$SIGMA 0.01 FIX
$ESTIMATION MAXEVAL=0 METHOD=0 NOABORT
$TABLE ID TIME EVID IPRED NOPRINT ONEHEADER NOAPPEND FORMAT=s1PE23.16 FILE=sdtab

NM-TRAN MESSAGES
 WARNINGS AND ERRORS (IF ANY) FOR PROBLEM    1
 (WARNING  2) NM-TRAN INFERS THAT THE DATA ARE POPULATION.
Note: Analytical 2nd Derivatives are constructed in FSUBS but are never used.
      You may insert $ABBR DERIV2=NO after the first $PROB to save FSUBS construction and compilation time

1NONLINEAR MIXED EFFECTS MODEL PROGRAM (NONMEM) VERSION 7.6.0 (nm760)
 ORIGINALLY DEVELOPED BY STUART BEAL, LEWIS SHEINER, AND ALISON BOECKMANN
 CURRENT DEVELOPERS ARE ROBERT BAUER, ICON DEVELOPMENT SOLUTIONS,
 AND ALISON BOECKMANN. IMPLEMENTATION, EFFICIENCY, AND STANDARDIZATION
 PERFORMED BY NOUS INFOSYSTEMS.
 PROBLEM NO.:         1
 ferx #1576: mid-timeline SS=1 into a transit(n=3) chain, prior regimen i
 TOT. NO. OF OBS RECS:       33
 TOT. NO. OF INDIVIDUALS:        3
 GENERAL NONLINEAR KINETICS MODEL WITH STIFF/NONSTIFF EQUATIONS (LSODA, ADVAN13)
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 #TBLN:      1
 #METH: First Order (Evaluation)
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 Elapsed evaluation time in seconds:     0.02
 Elapsed postprocess time in seconds:     0.00

 ********************                             FIRST ORDER (EVALUATION)                           ********************
 #OBJT:**************                       MINIMUM VALUE OF OBJECTIVE FUNCTION                      ********************
 #OBJV:********************************************         69321.571       *********************************************

 ********************                             FIRST ORDER (EVALUATION)                           ********************
 ********************                             FINAL PARAMETER ESTIMATE                           ********************

 THETA - VECTOR OF FIXED EFFECTS PARAMETERS   *********
         TH 1      TH 2      TH 3
         2.00E+00  2.00E+01  6.00E+00

 OMEGA - COV MATRIX FOR RANDOM EFFECTS - ETAS  ********
         ETA1
 ETA1
+        0.00E+00

 SIGMA - COV MATRIX FOR RANDOM EFFECTS - EPSILONS  ****
         EPS1
 EPS1
+        1.00E-02

 OMEGA - CORR MATRIX FOR RANDOM EFFECTS - ETAS  *******
         ETA1
 ETA1
+        0.00E+00

 SIGMA - CORR MATRIX FOR RANDOM EFFECTS - EPSILONS  ***
         EPS1
 EPS1
+        1.00E-01
 Elapsed finaloutput time in seconds:     0.00
 #CPUT: Total CPU Time in Seconds,        0.055
