Fri Aug 28 04:16:11 PM UTC 2026
$PROBLEM #1070 TAD-dependent DES x estimated lagtime with IIV -- single dose
; Anchor for ferx issue #1070. The ODE right-hand side reads time-after-dose,
; and the dose arrival t_dose+ALAG1 carries an eta, so TAD itself depends on
; eta_lag with dTAD/dALAG1 = -1. ferx lifts TAD as an f64 constant in its
; analytic sensitivity walk, dropping that term.
;
; Single dose, so time-after-dose needs no MTIME machinery: the only arrival is
; at 0+ALAG1, hence TD1 = ALAG1 exactly. Before the arrival A(1)=0, so the
; negative TADX in that window contributes nothing (DADT = 0) -- which is why
; this matches ferx, whose timeline simply starts at the arrival.
$INPUT ID TIME DV MDV EVID AMT CMT WT
$DATA tad_lag_A.csv IGNORE=@
;
; WT carries a FIXED-at-zero exponent: (WT/70)**THETA(5) with THETA(5)=0 FIX is
; exactly 1, so WT has no effect on any prediction. It is present only because
; ferx routes a subject to its event-driven predictor when a covariate column
; actually varies within the subject, and the plain (dense) predictor currently
; returns NaN for a TAD-reading RHS under a lagtime (ferx #1110). Because the
; exponent is zero, every per-event covariate snapshot is identical, so this
; anchor does not exercise the time-varying-covariate snapshot convention and
; cannot be invalidated by ferx #1073's change to where the timeline breaks.
$SUBROUTINES ADVAN13 TOL=9
$MODEL COMP=(CENTRAL,DEFDOSE)
$PK
  CL    = THETA(1)*(WT/70)**THETA(5)*EXP(ETA(1))
  V     = THETA(2)
  ALAG1 = THETA(4)*EXP(ETA(2))
  TD1   = ALAG1
$DES
  TADX = T - TD1
  DADT(1) = -(CL/V)*A(1)*(1.0 + THETA(3)*TADX)
$ERROR
  IPRED = A(1)/V
  Y     = IPRED*(1.0 + EPS(1))
$THETA
 (0.001, 1.0)   ; TVCL
 (0.001, 20.0)  ; TVV
 (0.0,   0.3)   ; THETA_TAD
 (0.001, 0.5)   ; TVLAG
 (0.0 FIX)      ; WT exponent -- zero, see header
$OMEGA
 0.09   ; ETA_CL
 0.02   ; ETA_LAG
$SIGMA
 0.01   ; proportional, variance
$ESTIMATION METHOD=1 INTERACTION MAXEVAL=0 POSTHOC PRINT=1
$TABLE ID TIME IPRED CWRES NOPRINT ONEHEADER FILE=tad_lag_A.tab

NM-TRAN MESSAGES
 WARNINGS AND ERRORS (IF ANY) FOR PROBLEM    1
 (WARNING  2) NM-TRAN INFERS THAT THE DATA ARE POPULATION.
Note: Analytical 2nd Derivatives are constructed in FSUBS but are never used.
      You may insert $ABBR DERIV2=NO after the first $PROB to save FSUBS construction and compilation time

1NONLINEAR MIXED EFFECTS MODEL PROGRAM (NONMEM) VERSION 7.6.0 (nm760)
 ORIGINALLY DEVELOPED BY STUART BEAL, LEWIS SHEINER, AND ALISON BOECKMANN
 CURRENT DEVELOPERS ARE ROBERT BAUER, ICON DEVELOPMENT SOLUTIONS,
 AND ALISON BOECKMANN. IMPLEMENTATION, EFFICIENCY, AND STANDARDIZATION
 PERFORMED BY NOUS INFOSYSTEMS.
 PROBLEM NO.:         1
 #1070 TAD-dependent DES x estimated lagtime with IIV -- single dose
 TOT. NO. OF OBS RECS:      108
 TOT. NO. OF INDIVIDUALS:       12
 GENERAL NONLINEAR KINETICS MODEL WITH STIFF/NONSTIFF EQUATIONS (LSODA, ADVAN13)
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 #TBLN:      1
 #METH: First Order Conditional Estimation with Interaction (Evaluation)
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 Elapsed evaluation time in seconds:     0.07
 Elapsed postprocess time in seconds:     0.11

 ********************         FIRST ORDER CONDITIONAL ESTIMATION WITH INTERACTION (EVALUATION)       ********************
 #OBJT:**************                       MINIMUM VALUE OF OBJECTIVE FUNCTION                      ********************
 #OBJV:********************************************          -271.990       *********************************************

 ********************         FIRST ORDER CONDITIONAL ESTIMATION WITH INTERACTION (EVALUATION)       ********************
 ********************                             FINAL PARAMETER ESTIMATE                           ********************

 THETA - VECTOR OF FIXED EFFECTS PARAMETERS   *********
         TH 1      TH 2      TH 3      TH 4      TH 5
         1.00E+00  2.00E+01  3.00E-01  5.00E-01  0.00E+00

 OMEGA - COV MATRIX FOR RANDOM EFFECTS - ETAS  ********
         ETA1      ETA2
 ETA1
+        9.00E-02
 ETA2
+        0.00E+00  2.00E-02

 SIGMA - COV MATRIX FOR RANDOM EFFECTS - EPSILONS  ****
         EPS1
 EPS1
+        1.00E-02

 OMEGA - CORR MATRIX FOR RANDOM EFFECTS - ETAS  *******
         ETA1      ETA2
 ETA1
+        3.00E-01
 ETA2
+        0.00E+00  1.41E-01

 SIGMA - CORR MATRIX FOR RANDOM EFFECTS - EPSILONS  ***
         EPS1
 EPS1
+        1.00E-01
 Elapsed finaloutput time in seconds:     0.02
 #CPUT: Total CPU Time in Seconds,        0.253
