Fri Aug 28 07:40:44 PM UTC 2026
$PROBLEM #1070 TAD-dependent DES x estimated lagtime with IIV -- two doses
; Multi-dose companion to runA. Two doses (t=0, t=12), each arriving at
; t_dose+ALAG1, so time-after-dose switches anchor at the SECOND arrival --
; strictly inside a record-to-record interval, and carrying an eta.
;
; NONMEM has no TAD builtin in $DES, so the anchor is carried explicitly. Dose
; times are fixed and known for this dataset, so TDOS is derived directly from T
; and MTIME(1) exists only to place an integration break exactly at the second
; arrival (the point where TDOS jumps).
;
; MTIME(1) is set UNCONDITIONALLY. Two earlier constructions were measured wrong
; against an independent RK4 reference (runBdet/truth.py, OMEGA 0 FIX so IPRED is
; a pure function) and are kept in runBdet/ as det_B*.ctl:
;   - TDP/TDN + MPAST(1) with MTIME set at every record: 40% IPRED error.
;   - the same with MTIME set only inside IF(EVID.EQ.1): NM WARNING 3, MTIME is
;     zero whenever the condition fails, and the run does not execute at all.
; This construction reproduces the reference to table precision (3.3e-5).
;
$INPUT ID TIME DV MDV EVID AMT CMT WT
$DATA tad_lag_B.csv IGNORE=@
;
; WT carries a FIXED-at-zero exponent: (WT/70)**THETA(5) with THETA(5)=0 FIX is
; exactly 1, so WT has no effect on any prediction. It is present only because
; ferx routes a subject to its event-driven predictor when a covariate column
; actually varies within the subject, and the plain (dense) predictor currently
; returns NaN for a TAD-reading RHS under a lagtime (ferx #1110). Because the
; exponent is zero, every per-event covariate snapshot is identical, so this
; anchor does not exercise the time-varying-covariate snapshot convention and
; cannot be invalidated by ferx #1073's change to where the timeline breaks.
$SUBROUTINES ADVAN13 TOL=9
$MODEL COMP=(CENTRAL,DEFDOSE)
$PK
  CL    = THETA(1)*(WT/70)**THETA(5)*EXP(ETA(1))
  V     = THETA(2)
  ALAG1 = THETA(4)*EXP(ETA(2))
  MTIME(1) = 12.0 + ALAG1
  MTDIFF   = 1
$DES
  TDOS = ALAG1
  IF (T.GE.12.0+ALAG1) TDOS = 12.0 + ALAG1
  TADX = T - TDOS
  DADT(1) = -(CL/V)*A(1)*(1.0 + THETA(3)*TADX)
$ERROR
  IPRED = A(1)/V
  Y     = IPRED*(1.0 + EPS(1))
$THETA
 (0.001, 1.0)   ; TVCL
 (0.001, 20.0)  ; TVV
 (0.0,   0.3)   ; THETA_TAD
 (0.001, 0.5)   ; TVLAG
 (0.0 FIX)      ; WT exponent -- zero, see header
$OMEGA
 0.09   ; ETA_CL
 0.02   ; ETA_LAG
$SIGMA
 0.01   ; proportional, variance
$ESTIMATION METHOD=1 INTERACTION MAXEVAL=0 POSTHOC PRINT=1
$TABLE ID TIME IPRED CWRES NOPRINT ONEHEADER FILE=tad_lag_B.tab

NM-TRAN MESSAGES
 WARNINGS AND ERRORS (IF ANY) FOR PROBLEM    1
 (WARNING  2) NM-TRAN INFERS THAT THE DATA ARE POPULATION.
Note: Analytical 2nd Derivatives are constructed in FSUBS but are never used.
      You may insert $ABBR DERIV2=NO after the first $PROB to save FSUBS construction and compilation time

1NONLINEAR MIXED EFFECTS MODEL PROGRAM (NONMEM) VERSION 7.6.0 (nm760)
 ORIGINALLY DEVELOPED BY STUART BEAL, LEWIS SHEINER, AND ALISON BOECKMANN
 CURRENT DEVELOPERS ARE ROBERT BAUER, ICON DEVELOPMENT SOLUTIONS,
 AND ALISON BOECKMANN. IMPLEMENTATION, EFFICIENCY, AND STANDARDIZATION
 PERFORMED BY NOUS INFOSYSTEMS.
 PROBLEM NO.:         1
 #1070 TAD-dependent DES x estimated lagtime with IIV -- two doses
 TOT. NO. OF OBS RECS:      156
 TOT. NO. OF INDIVIDUALS:       12
 GENERAL NONLINEAR KINETICS MODEL WITH STIFF/NONSTIFF EQUATIONS (LSODA, ADVAN13)
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 #TBLN:      1
 #METH: First Order Conditional Estimation with Interaction (Evaluation)
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 Elapsed evaluation time in seconds:     0.07
 Elapsed postprocess time in seconds:     0.08

 ********************         FIRST ORDER CONDITIONAL ESTIMATION WITH INTERACTION (EVALUATION)       ********************
 #OBJT:**************                       MINIMUM VALUE OF OBJECTIVE FUNCTION                      ********************
 #OBJV:********************************************          -169.317       *********************************************

 ********************         FIRST ORDER CONDITIONAL ESTIMATION WITH INTERACTION (EVALUATION)       ********************
 ********************                             FINAL PARAMETER ESTIMATE                           ********************

 THETA - VECTOR OF FIXED EFFECTS PARAMETERS   *********
         TH 1      TH 2      TH 3      TH 4      TH 5
         1.00E+00  2.00E+01  3.00E-01  5.00E-01  0.00E+00

 OMEGA - COV MATRIX FOR RANDOM EFFECTS - ETAS  ********
         ETA1      ETA2
 ETA1
+        9.00E-02
 ETA2
+        0.00E+00  2.00E-02

 SIGMA - COV MATRIX FOR RANDOM EFFECTS - EPSILONS  ****
         EPS1
 EPS1
+        1.00E-02

 OMEGA - CORR MATRIX FOR RANDOM EFFECTS - ETAS  *******
         ETA1      ETA2
 ETA1
+        3.00E-01
 ETA2
+        0.00E+00  1.41E-01

 SIGMA - CORR MATRIX FOR RANDOM EFFECTS - EPSILONS  ***
         EPS1
 EPS1
+        1.00E-01
 Elapsed finaloutput time in seconds:     0.01
 #CPUT: Total CPU Time in Seconds,        0.204
