Sun Jul 12 06:01:51 PM UTC 2026
$PROBLEM one_cpt_transit + IOV on CL -- NONMEM anchor for ferx analytic transit under IOV [#719]
; Reference fit for ferx's analytic `pk one_cpt_transit(cl,v,n,mtt)` under inter-occasion
; variability (IOV on CL). `one_cpt_transit` is transit-density-directly-into-central (a single
; disposition compartment; its ferx ODE twin is `d/dt(central) = transit(n,mtt) - (CL/V)*central`),
; so this is ONE compartment: F1=0 suppresses the depot bolus and the Savic density is delivered
; as R_in in $DES. IOV on CL is one ETA per occasion (OCC 1/2/3), sharing one IOV variance via
; $OMEGA BLOCK SAME. Data (nonmem_anchor/transit_iov.csv) is one dose per occasion, three
; occasions 24 h apart with near-complete washout, so the $DES single-dose R_in (PODO/TDOS)
; equals ferx's dose superposition. Fit this, then fit ferx on the SAME csv and compare OFV +
; THETA/OMEGA (generator: tests/gen_transit_iov_anchor.rs prints the ferx side).

$INPUT ID TIME DV EVID AMT CMT MDV OCC
$DATA transit_iov.csv IGNORE=@

$SUBROUTINES ADVAN13 TOL=9
$MODEL
  COMP=(CENTRAL,DEFDOSE,DEFOBS)   ; 1 = central (dose lands here; bolus suppressed by F1=0)

$PK
  TVCL  = THETA(1)
  TVV   = THETA(2)
  TVMTT = THETA(3)
  TVN   = THETA(4)

  ; ---- IOV on CL: one ETA per occasion, one shared IOV variance (BLOCK SAME) ----
  OCC1 = 0
  OCC2 = 0
  OCC3 = 0
  IF (OCC.EQ.1) OCC1 = 1
  IF (OCC.EQ.2) OCC2 = 1
  IF (OCC.EQ.3) OCC3 = 1
  IOVCL = OCC1*ETA(2) + OCC2*ETA(3) + OCC3*ETA(4)

  CL  = TVCL*EXP(IOVCL)
  V   = TVV *EXP(ETA(1))
  MTT = TVMTT
  NN  = TVN

  KTR = (NN + 1.0)/MTT
  K10 = CL/V

  ; ---- ln Gamma(NN+1) via Lanczos g=7, n=9 -------------------------------------
  ; Byte-for-byte the coefficients in ferx src/stats/special.rs::ln_gamma, so the gamma
  ; special-function is NOT a source of ferx-vs-NONMEM discrepancy. x = NN+1, x' = NN.
  XX  = NN
  AA  = 0.99999999999980993
  AA  = AA + 676.5203681218851      / (XX + 1.0)
  AA  = AA - 1259.1392167224028     / (XX + 2.0)
  AA  = AA + 771.32342877765313     / (XX + 3.0)
  AA  = AA - 176.61502916214059     / (XX + 4.0)
  AA  = AA + 12.507343278686905     / (XX + 5.0)
  AA  = AA - 0.13857109526572012    / (XX + 6.0)
  AA  = AA + 9.9843695780195716E-06 / (XX + 7.0)
  AA  = AA + 1.5056327351493116E-07 / (XX + 8.0)
  TG  = XX + 7.5
  LNG = 0.91893853320467274 + (XX + 0.5)*LOG(TG) - TG + LOG(AA)   ; = ln Gamma(NN+1)

  ; ---- dose routing: feed transit(), not a bolus -------------------------------
  IF (AMT.GT.0.0.AND.CMT.EQ.1) PODO = AMT
  IF (AMT.GT.0.0.AND.CMT.EQ.1) TDOS = TIME
  F1  = 0.0

$DES
  TAD = T - TDOS
  IF (TAD.LE.1.0E-10) TAD = 1.0E-10
  ; R_in(tad) = PODO * KTR*(KTR*tad)^NN * exp(-KTR*tad) / Gamma(NN+1), log-domain.
  LNR = LOG(PODO) + LOG(KTR) + NN*LOG(KTR*TAD) - KTR*TAD - LNG
  RIN = EXP(LNR)
  DADT(1) = RIN - K10*A(1)

$ERROR
  IPRED = A(1)/V
  Y = IPRED*(1.0 + EPS(1))

$THETA
  (0.1,  9.0,  100)   ; 1 TVCL
  (1.0,  30.0, 500)   ; 2 TVV
  (0.05, 1.0,  24)    ; 3 TVMTT   KTR=(N+1)/MTT
  (0.1,  3.0,  30)    ; 4 TVN     transit compartments (continuous)

$OMEGA
  0.09    ; IIV V (ETA1)

$OMEGA BLOCK(1) 0.04   ; IOV CL (ETA2), occasion 1
$OMEGA BLOCK(1) SAME   ;              occasion 2 (same variance)
$OMEGA BLOCK(1) SAME   ;              occasion 3 (same variance)

$SIGMA
  0.01    ; proportional residual variance (0.1^2)

$ESTIMATION METHOD=1 INTER MAXEVAL=9999 PRINT=5 NOABORT
$COVARIANCE
$TABLE ID TIME DV IPRED CWRES MDV OCC NOPRINT ONEHEADER FILE=transit_iov.tab

NM-TRAN MESSAGES
 WARNINGS AND ERRORS (IF ANY) FOR PROBLEM    1
 (WARNING  2) NM-TRAN INFERS THAT THE DATA ARE POPULATION.
Note: Analytical 2nd Derivatives are constructed in FSUBS but are never used.
      You may insert $ABBR DERIV2=NO after the first $PROB to save FSUBS construction and compilation time

1NONLINEAR MIXED EFFECTS MODEL PROGRAM (NONMEM) VERSION 7.6.0 (nm760)
 ORIGINALLY DEVELOPED BY STUART BEAL, LEWIS SHEINER, AND ALISON BOECKMANN
 CURRENT DEVELOPERS ARE ROBERT BAUER, ICON DEVELOPMENT SOLUTIONS,
 AND ALISON BOECKMANN. IMPLEMENTATION, EFFICIENCY, AND STANDARDIZATION
 PERFORMED BY NOUS INFOSYSTEMS.
 PROBLEM NO.:         1
 one_cpt_transit + IOV on CL -- NONMEM anchor for ferx analytic transit u
 TOT. NO. OF OBS RECS:      432
 TOT. NO. OF INDIVIDUALS:       24
 GENERAL NONLINEAR KINETICS MODEL WITH STIFF/NONSTIFF EQUATIONS (LSODA, ADVAN13)
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 #TBLN:      1
 #METH: First Order Conditional Estimation with Interaction
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
 #TERM:
0MINIMIZATION TERMINATED
 DUE TO ROUNDING ERRORS (ERROR=134)
 NO. OF FUNCTION EVALUATIONS USED:      228
 NO. OF SIG. DIGITS IN FINAL EST.:  2.0

 ETABAR IS THE ARITHMETIC MEAN OF THE ETA-ESTIMATES,
 AND THE P-VALUE IS GIVEN FOR THE NULL HYPOTHESIS THAT THE TRUE MEAN IS 0.

 ETABAR:        -3.0012E-03 -2.5047E-03  3.0188E-02  2.9625E-04
 SE:             6.9046E-02  4.3381E-02  4.6163E-02  4.1518E-02
 N:                      24          24          24          24

 P VAL.:         9.6533E-01  9.5396E-01  5.1316E-01  9.9431E-01

 ETASHRINKSD(%)  1.0000E-10  1.3407E+01  7.0418E+00  1.7131E+01
 ETASHRINKVR(%)  1.0000E-10  2.5017E+01  1.3588E+01  3.1327E+01
 EBVSHRINKSD(%)  4.8177E-01  1.5185E+01  1.2025E+01  1.2184E+01
 EBVSHRINKVR(%)  9.6123E-01  2.8064E+01  2.2605E+01  2.2884E+01
 RELATIVEINF(%)  9.8980E+01  7.1846E+01  7.7320E+01  7.7031E+01
 EPSSHRINKSD(%)  9.4614E+00
 EPSSHRINKVR(%)  1.8028E+01


 TOTAL DATA POINTS NORMALLY DISTRIBUTED (N):          432
 N*LOG(2PI) CONSTANT TO OBJECTIVE FUNCTION:    793.96289268883720
 OBJECTIVE FUNCTION VALUE WITHOUT CONSTANT:   -1374.2692052426248
 OBJECTIVE FUNCTION VALUE WITH CONSTANT:      -580.30631255378762
 REPORTED OBJECTIVE FUNCTION DOES NOT CONTAIN CONSTANT

 TOTAL EFFECTIVE ETAS (NIND*NETA):                            96


 #TERE:
 Elapsed estimation  time in seconds:    57.17
 Elapsed postprocess time in seconds:     0.50

 ********************               FIRST ORDER CONDITIONAL ESTIMATION WITH INTERACTION              ********************
 #OBJT:**************                       MINIMUM VALUE OF OBJECTIVE FUNCTION                      ********************
 #OBJV:********************************************         -1374.269       *********************************************

 ********************               FIRST ORDER CONDITIONAL ESTIMATION WITH INTERACTION              ********************
 ********************                             FINAL PARAMETER ESTIMATE                           ********************

 THETA - VECTOR OF FIXED EFFECTS PARAMETERS   *********
         TH 1      TH 2      TH 3      TH 4
         9.24E+00  2.79E+01  9.95E-01  2.99E+00

 OMEGA - COV MATRIX FOR RANDOM EFFECTS - ETAS  ********
         ETA1      ETA2      ETA3      ETA4
 ETA1
+        1.14E-01
 ETA2
+        0.00E+00  6.02E-02
 ETA3
+        0.00E+00  0.00E+00  6.02E-02
 ETA4
+        0.00E+00  0.00E+00  0.00E+00  6.02E-02

 SIGMA - COV MATRIX FOR RANDOM EFFECTS - EPSILONS  ****
         EPS1
 EPS1
+        1.05E-02

 OMEGA - CORR MATRIX FOR RANDOM EFFECTS - ETAS  *******
         ETA1      ETA2      ETA3      ETA4
 ETA1
+        3.38E-01
 ETA2
+        0.00E+00  2.45E-01
 ETA3
+        0.00E+00  0.00E+00  2.45E-01
 ETA4
+        0.00E+00  0.00E+00  0.00E+00  2.45E-01

 SIGMA - CORR MATRIX FOR RANDOM EFFECTS - EPSILONS  ***
         EPS1
 EPS1
+        1.02E-01
 Elapsed finaloutput time in seconds:     0.02
 #CPUT: Total CPU Time in Seconds,       57.438
