Sun Jul 12 07:14:50 PM UTC 2026
$PROBLEM one_cpt_transit (N=3) + WT-on-CL covariate + MULTIPLE doses -- NONMEM anchor for ferx [#719]
; Reference fit for ferx's ANALYTIC `pk one_cpt_transit(cl,v,n,mtt)` closed form under a continuous
; TV covariate (WT on CL, power model) and MULTIPLE overlapping doses (100 mg q6h x 5). No
; lagtime/F, so ferx uses its analytic exponential-tilting superposition (not the ODE twin); this
; control is the NONMEM cross-check for that analytic multi-dose + covariate path.
;
; EXPLICIT INTEGER-N TRANSIT CHAIN. For integer n the Savic density
;   R_in(t) = D * ktr * (ktr*t)^n * exp(-ktr*t) / n!,  ktr = (n+1)/MTT
; is exactly the input rate into central from an Erlang chain of (n+1) first-order transit
; compartments (dose in the first, flux from the (n+1)-th into central, every transfer rate ktr).
; For n = 3 that is 4 transit compartments (1..4) + central (5). NONMEM integrates the chain with
; its NATIVE multi-dose bookkeeping, so superposition across the five q6h doses is automatic -- no
; hand-coded $DES sum over PODO/TDOS (which sees only the most-recent dose). ferx's
; single-compartment one_cpt_transit(n=3 FIX) yields the identical central profile.
;
; Dose lands in CMT 1 (matches ferx's dose CMT 1). Observations are on CMT 5 (central) here; the
; ferx copy (data/transit_multidose_cov.csv) re-keys obs to CMT 1 (ferx's single disposition
; compartment) -- same DV, likelihood-identical. Data simulated FROM ferx
; (tests/gen_transit_multidose_cov_anchor.rs), so NONMEM also recovers the truths.

$INPUT ID TIME DV EVID AMT CMT MDV WT
$DATA transit_multidose_cov.csv IGNORE=@

$SUBROUTINES ADVAN13 TOL=9
$MODEL
  COMP=(TR1,DEFDOSE)   ; 1 = first transit compartment (dose lands here)
  COMP=(TR2)           ; 2
  COMP=(TR3)           ; 3
  COMP=(TR4)           ; 4 = (n+1)=4th transit compartment; its outflow feeds central
  COMP=(CENTRAL,DEFOBS); 5 = central (observed)

$PK
  TVCL  = THETA(1)
  TVV   = THETA(2)
  TVMTT = THETA(3)
  NN    = THETA(4)      ; transit count n, FIXed = 3 (integer -> explicit 4-transit chain)
  DWTCL = THETA(5)      ; WT-on-CL power

  CL  = TVCL*(WT/70.0)**DWTCL*EXP(ETA(1))
  V   = TVV*EXP(ETA(2))
  MTT = TVMTT

  KTR = (NN + 1.0)/MTT
  K10 = CL/V

$DES
  DADT(1) = -KTR*A(1)
  DADT(2) =  KTR*A(1) - KTR*A(2)
  DADT(3) =  KTR*A(2) - KTR*A(3)
  DADT(4) =  KTR*A(3) - KTR*A(4)
  DADT(5) =  KTR*A(4) - K10*A(5)

$ERROR
  IPRED = A(5)/V
  Y = IPRED*(1.0 + EPS(1))

$THETA
  (0.1,  9.0,  100)   ; 1 TVCL
  (1.0,  60.0, 500)   ; 2 TVV
  (0.05, 3.0,  24)    ; 3 TVMTT
  3 FIX               ; 4 NN   (integer transit count -> explicit 4-transit chain)
  (0.0,  0.75, 2.0)   ; 5 DWTCL  WT-on-CL power

$OMEGA
  0.01    ; IIV CL (ETA1)
  0.09    ; IIV V  (ETA2)

$SIGMA
  0.01    ; proportional residual variance (0.1^2)

$ESTIMATION METHOD=1 INTER MAXEVAL=9999 PRINT=5 NOABORT
$COVARIANCE
$TABLE ID TIME DV IPRED CWRES MDV WT NOPRINT ONEHEADER FILE=transit_multidose_cov.tab

NM-TRAN MESSAGES
 WARNINGS AND ERRORS (IF ANY) FOR PROBLEM    1
 (WARNING  2) NM-TRAN INFERS THAT THE DATA ARE POPULATION.
Note: Analytical 2nd Derivatives are constructed in FSUBS but are never used.
      You may insert $ABBR DERIV2=NO after the first $PROB to save FSUBS construction and compilation time

1NONLINEAR MIXED EFFECTS MODEL PROGRAM (NONMEM) VERSION 7.6.0 (nm760)
 ORIGINALLY DEVELOPED BY STUART BEAL, LEWIS SHEINER, AND ALISON BOECKMANN
 CURRENT DEVELOPERS ARE ROBERT BAUER, ICON DEVELOPMENT SOLUTIONS,
 AND ALISON BOECKMANN. IMPLEMENTATION, EFFICIENCY, AND STANDARDIZATION
 PERFORMED BY NOUS INFOSYSTEMS.
 PROBLEM NO.:         1
 one_cpt_transit (N=3) + WT-on-CL covariate + MULTIPLE doses -- NONMEM an
 TOT. NO. OF OBS RECS:      600
 TOT. NO. OF INDIVIDUALS:       24
 GENERAL NONLINEAR KINETICS MODEL WITH STIFF/NONSTIFF EQUATIONS (LSODA, ADVAN13)
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 #TBLN:      1
 #METH: First Order Conditional Estimation with Interaction
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
 #TERM:
0MINIMIZATION SUCCESSFUL
 NO. OF FUNCTION EVALUATIONS USED:      159
 NO. OF SIG. DIGITS IN FINAL EST.:  3.2

 ETABAR IS THE ARITHMETIC MEAN OF THE ETA-ESTIMATES,
 AND THE P-VALUE IS GIVEN FOR THE NULL HYPOTHESIS THAT THE TRUE MEAN IS 0.

 ETABAR:         3.9729E-04 -7.4246E-04
 SE:             2.3155E-02  5.1738E-02
 N:                      24          24

 P VAL.:         9.8631E-01  9.8855E-01

 ETASHRINKSD(%)  3.4352E+00  1.9129E+00
 ETASHRINKVR(%)  6.7524E+00  3.7892E+00
 EBVSHRINKSD(%)  3.3887E+00  1.8548E+00
 EBVSHRINKVR(%)  6.6626E+00  3.6751E+00
 RELATIVEINF(%)  9.3311E+01  9.6297E+01
 EPSSHRINKSD(%)  3.7772E+00
 EPSSHRINKVR(%)  7.4118E+00


 TOTAL DATA POINTS NORMALLY DISTRIBUTED (N):          600
 N*LOG(2PI) CONSTANT TO OBJECTIVE FUNCTION:    1102.7262398456071
 OBJECTIVE FUNCTION VALUE WITHOUT CONSTANT:   -2055.1715540201640
 OBJECTIVE FUNCTION VALUE WITH CONSTANT:      -952.44531417455687
 REPORTED OBJECTIVE FUNCTION DOES NOT CONTAIN CONSTANT

 TOTAL EFFECTIVE ETAS (NIND*NETA):                            48


 #TERE:
 Elapsed estimation  time in seconds:    87.02
 Elapsed covariance  time in seconds:    80.54
 Elapsed postprocess time in seconds:     1.29

 ********************               FIRST ORDER CONDITIONAL ESTIMATION WITH INTERACTION              ********************
 #OBJT:**************                       MINIMUM VALUE OF OBJECTIVE FUNCTION                      ********************
 #OBJV:********************************************         -2055.172       *********************************************

 ********************               FIRST ORDER CONDITIONAL ESTIMATION WITH INTERACTION              ********************
 ********************                             FINAL PARAMETER ESTIMATE                           ********************

 THETA - VECTOR OF FIXED EFFECTS PARAMETERS   *********
         TH 1      TH 2      TH 3      TH 4      TH 5
         9.32E+00  6.13E+01  2.99E+00  3.00E+00  5.09E-01

 OMEGA - COV MATRIX FOR RANDOM EFFECTS - ETAS  ********
         ETA1      ETA2
 ETA1
+        1.38E-02
 ETA2
+        0.00E+00  6.68E-02

 SIGMA - COV MATRIX FOR RANDOM EFFECTS - EPSILONS  ****
         EPS1
 EPS1
+        1.10E-02

 OMEGA - CORR MATRIX FOR RANDOM EFFECTS - ETAS  *******
         ETA1      ETA2
 ETA1
+        1.17E-01
 ETA2
+        0.00E+00  2.58E-01

 SIGMA - CORR MATRIX FOR RANDOM EFFECTS - EPSILONS  ***
         EPS1
 EPS1
+        1.05E-01

 ********************               FIRST ORDER CONDITIONAL ESTIMATION WITH INTERACTION              ********************
 ********************                            STANDARD ERROR OF ESTIMATE                          ********************

 THETA - VECTOR OF FIXED EFFECTS PARAMETERS   *********
         TH 1      TH 2      TH 3      TH 4      TH 5
         3.31E-01  3.15E+00  2.38E-02 .........  8.67E-02

 OMEGA - COV MATRIX FOR RANDOM EFFECTS - ETAS  ********
         ETA1      ETA2
 ETA1
+        3.60E-03
 ETA2
+       .........  1.91E-02

 SIGMA - COV MATRIX FOR RANDOM EFFECTS - EPSILONS  ****
         EPS1
 EPS1
+        8.87E-04

 OMEGA - CORR MATRIX FOR RANDOM EFFECTS - ETAS  *******
         ETA1      ETA2
 ETA1
+        1.53E-02
 ETA2
+       .........  3.70E-02

 SIGMA - CORR MATRIX FOR RANDOM EFFECTS - EPSILONS  ***
         EPS1
 EPS1
+        4.22E-03

 ********************               FIRST ORDER CONDITIONAL ESTIMATION WITH INTERACTION              ********************
 ********************                          COVARIANCE MATRIX OF ESTIMATE                         ********************

            TH 1      TH 2      TH 3      TH 4      TH 5      OM11      OM12      OM22      SG11
 TH 1
+        1.10E-01
 TH 2
+        1.27E-02  9.94E+00
 TH 3
+        1.34E-03  2.57E-03  5.64E-04
 TH 4
+       ......... ......... ......... .........
 TH 5
+       -2.20E-02 -3.34E-02 -3.64E-04 .........  7.52E-03
 OM11
+        1.35E-04 -2.77E-03  8.67E-06 ......... -8.81E-05  1.29E-05
 OM12
+       ......... ......... ......... ......... ......... ......... .........
 OM22
+       -1.41E-03 -1.77E-02 -3.35E-05 .........  2.59E-04  1.53E-05 .........  3.65E-04
 SG11
+        1.38E-04 -7.56E-04 -1.16E-06 ......... -2.17E-05  2.00E-07 .........  2.54E-06  7.87E-07

 ********************               FIRST ORDER CONDITIONAL ESTIMATION WITH INTERACTION              ********************
 ********************                          CORRELATION MATRIX OF ESTIMATE                        ********************

            TH 1      TH 2      TH 3      TH 4      TH 5      OM11      OM12      OM22      SG11
 TH 1
+        3.31E-01
 TH 2
+        1.22E-02  3.15E+00
 TH 3
+        1.70E-01  3.44E-02  2.38E-02
 TH 4
+       ......... ......... ......... .........
 TH 5
+       -7.66E-01 -1.22E-01 -1.76E-01 .........  8.67E-02
 OM11
+        1.13E-01 -2.45E-01  1.01E-01 ......... -2.83E-01  3.60E-03
 OM12
+       ......... ......... ......... ......... ......... ......... .........
 OM22
+       -2.23E-01 -2.95E-01 -7.39E-02 .........  1.57E-01  2.22E-01 .........  1.91E-02
 SG11
+        4.70E-01 -2.70E-01 -5.52E-02 ......... -2.82E-01  6.26E-02 .........  1.50E-01  8.87E-04
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 Elapsed finaloutput time in seconds:     0.08
 #CPUT: Total CPU Time in Seconds,      169.720
