Sun Jul 12 07:21:29 PM UTC 2026
$PROBLEM one_cpt_transit (N=3) + lagtime + F + MULTIPLE doses -- NONMEM anchor for ferx [#719]
; Reference fit for ferx's `one_cpt_transit(..., lagtime=LAG, f=FB)`. Because a lagtime/F mapping
; is present, ferx routes each subject to its `transit()` ODE twin (#735); this control is the
; NONMEM cross-check for that twin path under an estimated absorption lag, a fixed bioavailability,
; and multiple overlapping doses.
;
; Same EXPLICIT INTEGER-N transit chain as transit_multidose_cov.ctl (n=3 -> 4 transit
; compartments 1..4 + central 5, every transfer rate ktr=(n+1)/MTT), so multi-dose superposition
; is NONMEM-native. Lag and bioavailability are the compartment-1 dose attributes ALAG1 / F1 --
; both NONMEM-native, so there is NO hand-coded $DES time shift (which choked LSODA in the
; first_order_alag experiment; a native ALAG1 restarts the integrator cleanly at the lagged dose).
;
;   * ALAG1 (THETA5) -- estimated absorption lagtime; delays every dose into compartment 1.
;   * F1 (THETA6)    -- bioavailability, FIXed to 0.70. F is structurally non-identifiable on
;                       single-route oral data (only CL/F, V/F are), so both engines FIX it; the
;                       anchor verifies ferx APPLIES F (scales the absorbed amount) identically to
;                       NONMEM, not that it estimates it.
;   * CL = TVCL*(WT/70)**0.75  -- a fixed allometric covariate that composes on the twin path.
;
; Dose CMT 1 (matches ferx). Obs CMT 5 here; the ferx copy (data/transit_multidose_lag_f.csv)
; re-keys obs to CMT 1 (ferx's single disposition compartment). Data simulated FROM ferx
; (tests/gen_transit_multidose_lag_f_anchor.rs), so NONMEM also recovers the truths.

$INPUT ID TIME DV EVID AMT CMT MDV WT
$DATA transit_multidose_lag_f.csv IGNORE=@

$SUBROUTINES ADVAN13 TOL=9
$MODEL
  COMP=(TR1,DEFDOSE)   ; 1 = first transit compartment (dose lands here; ALAG1/F1 apply)
  COMP=(TR2)           ; 2
  COMP=(TR3)           ; 3
  COMP=(TR4)           ; 4 = (n+1)th transit compartment; its outflow feeds central
  COMP=(CENTRAL,DEFOBS); 5 = central (observed)

$PK
  TVCL  = THETA(1)
  TVV   = THETA(2)
  TVMTT = THETA(3)
  NN    = THETA(4)      ; transit count n, FIXed = 3

  CL  = TVCL*(WT/70.0)**0.75*EXP(ETA(1))
  V   = TVV*EXP(ETA(2))
  MTT = TVMTT

  KTR = (NN + 1.0)/MTT
  K10 = CL/V

  ALAG1 = THETA(5)      ; absorption lagtime (estimated), delays the dose into compartment 1
  F1    = THETA(6)      ; bioavailability (FIX 0.70); scales the dose into compartment 1

$DES
  DADT(1) = -KTR*A(1)
  DADT(2) =  KTR*A(1) - KTR*A(2)
  DADT(3) =  KTR*A(2) - KTR*A(3)
  DADT(4) =  KTR*A(3) - KTR*A(4)
  DADT(5) =  KTR*A(4) - K10*A(5)

$ERROR
  IPRED = A(5)/V
  Y = IPRED*(1.0 + EPS(1))

$THETA
  (0.1,  9.0,  100)    ; 1 TVCL
  (1.0,  60.0, 500)    ; 2 TVV
  (0.05, 3.0,  24)     ; 3 TVMTT
  3 FIX                ; 4 NN   (integer transit count -> explicit 4-transit chain)
  (0.001, 0.5, 3.0)    ; 5 ALAG1  absorption lagtime (estimated)
  0.7 FIX              ; 6 F1     bioavailability (non-identifiable single-route oral -> fixed)

$OMEGA
  0.09    ; IIV CL (ETA1)
  0.09    ; IIV V  (ETA2)

$SIGMA
  0.01    ; proportional residual variance (0.1^2)

$ESTIMATION METHOD=1 INTER MAXEVAL=9999 PRINT=5 NOABORT
$COVARIANCE
$TABLE ID TIME DV IPRED CWRES MDV WT NOPRINT ONEHEADER FILE=transit_multidose_lag_f.tab

NM-TRAN MESSAGES
 WARNINGS AND ERRORS (IF ANY) FOR PROBLEM    1
 (WARNING  2) NM-TRAN INFERS THAT THE DATA ARE POPULATION.
Note: Analytical 2nd Derivatives are constructed in FSUBS but are never used.
      You may insert $ABBR DERIV2=NO after the first $PROB to save FSUBS construction and compilation time

1NONLINEAR MIXED EFFECTS MODEL PROGRAM (NONMEM) VERSION 7.6.0 (nm760)
 ORIGINALLY DEVELOPED BY STUART BEAL, LEWIS SHEINER, AND ALISON BOECKMANN
 CURRENT DEVELOPERS ARE ROBERT BAUER, ICON DEVELOPMENT SOLUTIONS,
 AND ALISON BOECKMANN. IMPLEMENTATION, EFFICIENCY, AND STANDARDIZATION
 PERFORMED BY NOUS INFOSYSTEMS.
 PROBLEM NO.:         1
 one_cpt_transit (N=3) + lagtime + F + MULTIPLE doses -- NONMEM anchor fo
 TOT. NO. OF OBS RECS:      600
 TOT. NO. OF INDIVIDUALS:       24
 GENERAL NONLINEAR KINETICS MODEL WITH STIFF/NONSTIFF EQUATIONS (LSODA, ADVAN13)
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 #TBLN:      1
 #METH: First Order Conditional Estimation with Interaction
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
 #TERM:
0MINIMIZATION SUCCESSFUL
 NO. OF FUNCTION EVALUATIONS USED:      183
 NO. OF SIG. DIGITS IN FINAL EST.:  3.9

 ETABAR IS THE ARITHMETIC MEAN OF THE ETA-ESTIMATES,
 AND THE P-VALUE IS GIVEN FOR THE NULL HYPOTHESIS THAT THE TRUE MEAN IS 0.

 ETABAR:         5.3140E-04 -7.4715E-04
 SE:             5.2334E-02  5.4218E-02
 N:                      24          24

 P VAL.:         9.9190E-01  9.8901E-01

 ETASHRINKSD(%)  9.3020E-01  1.6432E+00
 ETASHRINKVR(%)  1.8518E+00  3.2594E+00
 EBVSHRINKSD(%)  7.7025E-01  1.5446E+00
 EBVSHRINKVR(%)  1.5346E+00  3.0653E+00
 RELATIVEINF(%)  9.8459E+01  9.6928E+01
 EPSSHRINKSD(%)  3.8989E+00
 EPSSHRINKVR(%)  7.6458E+00


 TOTAL DATA POINTS NORMALLY DISTRIBUTED (N):          600
 N*LOG(2PI) CONSTANT TO OBJECTIVE FUNCTION:    1102.7262398456071
 OBJECTIVE FUNCTION VALUE WITHOUT CONSTANT:   -2463.8329212954563
 OBJECTIVE FUNCTION VALUE WITH CONSTANT:      -1361.1066814498492
 REPORTED OBJECTIVE FUNCTION DOES NOT CONTAIN CONSTANT

 TOTAL EFFECTIVE ETAS (NIND*NETA):                            48


 #TERE:
 Elapsed estimation  time in seconds:   111.73
 Elapsed covariance  time in seconds:    73.15
 Elapsed postprocess time in seconds:     0.77

 ********************               FIRST ORDER CONDITIONAL ESTIMATION WITH INTERACTION              ********************
 #OBJT:**************                       MINIMUM VALUE OF OBJECTIVE FUNCTION                      ********************
 #OBJV:********************************************         -2463.833       *********************************************

 ********************               FIRST ORDER CONDITIONAL ESTIMATION WITH INTERACTION              ********************
 ********************                             FINAL PARAMETER ESTIMATE                           ********************

 THETA - VECTOR OF FIXED EFFECTS PARAMETERS   *********
         TH 1      TH 2      TH 3      TH 4      TH 5      TH 6
         8.96E+00  5.40E+01  3.01E+00  3.00E+00  5.01E-01  7.00E-01

 OMEGA - COV MATRIX FOR RANDOM EFFECTS - ETAS  ********
         ETA1      ETA2
 ETA1
+        6.70E-02
 ETA2
+        0.00E+00  7.29E-02

 SIGMA - COV MATRIX FOR RANDOM EFFECTS - EPSILONS  ****
         EPS1
 EPS1
+        9.78E-03

 OMEGA - CORR MATRIX FOR RANDOM EFFECTS - ETAS  *******
         ETA1      ETA2
 ETA1
+        2.59E-01
 ETA2
+        0.00E+00  2.70E-01

 SIGMA - CORR MATRIX FOR RANDOM EFFECTS - EPSILONS  ***
         EPS1
 EPS1
+        9.89E-02

 ********************               FIRST ORDER CONDITIONAL ESTIMATION WITH INTERACTION              ********************
 ********************                            STANDARD ERROR OF ESTIMATE                          ********************

 THETA - VECTOR OF FIXED EFFECTS PARAMETERS   *********
         TH 1      TH 2      TH 3      TH 4      TH 5      TH 6
         4.88E-01  3.14E+00  2.05E-02 .........  1.54E-03 .........

 OMEGA - COV MATRIX FOR RANDOM EFFECTS - ETAS  ********
         ETA1      ETA2
 ETA1
+        1.88E-02
 ETA2
+       .........  1.48E-02

 SIGMA - COV MATRIX FOR RANDOM EFFECTS - EPSILONS  ****
         EPS1
 EPS1
+        6.95E-04

 OMEGA - CORR MATRIX FOR RANDOM EFFECTS - ETAS  *******
         ETA1      ETA2
 ETA1
+        3.62E-02
 ETA2
+       .........  2.73E-02

 SIGMA - CORR MATRIX FOR RANDOM EFFECTS - EPSILONS  ***
         EPS1
 EPS1
+        3.52E-03

 ********************               FIRST ORDER CONDITIONAL ESTIMATION WITH INTERACTION              ********************
 ********************                          COVARIANCE MATRIX OF ESTIMATE                         ********************

            TH 1      TH 2      TH 3      TH 4      TH 5      TH 6      OM11      OM12      OM22      SG11
 TH 1
+        2.38E-01
 TH 2
+       -5.91E-01  9.83E+00
 TH 3
+        4.28E-03 -9.41E-03  4.20E-04
 TH 4
+       ......... ......... ......... .........
 TH 5
+       -1.53E-04 -5.70E-04 -1.28E-05 .........  2.38E-06
 TH 6
+       ......... ......... ......... ......... ......... .........
 OM11
+       -2.35E-03  2.60E-02 -2.92E-05 ......... -6.79E-06 .........  3.52E-04
 OM12
+       ......... ......... ......... ......... ......... ......... ......... .........
 OM22
+       -5.82E-04 -1.56E-02  3.07E-05 .........  1.95E-06 ......... -8.93E-06 .........  2.18E-04
 SG11
+       -1.59E-04  2.57E-04  2.20E-07 ......... -3.75E-07 .........  1.41E-06 .........  1.46E-06  4.83E-07

 ********************               FIRST ORDER CONDITIONAL ESTIMATION WITH INTERACTION              ********************
 ********************                          CORRELATION MATRIX OF ESTIMATE                        ********************

            TH 1      TH 2      TH 3      TH 4      TH 5      TH 6      OM11      OM12      OM22      SG11
 TH 1
+        4.88E-01
 TH 2
+       -3.86E-01  3.14E+00
 TH 3
+        4.28E-01 -1.46E-01  2.05E-02
 TH 4
+       ......... ......... ......... .........
 TH 5
+       -2.03E-01 -1.18E-01 -4.04E-01 .........  1.54E-03
 TH 6
+       ......... ......... ......... ......... ......... .........
 OM11
+       -2.56E-01  4.43E-01 -7.59E-02 ......... -2.35E-01 .........  1.88E-02
 OM12
+       ......... ......... ......... ......... ......... ......... ......... .........
 OM22
+       -8.08E-02 -3.37E-01  1.01E-01 .........  8.54E-02 ......... -3.22E-02 .........  1.48E-02
 SG11
+       -4.70E-01  1.18E-01  1.54E-02 ......... -3.49E-01 .........  1.08E-01 .........  1.42E-01  6.95E-04
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 Elapsed finaloutput time in seconds:     0.05
 #CPUT: Total CPU Time in Seconds,      186.231
