Tue Oct  6 05:38:32 AM UTC 2026
$PROBLEM Warfarin 1cpt oral FOCE (no INTER) - ferx #1710 CWRES oracle
$DATA warfarin_foce_cwres.csv IGNORE=@
$INPUT ID TIME DV EVID AMT CMT=DROP RATE MDV
$SUBROUTINES ADVAN2 TRANS2
$PK
  CL = THETA(1)*EXP(ETA(1))
  V  = THETA(2)*EXP(ETA(2))
  KA = THETA(3)*EXP(ETA(3))
  S2 = V
$ERROR
  IPRED = F
  Y = IPRED*(1 + EPS(1))
$THETA (0, 0.2) (0, 10.0) (0, 1.5)
$OMEGA 0.09 0.04 0.30
$SIGMA 0.0004
$ESTIMATION METHOD=1 MAXEVAL=9999 NSIG=3 SIGL=9 PRINT=5 NOABORT POSTHOC FORMAT=s1PE23.16
$TABLE ID TIME EVID CWRES PRED NOPRINT ONEHEADER NOAPPEND FORMAT=s1PE23.16 FILE=warfarin_foce_cwres.tab

NM-TRAN MESSAGES
 WARNINGS AND ERRORS (IF ANY) FOR PROBLEM    1
 (WARNING  2) NM-TRAN INFERS THAT THE DATA ARE POPULATION.
Note: Analytical 2nd Derivatives are constructed in FSUBS but are never used.
      You may insert $ABBR DERIV2=NO after the first $PROB to save FSUBS construction and compilation time

1NONLINEAR MIXED EFFECTS MODEL PROGRAM (NONMEM) VERSION 7.6.0 (nm760)
 ORIGINALLY DEVELOPED BY STUART BEAL, LEWIS SHEINER, AND ALISON BOECKMANN
 CURRENT DEVELOPERS ARE ROBERT BAUER, ICON DEVELOPMENT SOLUTIONS,
 AND ALISON BOECKMANN. IMPLEMENTATION, EFFICIENCY, AND STANDARDIZATION
 PERFORMED BY NOUS INFOSYSTEMS.
 PROBLEM NO.:         1
 Warfarin 1cpt oral FOCE (no INTER) - ferx #1710 CWRES oracle
 TOT. NO. OF OBS RECS:      110
 TOT. NO. OF INDIVIDUALS:       10
 ONE COMPARTMENT MODEL WITH FIRST-ORDER ABSORPTION (ADVAN2)
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 #TBLN:      1
 #METH: First Order Conditional Estimation
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
 #TERM:
0MINIMIZATION SUCCESSFUL
 HOWEVER, PROBLEMS OCCURRED WITH THE MINIMIZATION.
 REGARD THE RESULTS OF THE ESTIMATION STEP CAREFULLY, AND ACCEPT THEM ONLY
 AFTER CHECKING THAT THE COVARIANCE STEP PRODUCES REASONABLE OUTPUT.
 NO. OF FUNCTION EVALUATIONS USED:      246
 NO. OF SIG. DIGITS IN FINAL EST.:  3.2

 ETABAR IS THE ARITHMETIC MEAN OF THE ETA-ESTIMATES,
 AND THE P-VALUE IS GIVEN FOR THE NULL HYPOTHESIS THAT THE TRUE MEAN IS 0.

 ETABAR:        -2.0669E-03  6.6565E-04  1.1136E-01
 SE:             5.3454E-02  3.0890E-02  1.8337E-01
 N:                      10          10          10

 P VAL.:         9.6915E-01  9.8281E-01  5.4366E-01

 ETASHRINKSD(%)  3.3884E-02  1.8833E-01  2.4758E-02
 ETASHRINKVR(%)  6.7756E-02  3.7631E-01  4.9510E-02
 EBVSHRINKSD(%)  2.8105E-02  1.7921E-01  2.5484E-02
 EBVSHRINKVR(%)  5.6201E-02  3.5810E-01  5.0962E-02
 RELATIVEINF(%)  9.9944E+01  9.9642E+01  9.9949E+01
 EPSSHRINKSD(%)  1.4685E+01
 EPSSHRINKVR(%)  2.7213E+01


 TOTAL DATA POINTS NORMALLY DISTRIBUTED (N):          110
 N*LOG(2PI) CONSTANT TO OBJECTIVE FUNCTION:    202.16647730502800
 OBJECTIVE FUNCTION VALUE WITHOUT CONSTANT:   -280.35950111582304
 OBJECTIVE FUNCTION VALUE WITH CONSTANT:      -78.193023810795040
 REPORTED OBJECTIVE FUNCTION DOES NOT CONTAIN CONSTANT

 TOTAL EFFECTIVE ETAS (NIND*NETA):                            30


 #TERE:
 Elapsed estimation  time in seconds:     0.10
 Elapsed postprocess time in seconds:     0.01

 ********************                        FIRST ORDER CONDITIONAL ESTIMATION                      ********************
 #OBJT:**************                       MINIMUM VALUE OF OBJECTIVE FUNCTION                      ********************
 #OBJV:********************************************          -280.360       *********************************************

 ********************                        FIRST ORDER CONDITIONAL ESTIMATION                      ********************
 ********************                             FINAL PARAMETER ESTIMATE                           ********************

 THETA - VECTOR OF FIXED EFFECTS PARAMETERS   *********
         TH 1      TH 2      TH 3
         1.33E-01  7.73E+00  7.25E-01

 OMEGA - COV MATRIX FOR RANDOM EFFECTS - ETAS  ********
         ETA1      ETA2      ETA3
 ETA1
+        2.86E-02
 ETA2
+        0.00E+00  9.58E-03
 ETA3
+        0.00E+00  0.00E+00  3.49E-01

 SIGMA - COV MATRIX FOR RANDOM EFFECTS - EPSILONS  ****
         EPS1
 EPS1
+        1.15E-04

 OMEGA - CORR MATRIX FOR RANDOM EFFECTS - ETAS  *******
         ETA1      ETA2      ETA3
 ETA1
+        1.69E-01
 ETA2
+        0.00E+00  9.79E-02
 ETA3
+        0.00E+00  0.00E+00  5.91E-01

 SIGMA - CORR MATRIX FOR RANDOM EFFECTS - EPSILONS  ***
         EPS1
 EPS1
+        1.07E-02
 Elapsed finaloutput time in seconds:     0.01
 #CPUT: Total CPU Time in Seconds,        0.141
