Thu Jun 25 08:30:16 AM UTC 2026
$PROBLEM    Weibull absorption -- NONMEM anchor for ferx
;           weibull(td,beta) [#322 Phase 2]
; Reference fit for ferx's built-in weibull(td, beta) input-rate function.

; Weibull density absorption straight into a 1-cpt central compartment.

;

; NOTE on the data: igd_oral.csv was simulated from a TRANSIT model, so this

; Weibull fit is mildly mis-specified (the Weibull density approximates the

; delayed-absorption shape). That is still a valid IMPLEMENTATION anchor:

; ferx-weibull and NONMEM-weibull should return the same OFV/THETA on identical

; data even when neither is the true DGP. As with the igd anchor, the check is the

; OBJECTIVE AT THE SHARED OPTIMUM, not the optimiser path (a mis-specified ridge

; lets NONMEM's gradient FOCEI and ferx's derivative-free BOBYQA stall at

; different points). For a matched Weibull-truth dataset, regenerate from

; examples/weibull_absorption.ferx --simulate (see README.md).
$INPUT      ID TIME DV AMT EVID CMT MDV
$DATA      igd_oral.csv IGNORE=@
$SUBROUTINE ADVAN13 TOL=9
$MODEL      COMP=(DEPOT,DEFDOSE) ; 1=inert dose carrier (F1=0); weibull feeds central directly
            COMP=(CENTRAL,DEFOBS) ; 2=central (amount; concentration=A(2)/V)
$PK
  CL   = THETA(1)*EXP(ETA(1))
  V    = THETA(2)*EXP(ETA(2))
  TD   = THETA(3)          ; Weibull scale (h)
  BETA = THETA(4)          ; Weibull shape (dimensionless)

  K20 = CL/V

  ; PODO (last oral dose amount) and TDOS (its time) are NOT reserved variables --
  ; capture them at the dose record; NONMEM carries them forward for $DES to read.
  IF (AMT.GT.0.0.AND.CMT.EQ.1) PODO = AMT
  IF (AMT.GT.0.0.AND.CMT.EQ.1) TDOS = TIME
  ; F1=0: no bolus; PODO drives the Weibull input in $DES (ferx weibull()
  ; convention -- integral R_in = dose, fed straight into central). With
  ; bioavailability, BIO*PODO.
  F1   = 0.0

$DES
  ; Time after the most recent dose (TDOS captured in $PK); = T here (dose at t=0).
  TAD = T - TDOS
  IF (TAD.LE.1.0E-10) TAD = 1.0E-10
  ; R_in(tad) = PODO * (BETA/TD) * (TAD/TD)^(BETA-1) * exp(-(TAD/TD)^BETA)
  XW  = TAD/TD
  RIN = PODO*(BETA/TD)*XW**(BETA-1.0)*EXP(-XW**BETA)
  DADT(1) = 0.0                  ; depot is an inert dose carrier
  DADT(2) = RIN - K20*A(2)       ; Weibull input straight into central

$ERROR
  IPRED = A(2)/V                 ; central concentration (mg/L)
  Y = IPRED*(1.0 + EPS(1))       ; proportional residual error

$THETA  (0.1,5.0,100) ; 1 CL   (L/h)
 (5.0,50.0,500) ; 2 V    (L)
 (0.05,2.0,24) ; 3 TD   (h)   Weibull scale
 (0.1,1.5,10) ; 4 BETA       Weibull shape
$OMEGA  0.09  ;     IIV CL
 0.09  ;      IIV V
$SIGMA  0.0225  ; proportional residual variance (0.15^2)
$ESTIMATION METHOD=1 INTER MAXEVAL=9999 PRINT=5 NOABORT
$COVARIANCE
$TABLE      ID TIME DV IPRED CWRES MDV NOPRINT ONEHEADER
            FILE=weibull.tab

NM-TRAN MESSAGES
 WARNINGS AND ERRORS (IF ANY) FOR PROBLEM    1
 (WARNING  2) NM-TRAN INFERS THAT THE DATA ARE POPULATION.
Note: Analytical 2nd Derivatives are constructed in FSUBS but are never used.
      You may insert $ABBR DERIV2=NO after the first $PROB to save FSUBS construction and compilation time

1NONLINEAR MIXED EFFECTS MODEL PROGRAM (NONMEM) VERSION 7.6.0 (nm760)
 ORIGINALLY DEVELOPED BY STUART BEAL, LEWIS SHEINER, AND ALISON BOECKMANN
 CURRENT DEVELOPERS ARE ROBERT BAUER, ICON DEVELOPMENT SOLUTIONS,
 AND ALISON BOECKMANN. IMPLEMENTATION, EFFICIENCY, AND STANDARDIZATION
 PERFORMED BY NOUS INFOSYSTEMS.
 PROBLEM NO.:         1
 Weibull absorption -- NONMEM anchor for ferx
 TOT. NO. OF OBS RECS:      240
 TOT. NO. OF INDIVIDUALS:       20
 GENERAL NONLINEAR KINETICS MODEL WITH STIFF/NONSTIFF EQUATIONS (LSODA, ADVAN13)
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 #TBLN:      1
 #METH: First Order Conditional Estimation with Interaction
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
 #TERM:
0MINIMIZATION SUCCESSFUL
 NO. OF FUNCTION EVALUATIONS USED:      228
 NO. OF SIG. DIGITS IN FINAL EST.:  3.7

 ETABAR IS THE ARITHMETIC MEAN OF THE ETA-ESTIMATES,
 AND THE P-VALUE IS GIVEN FOR THE NULL HYPOTHESIS THAT THE TRUE MEAN IS 0.

 ETABAR:         5.1176E-03 -4.2517E-03
 SE:             4.6601E-02  4.2855E-02
 N:                      20          20

 P VAL.:         9.1255E-01  9.2097E-01

 ETASHRINKSD(%)  7.3927E+00  6.5055E+00
 ETASHRINKVR(%)  1.4239E+01  1.2588E+01
 EBVSHRINKSD(%)  6.8406E+00  6.2806E+00
 EBVSHRINKVR(%)  1.3213E+01  1.2167E+01
 RELATIVEINF(%)  8.6760E+01  8.7806E+01
 EPSSHRINKSD(%)  6.8259E+00
 EPSSHRINKVR(%)  1.3186E+01


 TOTAL DATA POINTS NORMALLY DISTRIBUTED (N):          240
 N*LOG(2PI) CONSTANT TO OBJECTIVE FUNCTION:    441.09049593824290
 OBJECTIVE FUNCTION VALUE WITHOUT CONSTANT:   -943.83262398747581
 OBJECTIVE FUNCTION VALUE WITH CONSTANT:      -502.74212804923292
 REPORTED OBJECTIVE FUNCTION DOES NOT CONTAIN CONSTANT

 TOTAL EFFECTIVE ETAS (NIND*NETA):                            40


 #TERE:
 Elapsed estimation  time in seconds:     9.96
 Elapsed covariance  time in seconds:     7.14
 Elapsed postprocess time in seconds:     0.13

 ********************               FIRST ORDER CONDITIONAL ESTIMATION WITH INTERACTION              ********************
 #OBJT:**************                       MINIMUM VALUE OF OBJECTIVE FUNCTION                      ********************
 #OBJV:********************************************          -943.833       *********************************************

 ********************               FIRST ORDER CONDITIONAL ESTIMATION WITH INTERACTION              ********************
 ********************                             FINAL PARAMETER ESTIMATE                           ********************

 THETA - VECTOR OF FIXED EFFECTS PARAMETERS   *********
         TH 1      TH 2      TH 3      TH 4
         5.40E+00  6.30E+01  1.66E+00  3.48E+00

 OMEGA - COV MATRIX FOR RANDOM EFFECTS - ETAS  ********
         ETA1      ETA2
 ETA1
+        5.07E-02
 ETA2
+        0.00E+00  4.20E-02

 SIGMA - COV MATRIX FOR RANDOM EFFECTS - EPSILONS  ****
         EPS1
 EPS1
+        4.80E-02

 OMEGA - CORR MATRIX FOR RANDOM EFFECTS - ETAS  *******
         ETA1      ETA2
 ETA1
+        2.25E-01
 ETA2
+        0.00E+00  2.05E-01

 SIGMA - CORR MATRIX FOR RANDOM EFFECTS - EPSILONS  ***
         EPS1
 EPS1
+        2.19E-01

 ********************               FIRST ORDER CONDITIONAL ESTIMATION WITH INTERACTION              ********************
 ********************                            STANDARD ERROR OF ESTIMATE                          ********************

 THETA - VECTOR OF FIXED EFFECTS PARAMETERS   *********
         TH 1      TH 2      TH 3      TH 4
         3.15E-01  3.09E+00  2.93E-02  4.16E-02

 OMEGA - COV MATRIX FOR RANDOM EFFECTS - ETAS  ********
         ETA1      ETA2
 ETA1
+        1.81E-02
 ETA2
+       .........  1.52E-02

 SIGMA - COV MATRIX FOR RANDOM EFFECTS - EPSILONS  ****
         EPS1
 EPS1
+        3.82E-03

 OMEGA - CORR MATRIX FOR RANDOM EFFECTS - ETAS  *******
         ETA1      ETA2
 ETA1
+        4.03E-02
 ETA2
+       .........  3.70E-02

 SIGMA - CORR MATRIX FOR RANDOM EFFECTS - EPSILONS  ***
         EPS1
 EPS1
+        8.72E-03

 ********************               FIRST ORDER CONDITIONAL ESTIMATION WITH INTERACTION              ********************
 ********************                          COVARIANCE MATRIX OF ESTIMATE                         ********************

            TH 1      TH 2      TH 3      TH 4      OM11      OM12      OM22      SG11
 TH 1
+        9.90E-02
 TH 2
+        1.90E-02  9.55E+00
 TH 3
+       -7.35E-04 -2.75E-02  8.57E-04
 TH 4
+        1.13E-03  2.89E-02 -1.05E-03  1.73E-03
 OM11
+       -1.23E-03  4.40E-03 -2.17E-05  2.93E-05  3.29E-04
 OM12
+       ......... ......... ......... ......... ......... .........
 OM22
+        6.28E-04 -2.18E-02 -2.06E-05 -5.18E-05 -7.69E-05 .........  2.30E-04
 SG11
+        2.89E-04  5.01E-04 -2.16E-05 -4.19E-06  5.57E-06 ......... -6.31E-06  1.46E-05

 ********************               FIRST ORDER CONDITIONAL ESTIMATION WITH INTERACTION              ********************
 ********************                          CORRELATION MATRIX OF ESTIMATE                        ********************

            TH 1      TH 2      TH 3      TH 4      OM11      OM12      OM22      SG11
 TH 1
+        3.15E-01
 TH 2
+        1.95E-02  3.09E+00
 TH 3
+       -7.98E-02 -3.04E-01  2.93E-02
 TH 4
+        8.65E-02  2.25E-01 -8.62E-01  4.16E-02
 OM11
+       -2.15E-01  7.84E-02 -4.09E-02  3.88E-02  1.81E-02
 OM12
+       ......... ......... ......... ......... ......... .........
 OM22
+        1.32E-01 -4.64E-01 -4.63E-02 -8.21E-02 -2.79E-01 .........  1.52E-02
 SG11
+        2.41E-01  4.25E-02 -1.94E-01 -2.64E-02  8.03E-02 ......... -1.09E-01  3.82E-03
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 Elapsed finaloutput time in seconds:     0.01
 #CPUT: Total CPU Time in Seconds,       17.362
