Sun Oct  4 04:44:30 PM UTC 2026
$PROBLEM #1661 wide-ODE anchor: FOCEI fit of the NONMEM-simulated cell counts
; Same model as wide_ode_myelo_sim.ctl, fitted from initial estimates deliberately
; off the simulation truth (BAS 5, MTT 100, SLOPE 0.1, GAM 0.17; OMEGA 0.1/0.05/0.1;
; proportional SD 0.15). The ferx twin is wide_ode_myelo_fit.ferx.
$INPUT ID TIME AMT CMT EVID MDV DV V1I K10I K12I K21I
$DATA wide_ode_myelo.csv IGNORE=@

$SUBROUTINE ADVAN13 TOL=10
$MODEL COMP=(CENT DEFDOSE) COMP=(PERI) COMP=(PROL) COMP=(TR1) COMP=(TR2)
       COMP=(TR3) COMP=(CIRC DEFOBS)

$PK
V1  = V1I
K10 = K10I
K12 = K12I
K21 = K21I
BAS   = THETA(1)*EXP(ETA(1))
MTT   = THETA(2)*EXP(ETA(2))
SLOPE = THETA(3)*EXP(ETA(3))
GAM   = THETA(4)
KTR   = 4/MTT
F3 = BAS
F4 = BAS
F5 = BAS
F6 = BAS
F7 = BAS

$DES
CP    = A(1)/V1
EDRUG = SLOPE*CP
FEED  = (BAS/A(7))**GAM
DADT(1) = -K10*A(1) - K12*A(1) + K21*A(2)
DADT(2) =  K12*A(1) - K21*A(2)
DADT(3) =  KTR*A(3)*(1 - EDRUG)*FEED - KTR*A(3)
DADT(4) =  KTR*A(3) - KTR*A(4)
DADT(5) =  KTR*A(4) - KTR*A(5)
DADT(6) =  KTR*A(5) - KTR*A(6)
DADT(7) =  KTR*A(6) - KTR*A(7)

$ERROR
IPRED = F
Y = IPRED*(1 + EPS(1))

$THETA (0.1, 4, 100)       ; TVBAS
$THETA (1, 80, 1000)       ; TVMTT
$THETA (0.0001, 0.06, 10)  ; TVSLOPE
$THETA (0.01, 0.25, 2)     ; TVGAM
$OMEGA 0.05 0.05 0.05
$SIGMA 0.04

$ESTIMATION METHOD=1 INTERACTION MAXEVAL=9999 PRINT=5 NOABORT SIGDIGITS=4
$COVARIANCE MATRIX=R UNCONDITIONAL
$TABLE ID TIME DV PRED IPRED CWRES ETA1 ETA2 ETA3 NOPRINT ONEHEADER FILE=wide_ode_myelo.tab

NM-TRAN MESSAGES
 WARNINGS AND ERRORS (IF ANY) FOR PROBLEM    1
 (WARNING  2) NM-TRAN INFERS THAT THE DATA ARE POPULATION.
Note: Analytical 2nd Derivatives are constructed in FSUBS but are never used.
      You may insert $ABBR DERIV2=NO after the first $PROB to save FSUBS construction and compilation time

1NONLINEAR MIXED EFFECTS MODEL PROGRAM (NONMEM) VERSION 7.5.1
 ORIGINALLY DEVELOPED BY STUART BEAL, LEWIS SHEINER, AND ALISON BOECKMANN
 CURRENT DEVELOPERS ARE ROBERT BAUER, ICON DEVELOPMENT SOLUTIONS,
 AND ALISON BOECKMANN. IMPLEMENTATION, EFFICIENCY, AND STANDARDIZATION
 PERFORMED BY NOUS INFOSYSTEMS.
 PROBLEM NO.:         1
 #1661 wide-ODE anchor: FOCEI fit of the NONMEM-simulated cell counts
 TOT. NO. OF OBS RECS:      288
 TOT. NO. OF INDIVIDUALS:       24
 GENERAL NONLINEAR KINETICS MODEL WITH STIFF/NONSTIFF EQUATIONS (LSODA, ADVAN13)
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 #TBLN:      1
 #METH: First Order Conditional Estimation with Interaction
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
 #TERM:
0MINIMIZATION TERMINATED
 DUE TO ROUNDING ERRORS (ERROR=134)
 NO. OF FUNCTION EVALUATIONS USED:      281
 NO. OF SIG. DIGITS UNREPORTABLE

 ETABAR IS THE ARITHMETIC MEAN OF THE ETA-ESTIMATES,
 AND THE P-VALUE IS GIVEN FOR THE NULL HYPOTHESIS THAT THE TRUE MEAN IS 0.

 ETABAR:         1.3418E-02 -7.6347E-03  5.5997E-02
 SE:             5.4097E-02  4.7101E-02  5.7809E-02
 N:                      24          24          24

 P VAL.:         8.0411E-01  8.7123E-01  3.3272E-01

 ETASHRINKSD(%)  3.3893E+00  8.9614E+00  2.0847E+01
 ETASHRINKVR(%)  6.6638E+00  1.7120E+01  3.7348E+01
 EBVSHRINKSD(%)  2.8791E+00  9.2138E+00  2.2652E+01
 EBVSHRINKVR(%)  5.6754E+00  1.7579E+01  4.0173E+01
 RELATIVEINF(%)  9.2187E+01  8.1246E+01  5.7734E+01
 EPSSHRINKSD(%)  1.0134E+01
 EPSSHRINKVR(%)  1.9241E+01


 TOTAL DATA POINTS NORMALLY DISTRIBUTED (N):          288
 N*LOG(2PI) CONSTANT TO OBJECTIVE FUNCTION:    529.30859512589143
 OBJECTIVE FUNCTION VALUE WITHOUT CONSTANT:    95.685257254298918
 OBJECTIVE FUNCTION VALUE WITH CONSTANT:       624.99385238019033
 REPORTED OBJECTIVE FUNCTION DOES NOT CONTAIN CONSTANT

 TOTAL EFFECTIVE ETAS (NIND*NETA):                            72


 #TERE:
 Elapsed estimation  time in seconds:    61.71
0R MATRIX ALGORITHMICALLY NON-POSITIVE-SEMIDEFINITE
 BUT NONSINGULAR
0COVARIANCE STEP ABORTED
 Elapsed covariance  time in seconds:    34.36
 Elapsed postprocess time in seconds:     0.52

 ********************               FIRST ORDER CONDITIONAL ESTIMATION WITH INTERACTION              ********************
 #OBJT:**************                       MINIMUM VALUE OF OBJECTIVE FUNCTION                      ********************
 #OBJV:********************************************       95.685       **************************************************

 ********************               FIRST ORDER CONDITIONAL ESTIMATION WITH INTERACTION              ********************
 ********************                             FINAL PARAMETER ESTIMATE                           ********************

 THETA - VECTOR OF FIXED EFFECTS PARAMETERS   *********
         TH 1      TH 2      TH 3      TH 4
         4.69E+00  8.39E+01  8.76E-02  1.58E-01

 OMEGA - COV MATRIX FOR RANDOM EFFECTS - ETAS  ********
         ETA1      ETA2      ETA3
 ETA1
+        7.52E-02
 ETA2
+        0.00E+00  6.42E-02
 ETA3
+        0.00E+00  0.00E+00  1.28E-01

 SIGMA - COV MATRIX FOR RANDOM EFFECTS - EPSILONS  ****
         EPS1
 EPS1
+        2.12E-02

 OMEGA - CORR MATRIX FOR RANDOM EFFECTS - ETAS  *******
         ETA1      ETA2      ETA3
 ETA1
+        2.74E-01
 ETA2
+        0.00E+00  2.53E-01
 ETA3
+        0.00E+00  0.00E+00  3.58E-01

 SIGMA - CORR MATRIX FOR RANDOM EFFECTS - EPSILONS  ***
         EPS1
 EPS1
+        1.46E-01
 Elapsed finaloutput time in seconds:     0.01
 #CPUT: Total CPU Time in Seconds,       97.022
