Thu Aug 20 09:51:21 AM UTC 2026
$PROBLEM one_cpt_iv naive-pooled via OMEGA 0 FIX — ferx #989 anchor
$INPUT ID TIME DV EVID AMT CMT RATE MDV
$DATA one_cpt_iv.csv IGNORE=@
$SUBROUTINE ADVAN1 TRANS2
$PK
  CL = THETA(1)*EXP(ETA(1))
  V  = THETA(2)
  S1 = V
$ERROR
  IPRED = F
  Y = IPRED*(1 + EPS(1))
$THETA
  (0.1, 4.0, 100.0)   ; TVCL
  (1.0, 40.0, 500.0)  ; TVV
$OMEGA
  0 FIX               ; degenerate ETA: naive-pooled
$SIGMA
  0.0004              ; PROP_ERR variance (sd 0.02)
$ESTIMATION METHOD=0 MAXEVAL=9999 PRINT=1 NOABORT SIGDIGITS=4
$COVARIANCE
$TABLE ID TIME DV PRED IPRED CWRES NOPRINT ONEHEADER FILE=sdtab1

NM-TRAN MESSAGES
 WARNINGS AND ERRORS (IF ANY) FOR PROBLEM    1
 (WARNING  2) NM-TRAN INFERS THAT THE DATA ARE POPULATION.
Note: Analytical 2nd Derivatives are constructed in FSUBS but are never used.
      You may insert $ABBR DERIV2=NO after the first $PROB to save FSUBS construction and compilation time

1NONLINEAR MIXED EFFECTS MODEL PROGRAM (NONMEM) VERSION 7.6.0 (nm760)
 ORIGINALLY DEVELOPED BY STUART BEAL, LEWIS SHEINER, AND ALISON BOECKMANN
 CURRENT DEVELOPERS ARE ROBERT BAUER, ICON DEVELOPMENT SOLUTIONS,
 AND ALISON BOECKMANN. IMPLEMENTATION, EFFICIENCY, AND STANDARDIZATION
 PERFORMED BY NOUS INFOSYSTEMS.
 PROBLEM NO.:         1
 one_cpt_iv naive-pooled via OMEGA 0 FIX — ferx #989 anchor
 TOT. NO. OF OBS RECS:       90
 TOT. NO. OF INDIVIDUALS:       10
 ONE COMPARTMENT MODEL (ADVAN1)
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 #TBLN:      1
 #METH: First Order
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
 #TERM:
0MINIMIZATION SUCCESSFUL
 NO. OF FUNCTION EVALUATIONS USED:      130
 NO. OF SIG. DIGITS IN FINAL EST.:  4.1

 TOTAL DATA POINTS NORMALLY DISTRIBUTED (N):           90
 N*LOG(2PI) CONSTANT TO OBJECTIVE FUNCTION:    165.40893597684109
 OBJECTIVE FUNCTION VALUE WITHOUT CONSTANT:   -269.63700440359776
 OBJECTIVE FUNCTION VALUE WITH CONSTANT:      -104.22806842675666
 REPORTED OBJECTIVE FUNCTION DOES NOT CONTAIN CONSTANT

 TOTAL EFFECTIVE ETAS (NIND*NETA):                             0


 #TERE:
 Elapsed estimation  time in seconds:     0.07
 Elapsed covariance  time in seconds:     0.00
 Elapsed postprocess time in seconds:     0.02

 ********************                                   FIRST ORDER                                  ********************
 #OBJT:**************                       MINIMUM VALUE OF OBJECTIVE FUNCTION                      ********************
 #OBJV:********************************************          -269.637       *********************************************

 ********************                                   FIRST ORDER                                  ********************
 ********************                             FINAL PARAMETER ESTIMATE                           ********************

 THETA - VECTOR OF FIXED EFFECTS PARAMETERS   *********
         TH 1      TH 2
         4.84E+00  5.28E+01

 OMEGA - COV MATRIX FOR RANDOM EFFECTS - ETAS  ********
         ETA1
 ETA1
+        0.00E+00

 SIGMA - COV MATRIX FOR RANDOM EFFECTS - EPSILONS  ****
         EPS1
 EPS1
+        1.66E-02

 OMEGA - CORR MATRIX FOR RANDOM EFFECTS - ETAS  *******
         ETA1
 ETA1
+        0.00E+00

 SIGMA - CORR MATRIX FOR RANDOM EFFECTS - EPSILONS  ***
         EPS1
 EPS1
+        1.29E-01

 ********************                                   FIRST ORDER                                  ********************
 ********************                            STANDARD ERROR OF ESTIMATE                          ********************

 THETA - VECTOR OF FIXED EFFECTS PARAMETERS   *********
         TH 1      TH 2
         1.66E-01  1.76E+00

 OMEGA - COV MATRIX FOR RANDOM EFFECTS - ETAS  ********
         ETA1
 ETA1
+       .........

 SIGMA - COV MATRIX FOR RANDOM EFFECTS - EPSILONS  ****
         EPS1
 EPS1
+        4.70E-03

 OMEGA - CORR MATRIX FOR RANDOM EFFECTS - ETAS  *******
         ETA1
 ETA1
+       .........

 SIGMA - CORR MATRIX FOR RANDOM EFFECTS - EPSILONS  ***
         EPS1
 EPS1
+        1.82E-02

 ********************                                   FIRST ORDER                                  ********************
 ********************                          COVARIANCE MATRIX OF ESTIMATE                         ********************

            TH 1      TH 2      OM11      SG11
 TH 1
+        2.77E-02
 TH 2
+        6.32E-02  3.10E+00
 OM11
+       ......... ......... .........
 SG11
+        2.18E-04  4.11E-03 .........  2.21E-05

 ********************                                   FIRST ORDER                                  ********************
 ********************                          CORRELATION MATRIX OF ESTIMATE                        ********************

            TH 1      TH 2      OM11      SG11
 TH 1
+        1.66E-01
 TH 2
+        2.16E-01  1.76E+00
 OM11
+       ......... ......... .........
 SG11
+        2.79E-01  4.97E-01 .........  4.70E-03
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 Elapsed finaloutput time in seconds:     0.02
 #CPUT: Total CPU Time in Seconds,        0.096
