$PROBLEM ferx #1275: dose in a lagged SS=1 pre-arrival window, ADVAN13, ALAG1=13
$DATA ss_arrival_flow.csv IGNORE=@
$INPUT ID TIME DV EVID AMT CMT MDV II SS RATE
$SUBROUTINES ADVAN13 TOL=12
$MODEL COMP=(DEPOT,DEFDOSE) COMP=(CENTRAL,DEFOBS)
$PK
  CL = THETA(1)*EXP(ETA(1))
  V  = THETA(2)
  KA = THETA(3)
  ALAG1 = 13
  ALAG2 = 0
  IF (ID.EQ.6) THEN
    ALAG1 = 0
    ALAG2 = 13
  ENDIF
  S2 = V
$DES
  DADT(1) = -KA*A(1)
  DADT(2) = KA*A(1) - CL/V*A(2)
$ERROR
  IPRED = F
  Y     = IPRED*(1+EPS(1))
$THETA 2.0 FIX  20.0 FIX  0.15 FIX
$OMEGA 0 FIX
$SIGMA 0.01 FIX
$ESTIMATION MAXEVAL=0 METHOD=0 NOABORT
$TABLE ID TIME EVID PRED NOPRINT ONEHEADER NOAPPEND FORMAT=s1PE23.16 FILE=ss_arrival_flow_lag13.sdtab
