$PROBLEM ferx batch-T step T4: lagged SS vs lagged train, AUTONOMOUS control
$INPUT ID TIME DV EVID AMT CMT MDV II SS
$DATA train_lag_auto.csv IGNORE=@
$SUBROUTINES ADVAN13 TOL=9
$MODEL COMP=(CENTRAL,DEFDOSE,DEFOBS)
$PK
  CL = THETA(1)
  V  = THETA(2)
  S1 = V
  ALAG1 = THETA(3)
$DES
  DADT(1) = -(CL/V)*A(1)
$ERROR
  IPRED = F
  Y = IPRED*(1 + EPS(1))
$THETA 1.0 FIX 20.0 FIX 3.0 FIX
$OMEGA 0 FIX
$SIGMA 0.01 FIX
$ESTIMATION MAXEVAL=0 METHOD=0 POSTHOC NOABORT
$TABLE ID TIME EVID PRED IPRED NOPRINT ONEHEADER FORMAT=,1PE20.13 FILE=train_lag_auto.tab
