Wed Sep  9 07:26:06 PM UTC 2026
$PROBLEM ferx #1312 anchor -- `categorical2` (Pharmpy MFL `cat2`) covariate form
; ferx's `CL ~ SEX categorical2(ref = 0)` desugars to a factor of 1 at the
; reference level and THETA(4) at the contrast level. That has an exact NONMEM
; spelling, written out by hand below, so this is a direct anchor: same data,
; same 1-cpt oral structure, same FOCEI objective, one declaration versus three
; lines of $PK.
;
; The companion run `covariate_cat.ctl` is the `1 + THETA(4)` (`cat`) shape on
; the same data, started at the corresponding value. The two must reach the same
; OFV at theta_cat2 = 1 + theta_cat -- the reparameterization identity.
;
; CMT is dropped so NONMEM routes doses to the depot and observations to the
; default observation compartment (2) under ADVAN2; ferx's `one_cpt_oral` keeps
; the depot implicit and numbers central 1.
$INPUT ID TIME DV EVID AMT CMT=DROP RATE=DROP MDV SEX
$DATA covariate_cat2.csv IGNORE=@

$SUBROUTINE ADVAN2 TRANS2

$PK
  ; The `cat2` shape: the reference level contributes 1, each non-reference
  ; level its own THETA -- the factor itself, not an offset from 1.
  COVCL = 1
  IF (SEX.EQ.1) COVCL = THETA(4)
  CL = THETA(1)*COVCL*EXP(ETA(1))
  V  = THETA(2)*EXP(ETA(2))
  KA = THETA(3)
  S2 = V

$ERROR
  IPRED = F
  Y = IPRED*(1 + EPS(1))

$THETA
  (0.01, 1.0,  100.0)   ; TVCL
  (1.0,  20.0, 500.0)   ; TVV
  (0.01, 1.0,  20.0)    ; TVKA
  (0.0,  0.999, 6.0)    ; THETA_CL_SEX_1 -- the `categorical2` default init and
                        ; bounds: the image of the `categorical` (-0.001, -1, 5)
                        ; row under theta_cat2 = 1 + theta_cat.

$OMEGA
  0.09   ; ETA(1) CL BSV
  0.09   ; ETA(2) V  BSV

$SIGMA
  0.04   ; proportional residual variance

$ESTIMATION METHOD=1 INTER MAXEVAL=9999 PRINT=5 NOABORT
; MATRIX=R gives the pure R^-1 covariance -- the same estimator ferx computes.
$COVARIANCE MATRIX=R
$TABLE ID TIME SEX IPRED CWRES NOPRINT NOAPPEND ONEHEADER FILE=covariate_cat2.tab

NM-TRAN MESSAGES
 WARNINGS AND ERRORS (IF ANY) FOR PROBLEM    1
 (WARNING  2) NM-TRAN INFERS THAT THE DATA ARE POPULATION.
Note: Analytical 2nd Derivatives are constructed in FSUBS but are never used.
      You may insert $ABBR DERIV2=NO after the first $PROB to save FSUBS construction and compilation time

1NONLINEAR MIXED EFFECTS MODEL PROGRAM (NONMEM) VERSION 7.5.1
 ORIGINALLY DEVELOPED BY STUART BEAL, LEWIS SHEINER, AND ALISON BOECKMANN
 CURRENT DEVELOPERS ARE ROBERT BAUER, ICON DEVELOPMENT SOLUTIONS,
 AND ALISON BOECKMANN. IMPLEMENTATION, EFFICIENCY, AND STANDARDIZATION
 PERFORMED BY NOUS INFOSYSTEMS.
 PROBLEM NO.:         1
 ferx #1312 anchor -- `categorical2` (Pharmpy MFL `cat2`) covariate form
 TOT. NO. OF OBS RECS:      600
 TOT. NO. OF INDIVIDUALS:       60
 ONE COMPARTMENT MODEL WITH FIRST-ORDER ABSORPTION (ADVAN2)
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 #TBLN:      1
 #METH: First Order Conditional Estimation with Interaction
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
 #TERM:
0MINIMIZATION SUCCESSFUL
 NO. OF FUNCTION EVALUATIONS USED:      177
 NO. OF SIG. DIGITS IN FINAL EST.:  3.8

 ETABAR IS THE ARITHMETIC MEAN OF THE ETA-ESTIMATES,
 AND THE P-VALUE IS GIVEN FOR THE NULL HYPOTHESIS THAT THE TRUE MEAN IS 0.

 ETABAR:         9.3944E-03 -5.7218E-03
 SE:             3.4201E-02  4.0696E-02
 N:                      60          60

 P VAL.:         7.8356E-01  8.8819E-01

 ETASHRINKSD(%)  7.9208E+00  3.1431E+00
 ETASHRINKVR(%)  1.5214E+01  6.1874E+00
 EBVSHRINKSD(%)  7.9125E+00  2.8945E+00
 EBVSHRINKVR(%)  1.5199E+01  5.7052E+00
 RELATIVEINF(%)  8.4791E+01  9.4283E+01
 EPSSHRINKSD(%)  8.7047E+00
 EPSSHRINKVR(%)  1.6652E+01


 TOTAL DATA POINTS NORMALLY DISTRIBUTED (N):          600
 N*LOG(2PI) CONSTANT TO OBJECTIVE FUNCTION:    1102.7262398456071
 OBJECTIVE FUNCTION VALUE WITHOUT CONSTANT:   -73.826617109808865
 OBJECTIVE FUNCTION VALUE WITH CONSTANT:       1028.8996227357982
 REPORTED OBJECTIVE FUNCTION DOES NOT CONTAIN CONSTANT

 TOTAL EFFECTIVE ETAS (NIND*NETA):                           120


 #TERE:
 Elapsed estimation  time in seconds:     0.37
 Elapsed covariance  time in seconds:     0.28
 Elapsed postprocess time in seconds:     0.02

 ********************               FIRST ORDER CONDITIONAL ESTIMATION WITH INTERACTION              ********************
 #OBJT:**************                       MINIMUM VALUE OF OBJECTIVE FUNCTION                      ********************
 #OBJV:********************************************      -73.827       **************************************************

 ********************               FIRST ORDER CONDITIONAL ESTIMATION WITH INTERACTION              ********************
 ********************                             FINAL PARAMETER ESTIMATE                           ********************

 THETA - VECTOR OF FIXED EFFECTS PARAMETERS   *********
         TH 1      TH 2      TH 3      TH 4
         9.83E-01  2.14E+01  1.03E+00  1.68E+00

 OMEGA - COV MATRIX FOR RANDOM EFFECTS - ETAS  ********
         ETA1      ETA2
 ETA1
+        8.28E-02
 ETA2
+        0.00E+00  1.06E-01

 SIGMA - COV MATRIX FOR RANDOM EFFECTS - EPSILONS  ****
         EPS1
 EPS1
+        3.82E-02

 OMEGA - CORR MATRIX FOR RANDOM EFFECTS - ETAS  *******
         ETA1      ETA2
 ETA1
+        2.88E-01
 ETA2
+        0.00E+00  3.25E-01

 SIGMA - CORR MATRIX FOR RANDOM EFFECTS - EPSILONS  ***
         EPS1
 EPS1
+        1.95E-01

 ********************               FIRST ORDER CONDITIONAL ESTIMATION WITH INTERACTION              ********************
 ********************                            STANDARD ERROR OF ESTIMATE                          ********************

 THETA - VECTOR OF FIXED EFFECTS PARAMETERS   *********
         TH 1      TH 2      TH 3      TH 4
         5.95E-02  9.70E-01  3.06E-02  1.37E-01

 OMEGA - COV MATRIX FOR RANDOM EFFECTS - ETAS  ********
         ETA1      ETA2
 ETA1
+        1.82E-02
 ETA2
+       .........  2.05E-02

 SIGMA - COV MATRIX FOR RANDOM EFFECTS - EPSILONS  ****
         EPS1
 EPS1
+        2.54E-03

 OMEGA - CORR MATRIX FOR RANDOM EFFECTS - ETAS  *******
         ETA1      ETA2
 ETA1
+        3.17E-02
 ETA2
+       .........  3.16E-02

 SIGMA - CORR MATRIX FOR RANDOM EFFECTS - EPSILONS  ***
         EPS1
 EPS1
+        6.49E-03

 ********************               FIRST ORDER CONDITIONAL ESTIMATION WITH INTERACTION              ********************
 ********************                          COVARIANCE MATRIX OF ESTIMATE                         ********************

            TH 1      TH 2      TH 3      TH 4      OM11      OM12      OM22      SG11
 TH 1
+        3.54E-03
 TH 2
+       -3.63E-03  9.42E-01
 TH 3
+       -2.61E-04  8.58E-03  9.35E-04
 TH 4
+       -6.05E-03  6.51E-03  4.24E-04  1.89E-02
 OM11
+       -6.73E-05  4.76E-04  3.30E-05  8.76E-05  3.32E-04
 OM12
+       ......... ......... ......... ......... ......... .........
 OM22
+       -3.57E-05  1.22E-04  6.31E-06  3.86E-05  3.64E-06 .........  4.22E-04
 SG11
+        6.77E-06  1.48E-04  1.59E-06 -1.17E-06 -2.77E-06 ......... -1.06E-06  6.44E-06

 ********************               FIRST ORDER CONDITIONAL ESTIMATION WITH INTERACTION              ********************
 ********************                          CORRELATION MATRIX OF ESTIMATE                        ********************

            TH 1      TH 2      TH 3      TH 4      OM11      OM12      OM22      SG11
 TH 1
+        5.95E-02
 TH 2
+       -6.29E-02  9.70E-01
 TH 3
+       -1.43E-01  2.89E-01  3.06E-02
 TH 4
+       -7.39E-01  4.88E-02  1.01E-01  1.37E-01
 OM11
+       -6.20E-02  2.69E-02  5.92E-02  3.50E-02  1.82E-02
 OM12
+       ......... ......... ......... ......... ......... .........
 OM22
+       -2.91E-02  6.11E-03  1.00E-02  1.37E-02  9.72E-03 .........  2.05E-02
 SG11
+        4.48E-02  6.01E-02  2.05E-02 -3.35E-03 -5.99E-02 ......... -2.03E-02  2.54E-03
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 Elapsed finaloutput time in seconds:     0.01
 #CPUT: Total CPU Time in Seconds,        0.718
