Mon Jul 13 09:03:09 AM UTC 2026
$PROBLEM 2-state CTMM anchor for ferx-core issue #759
; Continuous-time Markov (panel/snapshot) likelihood via the closed-form 2-state
; transition-probability matrix P(dt) = expm(Q*dt), scored with F_FLAG=1.
; Q = [[-q01, q01], [q10, -q10]], q01=exp(TH1), q10=exp(TH2), lambda=q01+q10.
;   P00=(q10+q01*e)/lam  P01=q01*(1-e)/lam
;   P10=(q10*(1-e))/lam  P11=(q01+q10*e)/lam ,  e=exp(-lam*dt)
; Each record carries the previous state (PSTATE) and the gap (DT); the first
; record per subject is the initial condition (MDV=1), matching ferx which
; conditions on each subject's first observed state.
$DATA ctmm_2state.csv IGNORE=@
$INPUT ID DV PSTATE DT MDV
$PRED
  F_FLAG = 1
  Q01 = EXP(THETA(1))
  Q10 = EXP(THETA(2))
  LAM = Q01 + Q10
  E   = EXP(-LAM*DT)
  P00 = (Q10 + Q01*E)/LAM
  P01 = Q01*(1.0 - E)/LAM
  P10 = Q10*(1.0 - E)/LAM
  P11 = (Q01 + Q10*E)/LAM
  PR = P00
  IF (PSTATE.EQ.0 .AND. DV.EQ.1) PR = P01
  IF (PSTATE.EQ.1 .AND. DV.EQ.0) PR = P10
  IF (PSTATE.EQ.1 .AND. DV.EQ.1) PR = P11
  ; ETA(1)*0: a dummy random effect NONMEM requires for multi-subject data; the
  ; model is fixed-effects (Omega FIX 0), so it contributes nothing.
  Y = PR + ETA(1)*0
$THETA -0.7   ; log q01 (awake -> asleep)
$THETA -1.2   ; log q10 (asleep -> awake)
$OMEGA 0 FIX
$ESTIMATION METHOD=0 MAXEVAL=9999 PRINT=5 NOABORT

NM-TRAN MESSAGES
 WARNINGS AND ERRORS (IF ANY) FOR PROBLEM    1
 (WARNING  1) NM-TRAN INFERS THAT THE DATA ARE SINGLE-SUBJECT.
  NONMEM RUN CANNOT BE PARALLELIZED.
 (DATA WARNING   5) RECORD        40, DATA ITEM   2, CONTENTS: 1
 THE DV DATA ITEM IS POSITIVE, BUT THE MDV DATA ITEM IS 1
 (DATA WARNING   5) RECORD        76, DATA ITEM   2, CONTENTS: 1
 THE DV DATA ITEM IS POSITIVE, BUT THE MDV DATA ITEM IS 1
 * THE MAXIMUM NUMBER OF WARNINGS OF ONE OR MORE TYPES WAS REACHED.
 IT IS POSSIBLE THAT SOME WARNING MESSAGES WERE SUPPRESSED.
Note: Analytical 2nd Derivatives are constructed in FSUBS but are never used.
      You may insert $ABBR DERIV2=NO after the first $PROB to save FSUBS construction and compilation time
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
1NONLINEAR MIXED EFFECTS MODEL PROGRAM (NONMEM) VERSION 7.5.1
 ORIGINALLY DEVELOPED BY STUART BEAL, LEWIS SHEINER, AND ALISON BOECKMANN
 CURRENT DEVELOPERS ARE ROBERT BAUER, ICON DEVELOPMENT SOLUTIONS,
 AND ALISON BOECKMANN. IMPLEMENTATION, EFFICIENCY, AND STANDARDIZATION
 PERFORMED BY NOUS INFOSYSTEMS.
 PROBLEM NO.:         1
 2-state CTMM anchor for ferx-core issue #759
 TOT. NO. OF OBS RECS:      667
 TOT. NO. OF INDIVIDUALS:      667
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 #TBLN:      1
 #METH: First Order
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
 #TERM:
0MINIMIZATION TERMINATED
 DUE TO ROUNDING ERRORS (ERROR=133)
 NO. OF FUNCTION EVALUATIONS USED:       32
 NO. OF SIG. DIGITS UNREPORTABLE

 TOTAL DATA POINTS NORMALLY DISTRIBUTED (N):            0
 N*LOG(2PI) CONSTANT TO OBJECTIVE FUNCTION:    0.0000000000000000
 OBJECTIVE FUNCTION VALUE WITHOUT CONSTANT:    606.98180817644584
 OBJECTIVE FUNCTION VALUE WITH CONSTANT:       606.98180817644584
 REPORTED OBJECTIVE FUNCTION DOES NOT CONTAIN CONSTANT

 TOTAL EFFECTIVE ETAS (NIND*NETA):                             0


 #TERE:
 Elapsed estimation  time in seconds:     0.01
 Elapsed postprocess time in seconds:     0.00

 ********************                                   FIRST ORDER                                  ********************
 #OBJT:**************                       MINIMUM VALUE OF OBJECTIVE FUNCTION                      ********************
 #OBJV:********************************************      606.982       **************************************************

 ********************                                   FIRST ORDER                                  ********************
 ********************                             FINAL PARAMETER ESTIMATE                           ********************

 THETA - VECTOR OF FIXED EFFECTS PARAMETERS   *********
         TH 1      TH 2
        -5.40E-01 -1.22E+00

 OMEGA - COV MATRIX FOR RANDOM EFFECTS - ETAS  ********
         ETA1
 ETA1
+        0.00E+00

 OMEGA - CORR MATRIX FOR RANDOM EFFECTS - ETAS  *******
         ETA1
 ETA1
+        0.00E+00
 Elapsed finaloutput time in seconds:     0.00
 #CPUT: Total CPU Time in Seconds,        0.039
