Thu Jun 11 05:20:55 PM CEST 2026
$PROB Datasim
$INPUT NSIM ID TIME RDV DV MDV AMT EVID
$DATA "data.ferx.csv" IGNORE=@
$SUBROUTINES ADVAN2 TRANS2
$PK
	V  = EXP(THETA(1) + ETA(1));
	KE = EXP(THETA(2) + ETA(2));
	KA = KE + EXP(THETA(3) + ETA(3));
	CL = KE * V;
$ERROR
	CP = A(2)/V;
	Y  = log(CP) + ERR(1);
$THETA
	( 1.61, 3.40, 4.1) ;	/* V */
	( -4.6, -1.2, 0.7) ;	/* KE */
	( -4.6, -0.7, 0.7) ;	/* KA */
$OMEGA BLOCK(3)
	1
	0.001 1
	0.001 0.001 1
$SIGMA
	1
$ESTM SIG=5 MAX=5000 METHOD=1 INTERACT NOABORT POSTHOC PRINT=1

NM-TRAN MESSAGES
 WARNINGS AND ERRORS (IF ANY) FOR PROBLEM    1
 (WARNING  2) NM-TRAN INFERS THAT THE DATA ARE POPULATION.
 (WARNING  23) $PK DOES NOT DEFINE A SCALE PARAMETER FOR THE CENTRAL
 COMPARTMENT.  WITH THIS TRANS, IT MAY NOT BE POSSIBLE TO SEPARATELY
 OBTAIN ESTIMATES OF PARAMETERS AFFECTING CLEARANCE AND VOLUME.
Note: Analytical 2nd Derivatives are constructed in FSUBS but are never used.
      You may insert $ABBR DERIV2=NO after the first $PROB to save FSUBS construction and compilation time

1NONLINEAR MIXED EFFECTS MODEL PROGRAM (NONMEM) VERSION 7.6.0 (nm760)
 ORIGINALLY DEVELOPED BY STUART BEAL, LEWIS SHEINER, AND ALISON BOECKMANN
 CURRENT DEVELOPERS ARE ROBERT BAUER, ICON DEVELOPMENT SOLUTIONS,
 AND ALISON BOECKMANN. IMPLEMENTATION, EFFICIENCY, AND STANDARDIZATION
 PERFORMED BY NOUS INFOSYSTEMS.
 PROBLEM NO.:         1
 Datasim
 TOT. NO. OF OBS RECS:      306
 TOT. NO. OF INDIVIDUALS:      100
 ONE COMPARTMENT MODEL WITH FIRST-ORDER ABSORPTION (ADVAN2)
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 #TBLN:      1
 #METH: First Order Conditional Estimation with Interaction
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
 #TERM:
0MINIMIZATION TERMINATED
 DUE TO ROUNDING ERRORS (ERROR=134)
 NO. OF FUNCTION EVALUATIONS USED:      499
 NO. OF SIG. DIGITS UNREPORTABLE
0PARAMETER ESTIMATE IS NEAR ITS BOUNDARY

 ETABAR IS THE ARITHMETIC MEAN OF THE ETA-ESTIMATES,
 AND THE P-VALUE IS GIVEN FOR THE NULL HYPOTHESIS THAT THE TRUE MEAN IS 0.

 ETABAR:        -1.5584E-03  7.2268E-03 -1.8421E-03
 SE:             3.7992E-02  7.3512E-02  5.7312E-03
 N:                     100         100         100

 P VAL.:         9.6728E-01  9.2169E-01  7.4790E-01

 ETASHRINKSD(%)  4.6405E+00  1.3687E+00  2.9545E+01
 ETASHRINKVR(%)  9.0656E+00  2.7186E+00  5.0360E+01
 EBVSHRINKSD(%)  4.6386E+00  8.6864E-01  3.0274E+01
 EBVSHRINKVR(%)  9.0621E+00  1.7297E+00  5.1383E+01
 RELATIVEINF(%)  1.0000E-10  1.0000E-10  1.3668E-02
 EPSSHRINKSD(%)  2.2273E+01
 EPSSHRINKVR(%)  3.9584E+01


 TOTAL DATA POINTS NORMALLY DISTRIBUTED (N):          306
 N*LOG(2PI) CONSTANT TO OBJECTIVE FUNCTION:    562.39038232125972
 OBJECTIVE FUNCTION VALUE WITHOUT CONSTANT:    70.850528021319064
 OBJECTIVE FUNCTION VALUE WITH CONSTANT:       633.24091034257879
 REPORTED OBJECTIVE FUNCTION DOES NOT CONTAIN CONSTANT

 TOTAL EFFECTIVE ETAS (NIND*NETA):                           300


 #TERE:
 Elapsed estimation  time in seconds:     1.01
 Elapsed postprocess time in seconds:     0.00

 ********************               FIRST ORDER CONDITIONAL ESTIMATION WITH INTERACTION              ********************
 #OBJT:**************                       MINIMUM VALUE OF OBJECTIVE FUNCTION                      ********************
 #OBJV:********************************************            70.851       *********************************************

 ********************               FIRST ORDER CONDITIONAL ESTIMATION WITH INTERACTION              ********************
 ********************                             FINAL PARAMETER ESTIMATE                           ********************

 THETA - VECTOR OF FIXED EFFECTS PARAMETERS   *********
         TH 1      TH 2      TH 3
         3.32E+00 -1.35E+00 -1.20E+00

 OMEGA - COV MATRIX FOR RANDOM EFFECTS - ETAS  ********
         ETA1      ETA2      ETA3
 ETA1
+        1.59E-01
 ETA2
+        2.73E-01  5.56E-01
 ETA3
+        2.63E-02  3.19E-02  6.62E-03

 SIGMA - COV MATRIX FOR RANDOM EFFECTS - EPSILONS  ****
         EPS1
 EPS1
+        6.85E-02

 OMEGA - CORR MATRIX FOR RANDOM EFFECTS - ETAS  *******
         ETA1      ETA2      ETA3
 ETA1
+        3.98E-01
 ETA2
+        9.21E-01  7.45E-01
 ETA3
+        8.12E-01  5.26E-01  8.14E-02

 SIGMA - CORR MATRIX FOR RANDOM EFFECTS - EPSILONS  ***
         EPS1
 EPS1
+        2.62E-01
 Elapsed finaloutput time in seconds:     0.00
 #CPUT: Total CPU Time in Seconds,        1.021
