Mon Aug 24 05:58:29 PM UTC 2026
$PROBLEM ferx #1031 anchor -- sample-size-weighted IOV, hand-written KAPPA/SQRT(NARM)
; NONMEM has no `weight =` on an OMEGA, so the equivalent model writes the
; scaling into $PK by hand -- which is exactly what ferx's
; `kappa KAPPA_CL ~ 0.01 weight = NARM` desugars into. This control stream is
; the anchor for that declaration: same data, same 1-cpt oral structure, same
; FOCE objective.
;
; NARM is the arm size carried per occasion: 400 on OCC 1, 25 on OCC 2, so the
; occasion-2 kappa acts four times as strongly as the occasion-1 one. CMT is
; dropped so NONMEM routes doses to the depot and observations to the default
; observation compartment (2) under ADVAN2.
$INPUT ID TIME DV EVID AMT CMT=DROP RATE=DROP MDV OCC NARM
$DATA kappa_weight_anchor.csv IGNORE=@

$SUBROUTINE ADVAN2 TRANS2

$PK
  KAPPA = 0
  IF(OCC.EQ.1) KAPPA = ETA(4)
  IF(OCC.EQ.2) KAPPA = ETA(5)
  CL = THETA(1)*EXP(ETA(1) + KAPPA/SQRT(NARM))
  V  = THETA(2)*EXP(ETA(2))
  KA = THETA(3)*EXP(ETA(3))
  S2 = V

$ERROR
  IPRED = F
  Y = IPRED*(1 + EPS(1))

$THETA
  (0.001, 0.2,  10.0)   ; TVCL
  (0.1,   10.0, 500.0)  ; TVV
  (0.01,  1.5,  50.0)   ; TVKA

$OMEGA
  0.09   ; ETA(1) CL BSV
  0.04   ; ETA(2) V  BSV
  0.30   ; ETA(3) KA BSV
$OMEGA BLOCK(1)
  0.01   ; ETA(4) IOV variance (the unweighted gamma^2)
$OMEGA BLOCK(1) SAME  ; ETA(5) occasion 2

$SIGMA
  0.04   ; proportional residual variance (SD 0.2)

$ESTIMATION METHOD=1 MAXEVAL=9999 PRINT=5 NOABORT
$COVARIANCE MATRIX=R
$TABLE ID TIME OCC IPRED CWRES NOPRINT NOAPPEND ONEHEADER FILE=kappa_weight_anchor.tab

NM-TRAN MESSAGES
 WARNINGS AND ERRORS (IF ANY) FOR PROBLEM    1
 (WARNING  2) NM-TRAN INFERS THAT THE DATA ARE POPULATION.
Note: Analytical 2nd Derivatives are constructed in FSUBS but are never used.
      You may insert $ABBR DERIV2=NO after the first $PROB to save FSUBS construction and compilation time

1NONLINEAR MIXED EFFECTS MODEL PROGRAM (NONMEM) VERSION 7.6.0 (nm760)
 ORIGINALLY DEVELOPED BY STUART BEAL, LEWIS SHEINER, AND ALISON BOECKMANN
 CURRENT DEVELOPERS ARE ROBERT BAUER, ICON DEVELOPMENT SOLUTIONS,
 AND ALISON BOECKMANN. IMPLEMENTATION, EFFICIENCY, AND STANDARDIZATION
 PERFORMED BY NOUS INFOSYSTEMS.
 PROBLEM NO.:         1
 ferx #1031 anchor -- sample-size-weighted IOV, hand-written KAPPA/SQRT(N
 TOT. NO. OF OBS RECS:      220
 TOT. NO. OF INDIVIDUALS:       10
 ONE COMPARTMENT MODEL WITH FIRST-ORDER ABSORPTION (ADVAN2)
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 #TBLN:      1
 #METH: First Order Conditional Estimation
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
 #TERM:
0MINIMIZATION SUCCESSFUL
 NO. OF FUNCTION EVALUATIONS USED:      378
 NO. OF SIG. DIGITS IN FINAL EST.:  3.4

 ETABAR IS THE ARITHMETIC MEAN OF THE ETA-ESTIMATES,
 AND THE P-VALUE IS GIVEN FOR THE NULL HYPOTHESIS THAT THE TRUE MEAN IS 0.

 ETABAR:        -7.0479E-01  1.1080E-02 -9.8004E-01 -2.9089E-01  6.9120E-01
 SE:             9.8709E-02  3.2459E-02  7.6805E-02  1.0320E-01  3.6508E-01
 N:                      10          10          10          10          10

 P VAL.:         9.3946E-13  7.3283E-01  2.8372E-37  4.8205E-03  5.8322E-02

 ETASHRINKSD(%)  2.5574E-01  7.2854E+00  1.7970E+00  6.9098E+01  4.8827E+00
 ETASHRINKVR(%)  5.1083E-01  1.4040E+01  3.5617E+00  9.0451E+01  9.5270E+00
 EBVSHRINKSD(%)  4.3642E-01  6.9771E+00  2.3481E+00  7.4314E+01  3.1247E+00
 EBVSHRINKVR(%)  8.7094E-01  1.3467E+01  4.6411E+00  9.3402E+01  6.1517E+00
 RELATIVEINF(%)  1.0000E-10  8.6472E+01  9.5306E+01  1.0000E-10  1.0000E-10
 EPSSHRINKSD(%)  9.0960E+00
 EPSSHRINKVR(%)  1.7365E+01


 TOTAL DATA POINTS NORMALLY DISTRIBUTED (N):          220
 N*LOG(2PI) CONSTANT TO OBJECTIVE FUNCTION:    404.33295461005599
 OBJECTIVE FUNCTION VALUE WITHOUT CONSTANT:    207.45526044656182
 OBJECTIVE FUNCTION VALUE WITH CONSTANT:       611.78821505661779
 REPORTED OBJECTIVE FUNCTION DOES NOT CONTAIN CONSTANT

 TOTAL EFFECTIVE ETAS (NIND*NETA):                            50


 #TERE:
 Elapsed estimation  time in seconds:     0.25
0R MATRIX ALGORITHMICALLY NON-POSITIVE-SEMIDEFINITE
 BUT NONSINGULAR
0COVARIANCE STEP ABORTED
 Elapsed covariance  time in seconds:     0.07
 Elapsed postprocess time in seconds:     0.01

 ********************                        FIRST ORDER CONDITIONAL ESTIMATION                      ********************
 #OBJT:**************                       MINIMUM VALUE OF OBJECTIVE FUNCTION                      ********************
 #OBJV:********************************************           207.455       *********************************************

 ********************                        FIRST ORDER CONDITIONAL ESTIMATION                      ********************
 ********************                             FINAL PARAMETER ESTIMATE                           ********************

 THETA - VECTOR OF FIXED EFFECTS PARAMETERS   *********
         TH 1      TH 2      TH 3
         3.17E-01  8.40E+00  2.62E+00

 OMEGA - COV MATRIX FOR RANDOM EFFECTS - ETAS  ********
         ETA1      ETA2      ETA3      ETA4      ETA5
 ETA1
+        5.97E-01
 ETA2
+        0.00E+00  1.24E-02
 ETA3
+        0.00E+00  0.00E+00  1.06E+00
 ETA4
+        0.00E+00  0.00E+00  0.00E+00  2.00E+00
 ETA5
+        0.00E+00  0.00E+00  0.00E+00  0.00E+00  2.00E+00

 SIGMA - COV MATRIX FOR RANDOM EFFECTS - EPSILONS  ****
         EPS1
 EPS1
+        3.76E-02

 OMEGA - CORR MATRIX FOR RANDOM EFFECTS - ETAS  *******
         ETA1      ETA2      ETA3      ETA4      ETA5
 ETA1
+        7.73E-01
 ETA2
+        0.00E+00  1.11E-01
 ETA3
+        0.00E+00  0.00E+00  1.03E+00
 ETA4
+        0.00E+00  0.00E+00  0.00E+00  1.41E+00
 ETA5
+        0.00E+00  0.00E+00  0.00E+00  0.00E+00  1.41E+00

 SIGMA - CORR MATRIX FOR RANDOM EFFECTS - EPSILONS  ***
         EPS1
 EPS1
+        1.94E-01
 Elapsed finaloutput time in seconds:     0.00
 #CPUT: Total CPU Time in Seconds,        0.340
