Tue Aug 18 06:07:27 PM UTC 2026
$PROBLEM 2-class CL mixture, 1-cpt IV (#977 ferx MIXEST/PMIX anchor)
; Two latent subpopulations differing only in clearance (TVCL1 vs TVCL2),
; constant (covariate-free) mixing fraction P(1). FOCE-I estimation.
$INPUT ID TIME DV AMT EVID CMT WT
$DATA mixture_iv.csv IGNORE=@
$SUBROUTINES ADVAN1 TRANS2

$PK
  IF (MIXNUM.EQ.1) TVCL = THETA(1)
  IF (MIXNUM.EQ.2) TVCL = THETA(2)
  CL = TVCL * EXP(ETA(1))
  V  = THETA(3)
  S1 = V

$MIX
  NSPOP = 2
  P(1) = THETA(4)
  P(2) = 1.0 - THETA(4)

$ERROR
  MIXE = MIXEST
  IPRED = F
  Y = IPRED * (1.0 + EPS(1))

$THETA
  (0.01, 1.2, 100.0)     ; TVCL1  (class 1, low CL)
  (0.01, 2.5, 100.0)     ; TVCL2  (class 2, high CL)
  (0.1, 10.0, 1000.0)    ; V
  (0.001, 0.5, 0.999)    ; P(1)   mixing fraction of class 1
$OMEGA 0.09 FIX           ; IIV on CL (fixed at data-generating value)
$SIGMA 0.04 FIX           ; proportional RUV (fixed at data-generating value)

$ESTIMATION METHOD=1 INTER MAXEVAL=9999 PRINT=5 NOABORT
$TABLE ID TIME MIXE NOPRINT ONEHEADER FILE=mixture_iv.sdtab

NM-TRAN MESSAGES
 WARNINGS AND ERRORS (IF ANY) FOR PROBLEM    1
 (WARNING  2) NM-TRAN INFERS THAT THE DATA ARE POPULATION.
Note: Analytical 2nd Derivatives are constructed in FSUBS but are never used.
      You may insert $ABBR DERIV2=NO after the first $PROB to save FSUBS construction and compilation time

1NONLINEAR MIXED EFFECTS MODEL PROGRAM (NONMEM) VERSION 7.5.1
 ORIGINALLY DEVELOPED BY STUART BEAL, LEWIS SHEINER, AND ALISON BOECKMANN
 CURRENT DEVELOPERS ARE ROBERT BAUER, ICON DEVELOPMENT SOLUTIONS,
 AND ALISON BOECKMANN. IMPLEMENTATION, EFFICIENCY, AND STANDARDIZATION
 PERFORMED BY NOUS INFOSYSTEMS.
 PROBLEM NO.:         1
 2-class CL mixture, 1-cpt IV (#977 ferx MIXEST/PMIX anchor)
 TOT. NO. OF OBS RECS:      210
 TOT. NO. OF INDIVIDUALS:       30
 ONE COMPARTMENT MODEL (ADVAN1)
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 #TBLN:      1
 #METH: First Order Conditional Estimation with Interaction
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
 #TERM:
0MINIMIZATION SUCCESSFUL
 NO. OF FUNCTION EVALUATIONS USED:      102
 NO. OF SIG. DIGITS IN FINAL EST.:  3.4

 ETABAR IS THE ARITHMETIC MEAN OF THE ETA-ESTIMATES,
 AND SE IS THE ASSOCIATED STANDARD ERROR.

 SUBMODEL    1

 ETABAR:        -2.1666E-03
 SE:             5.7079E-02
 N:                      14

 ETASHRINKSD(%)  2.8810E+01
 ETASHRINKVR(%)  4.9319E+01
 EBVSHRINKSD(%)  8.6301E+00
 EBVSHRINKVR(%)  1.6516E+01
 RELATIVEINF(%)  8.3484E+01
 EPSSHRINKSD(%)  9.2085E-01
 EPSSHRINKVR(%)  1.8332E+00

 SUBMODEL    2

 ETABAR:         3.3168E-03
 SE:             6.6753E-02
 N:                      16

 ETASHRINKSD(%)  1.0996E+01
 ETASHRINKVR(%)  2.0784E+01
 EBVSHRINKSD(%)  1.2343E+00
 EBVSHRINKVR(%)  2.4534E+00
 RELATIVEINF(%)  9.7547E+01
 EPSSHRINKSD(%)  1.3192E+00
 EPSSHRINKVR(%)  2.6211E+00


 TOTAL DATA POINTS NORMALLY DISTRIBUTED (N):          210
 N*LOG(2PI) CONSTANT TO OBJECTIVE FUNCTION:    385.95418394596254
 OBJECTIVE FUNCTION VALUE WITHOUT CONSTANT:    301.58201841853003
 OBJECTIVE FUNCTION VALUE WITH CONSTANT:       687.53620236449251
 REPORTED OBJECTIVE FUNCTION DOES NOT CONTAIN CONSTANT

 TOTAL EFFECTIVE ETAS (NIND*NETA):                            30


 #TERE:
 Elapsed estimation  time in seconds:     0.09
 Elapsed postprocess time in seconds:     0.01

 ********************               FIRST ORDER CONDITIONAL ESTIMATION WITH INTERACTION              ********************
 #OBJT:**************                       MINIMUM VALUE OF OBJECTIVE FUNCTION                      ********************
 #OBJV:********************************************      301.582       **************************************************

 ********************               FIRST ORDER CONDITIONAL ESTIMATION WITH INTERACTION              ********************
 ********************                             FINAL PARAMETER ESTIMATE                           ********************

 THETA - VECTOR OF FIXED EFFECTS PARAMETERS   *********
         TH 1      TH 2      TH 3      TH 4
         9.81E-01  2.84E+00  9.98E+00  4.72E-01

 OMEGA - COV MATRIX FOR RANDOM EFFECTS - ETAS  ********
         ETA1
 ETA1
+        9.00E-02

 SIGMA - COV MATRIX FOR RANDOM EFFECTS - EPSILONS  ****
         EPS1
 EPS1
+        4.00E-02

 OMEGA - CORR MATRIX FOR RANDOM EFFECTS - ETAS  *******
         ETA1
 ETA1
+        3.00E-01

 SIGMA - CORR MATRIX FOR RANDOM EFFECTS - EPSILONS  ***
         EPS1
 EPS1
+        2.00E-01
 Elapsed finaloutput time in seconds:     0.00
 #CPUT: Total CPU Time in Seconds,        0.128
