$PROBLEM 2-class CL mixture, 1-cpt IV — SE/covariance anchor (#983 Phase 6)
; Same model as mixture_iv.ctl (constant mixing, FIXED Omega/Sigma), plus a
; $COVARIANCE step so ferx's mixture SEs can be cross-checked against NONMEM.
$INPUT ID TIME DV AMT EVID CMT WT
$DATA mixture_iv.csv IGNORE=@
$SUBROUTINES ADVAN1 TRANS2

$PK
  IF (MIXNUM.EQ.1) TVCL = THETA(1)
  IF (MIXNUM.EQ.2) TVCL = THETA(2)
  CL = TVCL * EXP(ETA(1))
  V  = THETA(3)
  S1 = V

$MIX
  NSPOP = 2
  P(1) = THETA(4)
  P(2) = 1.0 - THETA(4)

$ERROR
  MIXE = MIXEST
  IPRED = F
  Y = IPRED * (1.0 + EPS(1))

$THETA
  (0.01, 1.2, 100.0)     ; TVCL1  (class 1, low CL)
  (0.01, 2.5, 100.0)     ; TVCL2  (class 2, high CL)
  (0.1, 10.0, 1000.0)    ; V
  (0.001, 0.5, 0.999)    ; P(1)   mixing fraction of class 1
$OMEGA 0.09 FIX           ; IIV on CL (fixed at data-generating value)
$SIGMA 0.04 FIX           ; proportional RUV (fixed at data-generating value)

$ESTIMATION METHOD=1 INTER MAXEVAL=9999 PRINT=5 NOABORT
; MATRIX=R gives the pure R^-1 (Hessian-inverse) covariance — the same
; estimator ferx computes (inverse of the FD Hessian of the objective) — so the
; SEs are an apples-to-apples cross-check. NONMEM's default sandwich R^-1 S R^-1
; would differ by the usual 10-25% between the two estimators.
$COVARIANCE MATRIX=R PRINT=E
$TABLE ID TIME MIXE NOPRINT ONEHEADER FILE=mixture_iv_cov.sdtab
