Thu Aug 20 01:53:39 AM UTC 2026
$PROBLEM 2-class CL mixture, 1-cpt IV, MU-referenced IMPMAP (#996 ferx anchor)
; Same model / data as mixture_iv.ctl (FOCE-I) and mixture_iv_saem.ctl (SAEM):
; two latent subpopulations differing only in clearance (TVCL1 vs TVCL2) with a
; constant mixing fraction P(1), Omega/Sigma FIXed at the data-generating values.
;
; What is new here (#996): the class-switched typical value is written as a
; MU_ reference *inside* the MIXNUM branch, so NONMEM's EM machinery applies its
; mu-referenced conjugate theta move per class. This is the NONMEM counterpart
; of the ferx class-aware mu-ref shift for estimating IMP/IMPMAP; the existing
; anchors both use a plain `IF (MIXNUM.EQ.1) TVCL = THETA(1)` with no MU_.
$INPUT ID TIME DV AMT EVID CMT WT
$DATA mixture_iv.csv IGNORE=@
$SUBROUTINES ADVAN1 TRANS2

$PK
  IF (MIXNUM.EQ.1) MU_1 = LOG(THETA(1))
  IF (MIXNUM.EQ.2) MU_1 = LOG(THETA(2))
  CL = EXP(MU_1 + ETA(1))
  V  = THETA(3)
  S1 = V

$MIX
  NSPOP = 2
  P(1) = THETA(4)
  P(2) = 1.0 - THETA(4)

$ERROR
  MIXE = MIXEST
  IPRED = F
  Y = IPRED * (1.0 + EPS(1))

$THETA
  (0.01, 1.2, 100.0)     ; TVCL1  (class 1, low CL)
  (0.01, 2.5, 100.0)     ; TVCL2  (class 2, high CL)
  (0.1, 10.0, 1000.0)    ; V
  (0.001, 0.5, 0.999)    ; P(1)   mixing fraction of class 1
$OMEGA 0.09 FIX           ; IIV on CL (fixed at data-generating value)
$SIGMA 0.04 FIX           ; proportional RUV (fixed at data-generating value)

; IMPMAP (MAP-centred importance-sampling EM) at the same settings the ferx
; test uses: 50 iterations x 1500 samples per subject, seed 20250818.
$ESTIMATION METHOD=IMPMAP INTERACTION NITER=50 ISAMPLE=1500
            SEED=20250818 PRINT=5 NOABORT
$TABLE ID TIME MIXE NOPRINT ONEHEADER FILE=mixture_iv_impmap_mu.sdtab

NM-TRAN MESSAGES
 WARNINGS AND ERRORS (IF ANY) FOR PROBLEM    1
 (WARNING  2) NM-TRAN INFERS THAT THE DATA ARE POPULATION.
 (MU_WARNING 8) MU_001: SHOULD NOT BE DEFINED CONDITIONALLY.
 (MU_WARNING 2) MU_001: SHOULD BE DEFINED ONLY ONCE.
Note: Analytical 2nd Derivatives are constructed in FSUBS but are never used.
      You may insert $ABBR DERIV2=NO after the first $PROB to save FSUBS construction and compilation time

1NONLINEAR MIXED EFFECTS MODEL PROGRAM (NONMEM) VERSION 7.6.0 (nm760)
 ORIGINALLY DEVELOPED BY STUART BEAL, LEWIS SHEINER, AND ALISON BOECKMANN
 CURRENT DEVELOPERS ARE ROBERT BAUER, ICON DEVELOPMENT SOLUTIONS,
 AND ALISON BOECKMANN. IMPLEMENTATION, EFFICIENCY, AND STANDARDIZATION
 PERFORMED BY NOUS INFOSYSTEMS.
 PROBLEM NO.:         1
 2-class CL mixture, 1-cpt IV, MU-referenced IMPMAP (#996 ferx anchor)
 TOT. NO. OF OBS RECS:      210
 TOT. NO. OF INDIVIDUALS:       30
 ONE COMPARTMENT MODEL (ADVAN1)
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 #TBLN:      1
 #METH: Importance Sampling assisted by MAP Estimation
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
 #TERM:
 OPTIMIZATION WAS NOT TESTED FOR CONVERGENCE

 ETABAR IS THE ARITHMETIC MEAN OF THE ETA-ESTIMATES,
 AND SE IS THE ASSOCIATED STANDARD ERROR.

 SUBMODEL    1

 ETABAR:        -1.2679E-02
 SE:             5.7410E-02
 N:                      14

 ETASHRINKSD(%)  2.8272E+01
 ETASHRINKVR(%)  4.8551E+01
 EBVSHRINKSD(%)  1.0609E+01
 EBVSHRINKVR(%)  2.0093E+01
 RELATIVEINF(%)  7.9907E+01
 EPSSHRINKSD(%)  1.6552E+00
 EPSSHRINKVR(%)  3.2829E+00

 SUBMODEL    2

 ETABAR:         1.5686E-03
 SE:             6.7451E-02
 N:                      16

 ETASHRINKSD(%)  1.0063E+01
 ETASHRINKVR(%)  1.9114E+01
 EBVSHRINKSD(%)  1.3026E+00
 EBVSHRINKVR(%)  2.5882E+00
 RELATIVEINF(%)  9.7412E+01
 EPSSHRINKSD(%)  2.1405E+00
 EPSSHRINKVR(%)  4.2352E+00


 TOTAL DATA POINTS NORMALLY DISTRIBUTED (N):          210
 N*LOG(2PI) CONSTANT TO OBJECTIVE FUNCTION:    385.95418394596254
 OBJECTIVE FUNCTION VALUE WITHOUT CONSTANT:    300.45750958850851
 OBJECTIVE FUNCTION VALUE WITH CONSTANT:       686.41169353447106
 REPORTED OBJECTIVE FUNCTION DOES NOT CONTAIN CONSTANT

 TOTAL EFFECTIVE ETAS (NIND*NETA):                            30


 #TERE:
 Elapsed estimation  time in seconds:    14.04

 ********************                  IMPORTANCE SAMPLING ASSISTED BY MAP ESTIMATION                ********************
 #OBJT:**************                        FINAL VALUE OF OBJECTIVE FUNCTION                       ********************
 #OBJV:********************************************           300.458       *********************************************

 ********************                  IMPORTANCE SAMPLING ASSISTED BY MAP ESTIMATION                ********************
 ********************                             FINAL PARAMETER ESTIMATE                           ********************

 THETA - VECTOR OF FIXED EFFECTS PARAMETERS   *********
         TH 1      TH 2      TH 3      TH 4
         9.49E-01  2.82E+00  1.00E+01  4.73E-01

 OMEGA - COV MATRIX FOR RANDOM EFFECTS - ETAS  ********
         ETA1
 ETA1
+        9.00E-02

 SIGMA - COV MATRIX FOR RANDOM EFFECTS - EPSILONS  ****
         EPS1
 EPS1
+        4.00E-02

 OMEGA - CORR MATRIX FOR RANDOM EFFECTS - ETAS  *******
         ETA1
 ETA1
+        3.00E-01

 SIGMA - CORR MATRIX FOR RANDOM EFFECTS - EPSILONS  ***
         EPS1
 EPS1
+        2.00E-01
 Elapsed postprocess time in seconds:     0.01
 Elapsed finaloutput time in seconds:     0.00
 #CPUT: Total CPU Time in Seconds,       14.066
