Tue Aug 18 11:22:41 PM UTC 2026
$PROBLEM 2-class CL mixture + IOV on CL, 1-cpt IV (#985 ferx IOV+mixture anchor)
; Two latent subpopulations differing in clearance (TVCL1 vs TVCL2), constant
; mixing fraction P(1), plus inter-occasion variability on CL: each subject has
; two dosing occasions (OCC 1/2), and CL carries a per-occasion kappa drawn from
; a shared IOV omega ($OMEGA BLOCK(1) ... SAME). FOCE-I estimation. IIV + IOV
; omegas are free; proportional sigma fixed at the data-generating value so the
; MATRIX=R standard errors compare cleanly against ferx (pure R^-1). IIV + IOV
; omegas and sigma are FIXED at their data-generating values (mirroring the
; mixture_iv_cov anchor): with only two occasions the IOV omega is weakly
; identified, so fixing the variances keeps the 4-theta R matrix well-conditioned
; while the IOV kappa still enters the FOCE-I marginal.
$INPUT ID TIME DV AMT EVID CMT OCC WT
$DATA mixture_iv_iov.csv IGNORE=@
$SUBROUTINES ADVAN1 TRANS2

$PK
  IF (MIXNUM.EQ.1) TVCL = THETA(1)
  IF (MIXNUM.EQ.2) TVCL = THETA(2)
  OCC1 = 0
  OCC2 = 0
  IF (OCC.EQ.1) OCC1 = 1
  IF (OCC.EQ.2) OCC2 = 1
  KACL = OCC1*ETA(2) + OCC2*ETA(3)
  CL = TVCL * EXP(ETA(1) + KACL)
  V  = THETA(3)
  S1 = V

$MIX
  NSPOP = 2
  P(1) = THETA(4)
  P(2) = 1.0 - THETA(4)

$ERROR
  MIXE = MIXEST
  IPRED = F
  Y = IPRED * (1.0 + EPS(1))

$THETA
  (0.01, 1.0, 100.0)     ; TVCL1  (class 1, low CL)
  (0.01, 3.0, 100.0)     ; TVCL2  (class 2, high CL)
  (0.1, 10.0, 1000.0)    ; V
  (0.001, 0.5, 0.999)    ; P(1)   mixing fraction of class 1
$OMEGA 0.05 FIX          ; IIV on CL (fixed at data-generating value)
$OMEGA BLOCK(1) 0.02 FIX ; IOV on CL, occasion 1 (fixed)
$OMEGA BLOCK(1) SAME     ; IOV on CL, occasion 2 (same variance, inherits FIX)
$SIGMA 0.04 FIX          ; proportional RUV (fixed at data-generating value)

$ESTIMATION METHOD=1 INTER MAXEVAL=9999 PRINT=5 NOABORT
$COVARIANCE MATRIX=R
$TABLE ID TIME MIXE NOPRINT ONEHEADER FILE=mixture_iv_iov.sdtab

NM-TRAN MESSAGES
 WARNINGS AND ERRORS (IF ANY) FOR PROBLEM    1
 (WARNING  2) NM-TRAN INFERS THAT THE DATA ARE POPULATION.
Note: Analytical 2nd Derivatives are constructed in FSUBS but are never used.
      You may insert $ABBR DERIV2=NO after the first $PROB to save FSUBS construction and compilation time

1NONLINEAR MIXED EFFECTS MODEL PROGRAM (NONMEM) VERSION 7.5.1
 ORIGINALLY DEVELOPED BY STUART BEAL, LEWIS SHEINER, AND ALISON BOECKMANN
 CURRENT DEVELOPERS ARE ROBERT BAUER, ICON DEVELOPMENT SOLUTIONS,
 AND ALISON BOECKMANN. IMPLEMENTATION, EFFICIENCY, AND STANDARDIZATION
 PERFORMED BY NOUS INFOSYSTEMS.
 PROBLEM NO.:         1
 2-class CL mixture + IOV on CL, 1-cpt IV (#985 ferx IOV+mixture anchor)
 TOT. NO. OF OBS RECS:      240
 TOT. NO. OF INDIVIDUALS:       30
 ONE COMPARTMENT MODEL (ADVAN1)
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 #TBLN:      1
 #METH: First Order Conditional Estimation with Interaction
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
 #TERM:
0MINIMIZATION TERMINATED
 DUE TO ROUNDING ERRORS (ERROR=133)
 NO. OF FUNCTION EVALUATIONS USED:       88
 NO. OF SIG. DIGITS UNREPORTABLE

 ETABAR IS THE ARITHMETIC MEAN OF THE ETA-ESTIMATES,
 AND SE IS THE ASSOCIATED STANDARD ERROR.

 SUBMODEL    1

 ETABAR:         7.2085E-03 -2.0174E-02  2.3057E-02
 SE:             3.1837E-02  9.2505E-03  1.0758E-02
 N:                      16          16          16

 ETASHRINKSD(%)  4.3048E+01  7.3836E+01  6.9573E+01
 ETASHRINKVR(%)  6.7565E+01  9.3154E+01  9.0742E+01
 EBVSHRINKSD(%)  3.0037E+01  7.0014E+01  6.0296E+01
 EBVSHRINKVR(%)  5.1051E+01  9.1008E+01  8.4236E+01
 RELATIVEINF(%)  1.0000E-10  1.0000E-10  1.0000E-10
 EPSSHRINKSD(%)  4.5571E+00
 EPSSHRINKVR(%)  8.9065E+00

 SUBMODEL    2

 ETABAR:         1.6909E-02  2.1775E-02 -1.5011E-02
 SE:             5.3061E-02  2.3285E-02  1.9534E-02
 N:                      14          14          14

 ETASHRINKSD(%)  1.1212E+01  3.8395E+01  4.8318E+01
 ETASHRINKVR(%)  2.1167E+01  6.2048E+01  7.3290E+01
 EBVSHRINKSD(%)  1.4586E+01  4.0778E+01  4.1036E+01
 EBVSHRINKVR(%)  2.7044E+01  6.4927E+01  6.5233E+01
 RELATIVEINF(%)  1.0000E-10  1.0000E-10  1.0000E-10
 EPSSHRINKSD(%)  1.0925E+01
 EPSSHRINKVR(%)  2.0657E+01


 TOTAL DATA POINTS NORMALLY DISTRIBUTED (N):          240
 N*LOG(2PI) CONSTANT TO OBJECTIVE FUNCTION:    441.09049593824290
 OBJECTIVE FUNCTION VALUE WITHOUT CONSTANT:    470.81427572316585
 OBJECTIVE FUNCTION VALUE WITH CONSTANT:       911.90477166140874
 REPORTED OBJECTIVE FUNCTION DOES NOT CONTAIN CONSTANT

 TOTAL EFFECTIVE ETAS (NIND*NETA):                            90


 #TERE:
 Elapsed estimation  time in seconds:     0.20
 Elapsed postprocess time in seconds:     0.01

 ********************               FIRST ORDER CONDITIONAL ESTIMATION WITH INTERACTION              ********************
 #OBJT:**************                       MINIMUM VALUE OF OBJECTIVE FUNCTION                      ********************
 #OBJV:********************************************      470.814       **************************************************

 ********************               FIRST ORDER CONDITIONAL ESTIMATION WITH INTERACTION              ********************
 ********************                             FINAL PARAMETER ESTIMATE                           ********************

 THETA - VECTOR OF FIXED EFFECTS PARAMETERS   *********
         TH 1      TH 2      TH 3      TH 4
         1.06E+00  3.33E+00  1.03E+01  5.26E-01

 OMEGA - COV MATRIX FOR RANDOM EFFECTS - ETAS  ********
         ETA1      ETA2      ETA3
 ETA1
+        5.00E-02
 ETA2
+        0.00E+00  2.00E-02
 ETA3
+        0.00E+00  0.00E+00  2.00E-02

 SIGMA - COV MATRIX FOR RANDOM EFFECTS - EPSILONS  ****
         EPS1
 EPS1
+        4.00E-02

 OMEGA - CORR MATRIX FOR RANDOM EFFECTS - ETAS  *******
         ETA1      ETA2      ETA3
 ETA1
+        2.24E-01
 ETA2
+        0.00E+00  1.41E-01
 ETA3
+        0.00E+00  0.00E+00  1.41E-01

 SIGMA - CORR MATRIX FOR RANDOM EFFECTS - EPSILONS  ***
         EPS1
 EPS1
+        2.00E-01
 Elapsed finaloutput time in seconds:     0.01
 #CPUT: Total CPU Time in Seconds,        0.288
