Wed Aug 19 04:40:25 AM UTC 2026
$PROBLEM 2-class CL mixture, 1-cpt IV (#985 ferx SAEM anchor)
; Two latent subpopulations differing only in clearance (TVCL1 vs TVCL2),
; constant (covariate-free) mixing fraction P(1). SAEM estimation — the
; NONMEM METHOD=SAEM reference for the ferx mixture SAEM path (#985). Same
; model / data as mixture_iv.ctl (which is FOCE-I); Omega/Sigma FIXed at the
; data-generating values so the estimated quantities are the two class
; clearances, V, and the mixing fraction.
$INPUT ID TIME DV AMT EVID CMT WT
$DATA mixture_iv.csv IGNORE=@
$SUBROUTINES ADVAN1 TRANS2

$PK
  IF (MIXNUM.EQ.1) TVCL = THETA(1)
  IF (MIXNUM.EQ.2) TVCL = THETA(2)
  CL = TVCL * EXP(ETA(1))
  V  = THETA(3)
  S1 = V

$MIX
  NSPOP = 2
  P(1) = THETA(4)
  P(2) = 1.0 - THETA(4)

$ERROR
  MIXE = MIXEST
  IPRED = F
  Y = IPRED * (1.0 + EPS(1))

$THETA
  (0.01, 1.2, 100.0)     ; TVCL1  (class 1, low CL)
  (0.01, 2.5, 100.0)     ; TVCL2  (class 2, high CL)
  (0.1, 10.0, 1000.0)    ; V
  (0.001, 0.5, 0.999)    ; P(1)   mixing fraction of class 1
$OMEGA 0.09 FIX           ; IIV on CL (fixed at data-generating value)
$SIGMA 0.04 FIX           ; proportional RUV (fixed at data-generating value)

; SAEM: stochastic-approximation EM. The class indicator is sampled each
; E-step, exactly the scheme the ferx SAEM mixture path implements (#985).
$ESTIMATION METHOD=SAEM INTERACTION NBURN=1000 NITER=1000 ISAMPLE=2
            SEED=20250818 CTYPE=3 PRINT=100 NOABORT
; Importance-sampling step to report a comparable objective function value.
$ESTIMATION METHOD=IMP INTERACTION EONLY=1 NITER=5 ISAMPLE=1000
            SEED=20250818 PRINT=1 NOABORT
$TABLE ID TIME MIXE NOPRINT ONEHEADER FILE=mixture_iv_saem.sdtab

NM-TRAN MESSAGES
 WARNINGS AND ERRORS (IF ANY) FOR PROBLEM    1
 (WARNING  2) NM-TRAN INFERS THAT THE DATA ARE POPULATION.
Note: Analytical 2nd Derivatives are constructed in FSUBS but are never used.
      You may insert $ABBR DERIV2=NO after the first $PROB to save FSUBS construction and compilation time

1NONLINEAR MIXED EFFECTS MODEL PROGRAM (NONMEM) VERSION 7.5.1
 ORIGINALLY DEVELOPED BY STUART BEAL, LEWIS SHEINER, AND ALISON BOECKMANN
 CURRENT DEVELOPERS ARE ROBERT BAUER, ICON DEVELOPMENT SOLUTIONS,
 AND ALISON BOECKMANN. IMPLEMENTATION, EFFICIENCY, AND STANDARDIZATION
 PERFORMED BY NOUS INFOSYSTEMS.
 PROBLEM NO.:         1
 2-class CL mixture, 1-cpt IV (#985 ferx SAEM anchor)
 TOT. NO. OF OBS RECS:      210
 TOT. NO. OF INDIVIDUALS:       30
 ONE COMPARTMENT MODEL (ADVAN1)
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 #TBLN:      1
 #METH: Stochastic Approximation Expectation-Maximization
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
 #TERM:
 STOCHASTIC PORTION WAS NOT COMPLETED
 REDUCED STOCHASTIC PORTION WAS COMPLETED

 ETABAR IS THE ARITHMETIC MEAN OF THE ETA-ESTIMATES,
 AND SE IS THE ASSOCIATED STANDARD ERROR.

 SUBMODEL    1

 ETABAR:        -1.0097E-01
 SE:             4.7104E-02
 N:                      13

 ETASHRINKSD(%)  4.3388E+01
 ETASHRINKVR(%)  6.7950E+01
 EBVSHRINKSD(%)  1.0091E+01
 EBVSHRINKVR(%)  1.9164E+01
 RELATIVEINF(%)  8.0836E+01
 EPSSHRINKSD(%)  4.3441E+00
 EPSSHRINKVR(%)  8.4994E+00

 SUBMODEL    2

 ETABAR:         2.9146E-03
 SE:             6.9892E-02
 N:                      17

 ETASHRINKSD(%)  3.9428E+00
 ETASHRINKVR(%)  7.7301E+00
 EBVSHRINKSD(%)  1.4599E+00
 EBVSHRINKVR(%)  2.8985E+00
 RELATIVEINF(%)  9.7101E+01
 EPSSHRINKSD(%)  1.0000E-10
 EPSSHRINKVR(%)  1.0000E-10


 TOTAL DATA POINTS NORMALLY DISTRIBUTED (N):          210
 N*LOG(2PI) CONSTANT TO OBJECTIVE FUNCTION:    385.95418394596254
 OBJECTIVE FUNCTION VALUE WITHOUT CONSTANT:    163.69186285630954
 OBJECTIVE FUNCTION VALUE WITH CONSTANT:       549.64604680227205
 REPORTED OBJECTIVE FUNCTION DOES NOT CONTAIN CONSTANT

 TOTAL EFFECTIVE ETAS (NIND*NETA):                            30
 NIND*NETA*LOG(2PI) CONSTANT TO OBJECTIVE FUNCTION:    55.136311992280362
 OBJECTIVE FUNCTION VALUE WITHOUT CONSTANT:    163.69186285630954
 OBJECTIVE FUNCTION VALUE WITH CONSTANT:       218.82817484858990
 REPORTED OBJECTIVE FUNCTION DOES NOT CONTAIN CONSTANT


 #TERE:
 Elapsed estimation  time in seconds:     3.99

 ********************                STOCHASTIC APPROXIMATION EXPECTATION-MAXIMIZATION               ********************
 #OBJT:**************                        FINAL VALUE OF LIKELIHOOD FUNCTION                      ********************
 #OBJV:********************************************      163.692       **************************************************

 ********************                STOCHASTIC APPROXIMATION EXPECTATION-MAXIMIZATION               ********************
 ********************                             FINAL PARAMETER ESTIMATE                           ********************

 THETA - VECTOR OF FIXED EFFECTS PARAMETERS   *********
         TH 1      TH 2      TH 3      TH 4
         1.00E+00  2.74E+00  9.99E+00  4.71E-01

 OMEGA - COV MATRIX FOR RANDOM EFFECTS - ETAS  ********
         ETA1
 ETA1
+        9.00E-02

 SIGMA - COV MATRIX FOR RANDOM EFFECTS - EPSILONS  ****
         EPS1
 EPS1
+        4.00E-02

 OMEGA - CORR MATRIX FOR RANDOM EFFECTS - ETAS  *******
         ETA1
 ETA1
+        3.00E-01

 SIGMA - CORR MATRIX FOR RANDOM EFFECTS - EPSILONS  ***
         EPS1
 EPS1
+        2.00E-01
 #TBLN:      2
 #METH: Objective Function Evaluation by Importance Sampling
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
 #TERM:
 EXPECTATION ONLY PROCESS WAS NOT COMPLETED

 ETABAR IS THE ARITHMETIC MEAN OF THE ETA-ESTIMATES,
 AND SE IS THE ASSOCIATED STANDARD ERROR.

 SUBMODEL    1

 ETABAR:        -5.6920E-02
 SE:             5.7102E-02
 N:                      14

 ETASHRINKSD(%)  2.8781E+01
 ETASHRINKVR(%)  4.9279E+01
 EBVSHRINKSD(%)  1.0160E+01
 EBVSHRINKVR(%)  1.9287E+01
 RELATIVEINF(%)  8.0713E+01
 EPSSHRINKSD(%)  1.6651E+00
 EPSSHRINKVR(%)  3.3025E+00

 SUBMODEL    2

 ETABAR:         3.0286E-02
 SE:             6.7562E-02
 N:                      16

 ETASHRINKSD(%)  9.9170E+00
 ETASHRINKVR(%)  1.8850E+01
 EBVSHRINKSD(%)  1.3220E+00
 EBVSHRINKVR(%)  2.6265E+00
 RELATIVEINF(%)  9.7373E+01
 EPSSHRINKSD(%)  2.2225E+00
 EPSSHRINKVR(%)  4.3957E+00


 TOTAL DATA POINTS NORMALLY DISTRIBUTED (N):          210
 N*LOG(2PI) CONSTANT TO OBJECTIVE FUNCTION:    385.95418394596254
 OBJECTIVE FUNCTION VALUE WITHOUT CONSTANT:    300.87071426104728
 OBJECTIVE FUNCTION VALUE WITH CONSTANT:       686.82489820700982
 REPORTED OBJECTIVE FUNCTION DOES NOT CONTAIN CONSTANT

 TOTAL EFFECTIVE ETAS (NIND*NETA):                            30


 #TERE:
 Elapsed estimation  time in seconds:     0.41

 ********************               OBJECTIVE FUNCTION EVALUATION BY IMPORTANCE SAMPLING             ********************
 #OBJT:**************                        FINAL VALUE OF OBJECTIVE FUNCTION                       ********************
 #OBJV:********************************************      300.871       **************************************************

 ********************               OBJECTIVE FUNCTION EVALUATION BY IMPORTANCE SAMPLING             ********************
 ********************                             FINAL PARAMETER ESTIMATE                           ********************

 THETA - VECTOR OF FIXED EFFECTS PARAMETERS   *********
         TH 1      TH 2      TH 3      TH 4
         1.00E+00  2.74E+00  9.99E+00  4.71E-01

 OMEGA - COV MATRIX FOR RANDOM EFFECTS - ETAS  ********
         ETA1
 ETA1
+        9.00E-02

 SIGMA - COV MATRIX FOR RANDOM EFFECTS - EPSILONS  ****
         EPS1
 EPS1
+        4.00E-02

 OMEGA - CORR MATRIX FOR RANDOM EFFECTS - ETAS  *******
         ETA1
 ETA1
+        3.00E-01

 SIGMA - CORR MATRIX FOR RANDOM EFFECTS - EPSILONS  ***
         EPS1
 EPS1
+        2.00E-01
 Elapsed postprocess time in seconds:     0.01
 Elapsed finaloutput time in seconds:     0.00
 #CPUT: Total CPU Time in Seconds,        4.446
