Wed Jun 17 08:14:08 AM UTC 2026
; NONMEM anchor for modeled infusion DURATION (RATE=-2 -> D1); ferx-core #324.
;
; ADVAN1 TRANS2 one-compartment IV with the infusion duration modeled as the
; $PK parameter D1 (NONMEM reads RATE=-2 from the data and uses D1 as the
; duration; the rate is then AMT/D1). Fixed thetas, eta=0, MAXEVAL=0 -> NONMEM
; PRED is the exact ADVAN1 solution. With CL=5, V=50 (k=0.1), AMT=100, D1=5:
; the infusion rate is 20 over a 5 h window, matching
; `one_cpt_infusion_closed_form` in tests/modeled_duration.rs.
;
; Reproduce: nmfe75 modeled_duration.ctl modeled_duration.lst  (data file is
; ../../data/modeled_duration_ref.csv; copy it next to this .ctl to run).
$PROBLEM    Modeled infusion duration (RATE=-2 -> D1)
$INPUT      ID TIME DV EVID AMT CMT RATE MDV
$DATA      modeled_duration_ref.csv IGNORE=@
$SUBROUTINE ADVAN1 TRANS2
$PK
  CL = THETA(1)
  V  = THETA(2)
  D1 = THETA(3)
  S1 = V
$ERROR
  IPRED = F
  Y = IPRED * (1 + EPS(1))
$THETA  5 FIX
 50 FIX
 5 FIX
$OMEGA  0  FIX
$SIGMA  0.01  FIX
$ESTIMATION MAXEVAL=0 METHOD=0 POSTHOC NOABORT
$TABLE      ID TIME PRED IPRED NOPRINT ONEHEADER FILE=sdtab1

NM-TRAN MESSAGES
 WARNINGS AND ERRORS (IF ANY) FOR PROBLEM    1
 (WARNING  2) NM-TRAN INFERS THAT THE DATA ARE POPULATION.
 (WARNING  46) ETA VARIABLES ARE NOT USED, BUT DATA ARE POPULATION TYPE.
Note: Analytical 2nd Derivatives are constructed in FSUBS but are never used.
      You may insert $ABBR DERIV2=NO after the first $PROB to save FSUBS construction and compilation time

1NONLINEAR MIXED EFFECTS MODEL PROGRAM (NONMEM) VERSION 7.6.0 (nm760)
 ORIGINALLY DEVELOPED BY STUART BEAL, LEWIS SHEINER, AND ALISON BOECKMANN
 CURRENT DEVELOPERS ARE ROBERT BAUER, ICON DEVELOPMENT SOLUTIONS,
 AND ALISON BOECKMANN. IMPLEMENTATION, EFFICIENCY, AND STANDARDIZATION
 PERFORMED BY NOUS INFOSYSTEMS.
 PROBLEM NO.:         1
 Modeled infusion duration (RATE=-2 -> D1)
 TOT. NO. OF OBS RECS:        8
 TOT. NO. OF INDIVIDUALS:        1
 ONE COMPARTMENT MODEL (ADVAN1)
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 #TBLN:      1
 #METH: First Order (Evaluation)
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 Elapsed evaluation time in seconds:     0.00
 Elapsed postprocess time in seconds:     0.01

 ********************                             FIRST ORDER (EVALUATION)                           ********************
 #OBJT:**************                       MINIMUM VALUE OF OBJECTIVE FUNCTION                      ********************
 #OBJV:********************************************           -46.549       *********************************************

 ********************                             FIRST ORDER (EVALUATION)                           ********************
 ********************                             FINAL PARAMETER ESTIMATE                           ********************

 THETA - VECTOR OF FIXED EFFECTS PARAMETERS   *********
         TH 1      TH 2      TH 3
         5.00E+00  5.00E+01  5.00E+00

 OMEGA - COV MATRIX FOR RANDOM EFFECTS - ETAS  ********
         ETA1
 ETA1
+        0.00E+00

 SIGMA - COV MATRIX FOR RANDOM EFFECTS - EPSILONS  ****
         EPS1
 EPS1
+        1.00E-02

 OMEGA - CORR MATRIX FOR RANDOM EFFECTS - ETAS  *******
         ETA1
 ETA1
+        0.00E+00

 SIGMA - CORR MATRIX FOR RANDOM EFFECTS - EPSILONS  ***
         EPS1
 EPS1
+        1.00E-01
 Elapsed finaloutput time in seconds:     0.01
 #CPUT: Total CPU Time in Seconds,        0.021
