Thu Jun 18 11:05:01 AM CEST 2026
$PROBLEM Warfarin M3 BLOQ (proportional error, LLOQ=2.0) - ferx-core cross-check (issue #367)
; Cross-check for ferx's M3 likelihood + analytic M3 inner EBE gradient.
; ferx model: examples/warfarin_bloq.ferx (one_cpt_oral, DV ~ proportional(PROP_ERR),
; bloq_method = m3). On CENS=1 rows the DV cell carries the LLOQ (2.0) and the row
; contributes −logΦ((LLOQ−f)/√V) to the objective.
;
; NONMEM reproduces M3 with the F_FLAG / mixed-likelihood pattern under LAPLACE:
; censored rows return Φ((LLOQ−IPRED)/SD) as a likelihood (F_FLAG=1); quantified
; rows use the ordinary proportional residual. ferx's PROP_ERR is a proportional
; *SD* coefficient, so SD = THETA(4)*IPRED with EPS(1) ~ N(0,1) (SIGMA fixed to 1).
$DATA warfarin_bloq.csv IGNORE=@
$INPUT ID TIME DV EVID AMT CMT=DROP RATE MDV CENS
$SUBROUTINES ADVAN2 TRANS2
$PK
  CL = THETA(1)*EXP(ETA(1))
  V  = THETA(2)*EXP(ETA(2))
  KA = THETA(3)*EXP(ETA(3))
  S2 = V
$ERROR
  LLOQ  = 2.0
  IPRED = F
  SD    = THETA(4)*IPRED          ; proportional SD, matches ferx proportional(PROP_ERR)
  IF (CENS.EQ.1) THEN
    F_FLAG = 1
    Y = PHI((LLOQ - IPRED)/SD)     ; M3: censored row contributes Φ((LLOQ−f)/SD)
  ELSE
    F_FLAG = 0
    Y = IPRED + SD*EPS(1)
  ENDIF
$THETA (0, 0.2)    ; TVCL
$THETA (0, 10.0)   ; TVV
$THETA (0, 1.5)    ; TVKA
$THETA (0, 0.02)   ; PROP_ERR (proportional SD)
$OMEGA 0.09        ; ETA_CL
$OMEGA 0.04        ; ETA_V
$OMEGA 0.30        ; ETA_KA
$SIGMA 1 FIX       ; EPS(1) ~ N(0,1); the proportional SD lives in THETA(4)
$ESTIMATION METHOD=1 LAPLACE INTER MAXEVAL=9999 NSIG=3 SIGL=9 PRINT=5 NOABORT
$COVARIANCE UNCONDITIONAL
$TABLE ID TIME IPRED CENS NOPRINT ONEHEADER FILE=sdtab_bloq

NM-TRAN MESSAGES
 WARNINGS AND ERRORS (IF ANY) FOR PROBLEM    1
 (WARNING  2) NM-TRAN INFERS THAT THE DATA ARE POPULATION.
 (WARNING  87) WITH "LAPLACIAN" AND "INTERACTION", "NUMERICAL" AND "SLOW"
 ARE ALSO REQUIRED ON $ESTIM RECORD, AND "SLOW" IS REQUIRED ON $COV
 RECORD. NM-TRAN HAS SUPPLIED THESE OPTIONS.
Note: Analytical 2nd Derivatives are constructed in FSUBS but are never used.
      You may insert $ABBR DERIV2=NO after the first $PROB to save FSUBS construction and compilation time

1NONLINEAR MIXED EFFECTS MODEL PROGRAM (NONMEM) VERSION 7.5.1
 ORIGINALLY DEVELOPED BY STUART BEAL, LEWIS SHEINER, AND ALISON BOECKMANN
 CURRENT DEVELOPERS ARE ROBERT BAUER, ICON DEVELOPMENT SOLUTIONS,
 AND ALISON BOECKMANN. IMPLEMENTATION, EFFICIENCY, AND STANDARDIZATION
 PERFORMED BY NOUS INFOSYSTEMS.
 PROBLEM NO.:         1
 Warfarin M3 BLOQ (proportional error, LLOQ=2.0) - ferx-core cross-check
 TOT. NO. OF OBS RECS:      110
 TOT. NO. OF INDIVIDUALS:       10
 ONE COMPARTMENT MODEL WITH FIRST-ORDER ABSORPTION (ADVAN2)
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 #TBLN:      1
 #METH: Laplacian Conditional Estimation with Interaction
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
 #TERM:
0MINIMIZATION SUCCESSFUL
 NO. OF FUNCTION EVALUATIONS USED:      152
 NO. OF SIG. DIGITS IN FINAL EST.:  3.3

 ETABAR IS THE ARITHMETIC MEAN OF THE ETA-ESTIMATES,
 AND THE P-VALUE IS GIVEN FOR THE NULL HYPOTHESIS THAT THE TRUE MEAN IS 0.

 ETABAR:         7.8819E-05  1.6977E-05 -2.4051E-04
 SE:             5.3693E-02  3.0832E-02  1.8310E-01
 N:                      10          10          10

 P VAL.:         9.9883E-01  9.9956E-01  9.9895E-01

 ETASHRINKSD(%)  3.4442E-02  1.9905E-01  7.9506E-02
 ETASHRINKVR(%)  6.8872E-02  3.9770E-01  1.5895E-01
 EBVSHRINKSD(%)  4.2579E-02  2.0351E-01  3.4181E-02
 EBVSHRINKVR(%)  8.5140E-02  4.0660E-01  6.8350E-02
 RELATIVEINF(%)  9.9915E+01  9.9593E+01  9.9932E+01
 EPSSHRINKSD(%)  1.6087E+01
 EPSSHRINKVR(%)  2.9586E+01


 TOTAL DATA POINTS NORMALLY DISTRIBUTED (N):          100
 N*LOG(2PI) CONSTANT TO OBJECTIVE FUNCTION:    183.78770664093454
 OBJECTIVE FUNCTION VALUE WITHOUT CONSTANT:   -216.78754391843171
 OBJECTIVE FUNCTION VALUE WITH CONSTANT:      -32.999837277497164
 REPORTED OBJECTIVE FUNCTION DOES NOT CONTAIN CONSTANT

 TOTAL EFFECTIVE ETAS (NIND*NETA):                            30


 #TERE:
 Elapsed estimation  time in seconds:     0.95
 Elapsed covariance  time in seconds:     0.70
 Elapsed postprocess time in seconds:     0.03

 ********************                LAPLACIAN CONDITIONAL ESTIMATION WITH INTERACTION               ********************
 #OBJT:**************                       MINIMUM VALUE OF OBJECTIVE FUNCTION                      ********************
 #OBJV:********************************************     -216.788       **************************************************

 ********************                LAPLACIAN CONDITIONAL ESTIMATION WITH INTERACTION               ********************
 ********************                             FINAL PARAMETER ESTIMATE                           ********************

 THETA - VECTOR OF FIXED EFFECTS PARAMETERS   *********
         TH 1      TH 2      TH 3      TH 4
         1.33E-01  7.73E+00  8.10E-01  1.08E-02

 OMEGA - COV MATRIX FOR RANDOM EFFECTS - ETAS  ********
         ETA1      ETA2      ETA3
 ETA1
+        2.88E-02
 ETA2
+        0.00E+00  9.54E-03
 ETA3
+        0.00E+00  0.00E+00  3.36E-01

 SIGMA - COV MATRIX FOR RANDOM EFFECTS - EPSILONS  ****
         EPS1
 EPS1
+        1.00E+00

 OMEGA - CORR MATRIX FOR RANDOM EFFECTS - ETAS  *******
         ETA1      ETA2      ETA3
 ETA1
+        1.70E-01
 ETA2
+        0.00E+00  9.77E-02
 ETA3
+        0.00E+00  0.00E+00  5.79E-01

 SIGMA - CORR MATRIX FOR RANDOM EFFECTS - EPSILONS  ***
         EPS1
 EPS1
+        1.00E+00

 ********************                LAPLACIAN CONDITIONAL ESTIMATION WITH INTERACTION               ********************
 ********************                            STANDARD ERROR OF ESTIMATE                          ********************

 THETA - VECTOR OF FIXED EFFECTS PARAMETERS   *********
         TH 1      TH 2      TH 3      TH 4
         7.14E-03  2.40E-01  1.49E-01  9.56E-04

 OMEGA - COV MATRIX FOR RANDOM EFFECTS - ETAS  ********
         ETA1      ETA2      ETA3
 ETA1
+        1.11E-02
 ETA2
+       .........  3.99E-03
 ETA3
+       ......... .........  1.39E-01

 SIGMA - COV MATRIX FOR RANDOM EFFECTS - EPSILONS  ****
         EPS1
 EPS1
+       .........

 OMEGA - CORR MATRIX FOR RANDOM EFFECTS - ETAS  *******
         ETA1      ETA2      ETA3
 ETA1
+        3.26E-02
 ETA2
+       .........  2.04E-02
 ETA3
+       ......... .........  1.20E-01

 SIGMA - CORR MATRIX FOR RANDOM EFFECTS - EPSILONS  ***
         EPS1
 EPS1
+       .........

 ********************                LAPLACIAN CONDITIONAL ESTIMATION WITH INTERACTION               ********************
 ********************                          COVARIANCE MATRIX OF ESTIMATE                         ********************

            TH 1      TH 2      TH 3      TH 4      OM11      OM12      OM13      OM22      OM23      OM33      SG11
 TH 1
+        5.09E-05
 TH 2
+        1.83E-04  5.74E-02
 TH 3
+       -3.26E-04  1.25E-02  2.21E-02
 TH 4
+       -5.70E-07  1.17E-04  1.05E-05  9.13E-07
 OM11
+        1.95E-05  2.65E-04 -2.42E-04  2.68E-06  1.22E-04
 OM12
+       ......... ......... ......... ......... ......... .........
 OM13
+       ......... ......... ......... ......... ......... ......... .........
 OM22
+       -8.01E-06 -7.21E-04 -1.70E-04 -1.67E-06 -9.82E-06 ......... .........  1.59E-05
 OM23
+       ......... ......... ......... ......... ......... ......... ......... ......... .........
 OM33
+        5.85E-05  1.47E-04  9.83E-03 -7.36E-05 -4.32E-04 ......... .........  6.48E-05 .........  1.93E-02
 SG11
+       ......... ......... ......... ......... ......... ......... ......... ......... ......... ......... .........

 ********************                LAPLACIAN CONDITIONAL ESTIMATION WITH INTERACTION               ********************
 ********************                          CORRELATION MATRIX OF ESTIMATE                        ********************

            TH 1      TH 2      TH 3      TH 4      OM11      OM12      OM13      OM22      OM23      OM33      SG11
 TH 1
+        7.14E-03
 TH 2
+        1.07E-01  2.40E-01
 TH 3
+       -3.08E-01  3.52E-01  1.49E-01
 TH 4
+       -8.36E-02  5.12E-01  7.38E-02  9.56E-04
 OM11
+        2.47E-01  1.00E-01 -1.47E-01  2.53E-01  1.11E-02
 OM12
+       ......... ......... ......... ......... ......... .........
 OM13
+       ......... ......... ......... ......... ......... ......... .........
 OM22
+       -2.81E-01 -7.54E-01 -2.87E-01 -4.38E-01 -2.22E-01 ......... .........  3.99E-03
 OM23
+       ......... ......... ......... ......... ......... ......... ......... ......... .........
 OM33
+        5.90E-02  4.41E-03  4.76E-01 -5.54E-01 -2.81E-01 ......... .........  1.17E-01 .........  1.39E-01
 SG11
+       ......... ......... ......... ......... ......... ......... ......... ......... ......... ......... .........
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 Elapsed finaloutput time in seconds:     0.02
 #CPUT: Total CPU Time in Seconds,        1.735
