Mon Sep 21 07:12:14 AM UTC 2026
$PROBLEM Warfarin M3 BLOQ, integer columns written float-formatted (ferx-core #1496)
; #1496 anchor: does NONMEM read a float-formatted whole number ("1.0") in an
; integer data column as that integer? Two runs, identical but for how the dataset
; spells EVID, MDV, CENS and ADDL:
;   warfarin_bloq_intcols.csv    1 / 0 / 2
;   warfarin_bloq_floatcols.csv  1.0 / 0.0 / 2.0   (every other cell byte-identical)
; Each column is live: every dose row carries II=24, ADDL=2 (doses at 0, 24, 48 h);
; 10 observation rows carry CENS=1; the observation at ID 1, TIME 0.5 carries MDV=1
; with its real DV, so it is excluded only if MDV is read as 1.
; NONMEM 7.6.0, both runs: 109 observation records, #OBJV 279.35595553971399, and
; final estimates identical to every printed digit. With that one row at MDV=0
; instead: 110 records, #OBJV 281.06112134711015, so the MDV cell is live here.
; Model: tests/nonmem/warfarin_bloq.ctl unchanged but for $INPUT (II ADDL appended),
; $DATA and $TABLE FILE. Its committed warfarin_bloq.lst is NONMEM 7.5.1
; (-216.78754391843171); on 7.6.0 the same integer file gives -216.78754377790631, so
; that 1.4e-7 gap is the version, not the data format.
; Cross-check for ferx's M3 likelihood + analytic M3 inner EBE gradient.
; ferx model: examples/warfarin_bloq.ferx (one_cpt_oral, DV ~ proportional(PROP_ERR),
; bloq_method = m3). On CENS=1 rows the DV cell carries the LLOQ (2.0) and the row
; contributes −logΦ((LLOQ−f)/√V) to the objective.
;
; NONMEM reproduces M3 with the F_FLAG / mixed-likelihood pattern under LAPLACE:
; censored rows return Φ((LLOQ−IPRED)/SD) as a likelihood (F_FLAG=1); quantified
; rows use the ordinary proportional residual. ferx's PROP_ERR is a proportional
; *SD* coefficient, so SD = THETA(4)*IPRED with EPS(1) ~ N(0,1) (SIGMA fixed to 1).
$DATA warfarin_bloq_floatcols.csv IGNORE=@
$INPUT ID TIME DV EVID AMT CMT=DROP RATE MDV CENS II ADDL
$SUBROUTINES ADVAN2 TRANS2
$PK
  CL = THETA(1)*EXP(ETA(1))
  V  = THETA(2)*EXP(ETA(2))
  KA = THETA(3)*EXP(ETA(3))
  S2 = V
$ERROR
  LLOQ  = 2.0
  IPRED = F
  SD    = THETA(4)*IPRED          ; proportional SD, matches ferx proportional(PROP_ERR)
  IF (CENS.EQ.1) THEN
    F_FLAG = 1
    Y = PHI((LLOQ - IPRED)/SD)     ; M3: censored row contributes Φ((LLOQ−f)/SD)
  ELSE
    F_FLAG = 0
    Y = IPRED + SD*EPS(1)
  ENDIF
$THETA (0, 0.2)    ; TVCL
$THETA (0, 10.0)   ; TVV
$THETA (0, 1.5)    ; TVKA
$THETA (0, 0.02)   ; PROP_ERR (proportional SD)
$OMEGA 0.09        ; ETA_CL
$OMEGA 0.04        ; ETA_V
$OMEGA 0.30        ; ETA_KA
$SIGMA 1 FIX       ; EPS(1) ~ N(0,1); the proportional SD lives in THETA(4)
$ESTIMATION METHOD=1 LAPLACE INTER MAXEVAL=9999 NSIG=3 SIGL=9 PRINT=5 NOABORT
$COVARIANCE UNCONDITIONAL
$TABLE ID TIME IPRED CENS NOPRINT ONEHEADER FILE=sdtab_bloq_floatcols

NM-TRAN MESSAGES
 WARNINGS AND ERRORS (IF ANY) FOR PROBLEM    1
 (WARNING  2) NM-TRAN INFERS THAT THE DATA ARE POPULATION.
 (WARNING  87) WITH "LAPLACIAN" AND "INTERACTION", "NUMERICAL" AND "SLOW"
 ARE ALSO REQUIRED ON $ESTIM RECORD, AND "SLOW" IS REQUIRED ON $COV
 RECORD. NM-TRAN HAS SUPPLIED THESE OPTIONS.
 (DATA WARNING   5) RECORD         2, DATA ITEM   3, CONTENTS: 5.3653
 THE DV DATA ITEM IS POSITIVE, BUT THE MDV DATA ITEM IS 1
Note: Analytical 2nd Derivatives are constructed in FSUBS but are never used.
      You may insert $ABBR DERIV2=NO after the first $PROB to save FSUBS construction and compilation time

1NONLINEAR MIXED EFFECTS MODEL PROGRAM (NONMEM) VERSION 7.6.0 (nm760)
 ORIGINALLY DEVELOPED BY STUART BEAL, LEWIS SHEINER, AND ALISON BOECKMANN
 CURRENT DEVELOPERS ARE ROBERT BAUER, ICON DEVELOPMENT SOLUTIONS,
 AND ALISON BOECKMANN. IMPLEMENTATION, EFFICIENCY, AND STANDARDIZATION
 PERFORMED BY NOUS INFOSYSTEMS.
 PROBLEM NO.:         1
 Warfarin M3 BLOQ, integer columns written float-formatted (ferx-core #14
 TOT. NO. OF OBS RECS:      109
 TOT. NO. OF INDIVIDUALS:       10
 ONE COMPARTMENT MODEL WITH FIRST-ORDER ABSORPTION (ADVAN2)
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 #TBLN:      1
 #METH: Laplacian Conditional Estimation with Interaction
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
 #TERM:
0MINIMIZATION SUCCESSFUL
 NO. OF FUNCTION EVALUATIONS USED:      269
 NO. OF SIG. DIGITS IN FINAL EST.:  3.6
0PARAMETER ESTIMATE IS NEAR ITS BOUNDARY

 ETABAR IS THE ARITHMETIC MEAN OF THE ETA-ESTIMATES,
 AND THE P-VALUE IS GIVEN FOR THE NULL HYPOTHESIS THAT THE TRUE MEAN IS 0.

 ETABAR:         1.4843E-02 -3.2957E-06 -4.3003E-02
 SE:             3.4508E-02  7.5754E-06  1.1310E-01
 N:                      10          10          10

 P VAL.:         6.6709E-01  6.6353E-01  7.0379E-01

 ETASHRINKSD(%)  1.4061E+01  9.8791E+01  1.0582E+01
 ETASHRINKVR(%)  2.6144E+01  9.9985E+01  2.0044E+01
 EBVSHRINKSD(%)  1.7567E+01  9.8651E+01  1.1877E+01
 EBVSHRINKVR(%)  3.2047E+01  9.9982E+01  2.2343E+01
 RELATIVEINF(%)  6.1766E+01  1.3195E-02  6.1107E+01
 EPSSHRINKSD(%)  6.3403E+00
 EPSSHRINKVR(%)  1.2279E+01


 TOTAL DATA POINTS NORMALLY DISTRIBUTED (N):           99
 N*LOG(2PI) CONSTANT TO OBJECTIVE FUNCTION:    181.94982957452518
 OBJECTIVE FUNCTION VALUE WITHOUT CONSTANT:    279.35595553971399
 OBJECTIVE FUNCTION VALUE WITH CONSTANT:       461.30578511423914
 REPORTED OBJECTIVE FUNCTION DOES NOT CONTAIN CONSTANT

 TOTAL EFFECTIVE ETAS (NIND*NETA):                            30


 #TERE:
 Elapsed estimation  time in seconds:     1.09
0R MATRIX ALGORITHMICALLY SINGULAR
0COVARIANCE MATRIX UNOBTAINABLE
0R MATRIX IS OUTPUT
0S MATRIX ALGORITHMICALLY SINGULAR
0S MATRIX IS OUTPUT
0T MATRIX - EQUAL TO RS*RMAT, WHERE S* IS A PSEUDO INVERSE OF S - IS OUTPUT
 Elapsed covariance  time in seconds:     0.37
 Elapsed postprocess time in seconds:     0.01

 ********************                LAPLACIAN CONDITIONAL ESTIMATION WITH INTERACTION               ********************
 #OBJT:**************                       MINIMUM VALUE OF OBJECTIVE FUNCTION                      ********************
 #OBJV:********************************************           279.356       *********************************************

 ********************                LAPLACIAN CONDITIONAL ESTIMATION WITH INTERACTION               ********************
 ********************                             FINAL PARAMETER ESTIMATE                           ********************

 THETA - VECTOR OF FIXED EFFECTS PARAMETERS   *********
         TH 1      TH 2      TH 3      TH 4
         2.92E-01  6.54E+00  5.74E-01  3.03E-01

 OMEGA - COV MATRIX FOR RANDOM EFFECTS - ETAS  ********
         ETA1      ETA2      ETA3
 ETA1
+        1.64E-02
 ETA2
+        0.00E+00  4.00E-06
 ETA3
+        0.00E+00  0.00E+00  1.62E-01

 SIGMA - COV MATRIX FOR RANDOM EFFECTS - EPSILONS  ****
         EPS1
 EPS1
+        1.00E+00

 OMEGA - CORR MATRIX FOR RANDOM EFFECTS - ETAS  *******
         ETA1      ETA2      ETA3
 ETA1
+        1.28E-01
 ETA2
+        0.00E+00  2.00E-03
 ETA3
+        0.00E+00  0.00E+00  4.03E-01

 SIGMA - CORR MATRIX FOR RANDOM EFFECTS - EPSILONS  ***
         EPS1
 EPS1
+        1.00E+00
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 Elapsed finaloutput time in seconds:     0.01
 #CPUT: Total CPU Time in Seconds,        1.502
