Thu Jun 18 11:35:42 AM UTC 2026
$PROBLEM Warfarin 1-cpt oral - ferx-core estimating IMP cross-check (issue #402)
$DATA warfarin.csv IGNORE=@
$INPUT ID TIME DV EVID AMT CMT=DROP RATE MDV
$SUBROUTINES ADVAN2 TRANS2
$PK
  CL = THETA(1)*EXP(ETA(1))
  V  = THETA(2)*EXP(ETA(2))
  KA = THETA(3)*EXP(ETA(3))
  S2 = V
$ERROR
  IPRED = F
  Y = IPRED*(1 + EPS(1))
$THETA (0, 0.2)   ; TVCL
$THETA (0, 10.0)  ; TVV
$THETA (0, 1.5)   ; TVKA
$OMEGA 0.09       ; ETA_CL
$OMEGA 0.04       ; ETA_V
$OMEGA 0.30       ; ETA_KA
$SIGMA 0.0004     ; proportional variance (= 0.02 SD, matching the .ferx init)
; Estimating IMP (NONMEM METHOD=IMP, NOT EONLY). Warm-started from FOCEI, the
; same robust configuration ferx recommends on rich data (`methods=[focei,imp]`):
; plain IMP's one-iteration-lagged proposal otherwise stalls on warfarin's sharp
; conditional posteriors.
$ESTIMATION METHOD=COND INTERACTION MAXEVAL=9999 PRINT=5 NOABORT
$ESTIMATION METHOD=IMP INTERACTION NITER=100 ISAMPLE=1000 PRINT=10 SEED=12345 EONLY=0 NOABORT
$COVARIANCE UNCONDITIONAL
$TABLE ID TIME NOPRINT ONEHEADER FILE=sdtab_imp

NM-TRAN MESSAGES
 WARNINGS AND ERRORS (IF ANY) FOR PROBLEM    1
 (WARNING  2) NM-TRAN INFERS THAT THE DATA ARE POPULATION.
Note: Analytical 2nd Derivatives are constructed in FSUBS but are never used.
      You may insert $ABBR DERIV2=NO after the first $PROB to save FSUBS construction and compilation time

1NONLINEAR MIXED EFFECTS MODEL PROGRAM (NONMEM) VERSION 7.5.1
 ORIGINALLY DEVELOPED BY STUART BEAL, LEWIS SHEINER, AND ALISON BOECKMANN
 CURRENT DEVELOPERS ARE ROBERT BAUER, ICON DEVELOPMENT SOLUTIONS,
 AND ALISON BOECKMANN. IMPLEMENTATION, EFFICIENCY, AND STANDARDIZATION
 PERFORMED BY NOUS INFOSYSTEMS.
 PROBLEM NO.:         1
 Warfarin 1-cpt oral - ferx-core estimating IMP cross-check (issue #402)
 TOT. NO. OF OBS RECS:      110
 TOT. NO. OF INDIVIDUALS:       10
 ONE COMPARTMENT MODEL WITH FIRST-ORDER ABSORPTION (ADVAN2)
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 #TBLN:      1
 #METH: First Order Conditional Estimation with Interaction
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
 #TERM:
0MINIMIZATION SUCCESSFUL
 HOWEVER, PROBLEMS OCCURRED WITH THE MINIMIZATION.
 REGARD THE RESULTS OF THE ESTIMATION STEP CAREFULLY, AND ACCEPT THEM ONLY
 AFTER CHECKING THAT THE COVARIANCE STEP PRODUCES REASONABLE OUTPUT.
 NO. OF FUNCTION EVALUATIONS USED:      250
 NO. OF SIG. DIGITS IN FINAL EST.:  4.1

 ETABAR IS THE ARITHMETIC MEAN OF THE ETA-ESTIMATES,
 AND THE P-VALUE IS GIVEN FOR THE NULL HYPOTHESIS THAT THE TRUE MEAN IS 0.

 ETABAR:         4.2221E-06 -4.0727E-05 -1.3719E-04
 SE:             5.3452E-02  3.0916E-02  1.8317E-01
 N:                      10          10          10

 P VAL.:         9.9994E-01  9.9895E-01  9.9940E-01

 ETASHRINKSD(%)  3.0105E-02  1.7475E-01  5.6869E-02
 ETASHRINKVR(%)  6.0201E-02  3.4920E-01  1.1371E-01
 EBVSHRINKSD(%)  2.8019E-02  1.7108E-01  3.1428E-02
 EBVSHRINKVR(%)  5.6030E-02  3.4187E-01  6.2845E-02
 RELATIVEINF(%)  9.9944E+01  9.9658E+01  9.9937E+01
 EPSSHRINKSD(%)  1.4688E+01
 EPSSHRINKVR(%)  2.7219E+01


 TOTAL DATA POINTS NORMALLY DISTRIBUTED (N):          110
 N*LOG(2PI) CONSTANT TO OBJECTIVE FUNCTION:    202.16647730502800
 OBJECTIVE FUNCTION VALUE WITHOUT CONSTANT:   -286.00421948870667
 OBJECTIVE FUNCTION VALUE WITH CONSTANT:      -83.837742183678671
 REPORTED OBJECTIVE FUNCTION DOES NOT CONTAIN CONSTANT

 TOTAL EFFECTIVE ETAS (NIND*NETA):                            30


 #TERE:
 Elapsed estimation  time in seconds:     0.12

 ********************               FIRST ORDER CONDITIONAL ESTIMATION WITH INTERACTION              ********************
 #OBJT:**************                       MINIMUM VALUE OF OBJECTIVE FUNCTION                      ********************
 #OBJV:********************************************     -286.004       **************************************************

 ********************               FIRST ORDER CONDITIONAL ESTIMATION WITH INTERACTION              ********************
 ********************                             FINAL PARAMETER ESTIMATE                           ********************

 THETA - VECTOR OF FIXED EFFECTS PARAMETERS   *********
         TH 1      TH 2      TH 3
         1.33E-01  7.74E+00  8.11E-01

 OMEGA - COV MATRIX FOR RANDOM EFFECTS - ETAS  ********
         ETA1      ETA2      ETA3
 ETA1
+        2.86E-02
 ETA2
+        0.00E+00  9.59E-03
 ETA3
+        0.00E+00  0.00E+00  3.36E-01

 SIGMA - COV MATRIX FOR RANDOM EFFECTS - EPSILONS  ****
         EPS1
 EPS1
+        1.12E-04

 OMEGA - CORR MATRIX FOR RANDOM EFFECTS - ETAS  *******
         ETA1      ETA2      ETA3
 ETA1
+        1.69E-01
 ETA2
+        0.00E+00  9.79E-02
 ETA3
+        0.00E+00  0.00E+00  5.80E-01

 SIGMA - CORR MATRIX FOR RANDOM EFFECTS - EPSILONS  ***
         EPS1
 EPS1
+        1.06E-02
 #TBLN:      2
 #METH: Importance Sampling
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
 #TERM:
 OPTIMIZATION WAS NOT TESTED FOR CONVERGENCE

 ETABAR IS THE ARITHMETIC MEAN OF THE ETA-ESTIMATES,
 AND THE P-VALUE IS GIVEN FOR THE NULL HYPOTHESIS THAT THE TRUE MEAN IS 0.

 ETABAR:         4.8323E-02  1.9988E-03 -8.7741E-02
 SE:             5.3396E-02  3.0755E-02  1.8361E-01
 N:                      10          10          10

 P VAL.:         3.6547E-01  9.4818E-01  6.3275E-01

 ETASHRINKSD(%)  3.2244E+00  6.6654E-01  4.9737E-01
 ETASHRINKVR(%)  6.3449E+00  1.3286E+00  9.9227E-01
 EBVSHRINKSD(%)  2.3185E-02  1.4126E-01  2.8216E-02
 EBVSHRINKVR(%)  4.6364E-02  2.8231E-01  5.6424E-02
 RELATIVEINF(%)  9.9954E+01  9.9718E+01  9.9944E+01
 EPSSHRINKSD(%)  1.3376E+01
 EPSSHRINKVR(%)  2.4962E+01


 TOTAL DATA POINTS NORMALLY DISTRIBUTED (N):          110
 N*LOG(2PI) CONSTANT TO OBJECTIVE FUNCTION:    202.16647730502800
 OBJECTIVE FUNCTION VALUE WITHOUT CONSTANT:   -285.68518343025102
 OBJECTIVE FUNCTION VALUE WITH CONSTANT:      -83.518706125223019
 REPORTED OBJECTIVE FUNCTION DOES NOT CONTAIN CONSTANT

 TOTAL EFFECTIVE ETAS (NIND*NETA):                            30


 #TERE:
 Elapsed estimation  time in seconds:    17.79

 Number of Negative Eigenvalues in Matrix=           1
 Most negative value=  -9957.7273892129815
 Most positive value=   11194070.114085512
 Forcing positive definiteness
 Root mean square deviation of matrix from original=    1.7637906393999413E-003

 Elapsed covariance  time in seconds:     1.62

 ********************                               IMPORTANCE SAMPLING                              ********************
 #OBJT:**************                        FINAL VALUE OF OBJECTIVE FUNCTION                       ********************
 #OBJV:********************************************     -285.685       **************************************************

 ********************                               IMPORTANCE SAMPLING                              ********************
 ********************                             FINAL PARAMETER ESTIMATE                           ********************

 THETA - VECTOR OF FIXED EFFECTS PARAMETERS   *********
         TH 1      TH 2      TH 3
         1.26E-01  7.72E+00  8.86E-01

 OMEGA - COV MATRIX FOR RANDOM EFFECTS - ETAS  ********
         ETA1      ETA2      ETA3
 ETA1
+        3.04E-02
 ETA2
+        0.00E+00  9.59E-03
 ETA3
+        0.00E+00  0.00E+00  3.41E-01

 SIGMA - COV MATRIX FOR RANDOM EFFECTS - EPSILONS  ****
         EPS1
 EPS1
+        1.10E-04

 OMEGA - CORR MATRIX FOR RANDOM EFFECTS - ETAS  *******
         ETA1      ETA2      ETA3
 ETA1
+        1.74E-01
 ETA2
+        0.00E+00  9.79E-02
 ETA3
+        0.00E+00  0.00E+00  5.84E-01

 SIGMA - CORR MATRIX FOR RANDOM EFFECTS - EPSILONS  ***
         EPS1
 EPS1
+        1.05E-02

 ********************                               IMPORTANCE SAMPLING                              ********************
 ********************                         STANDARD ERROR OF ESTIMATE (RSR)                       ********************

 THETA - VECTOR OF FIXED EFFECTS PARAMETERS   *********
         TH 1      TH 2      TH 3
         2.66E-04  2.49E-02  1.22E-02

 OMEGA - COV MATRIX FOR RANDOM EFFECTS - ETAS  ********
         ETA1      ETA2      ETA3
 ETA1
+        1.02E-02
 ETA2
+        0.00E+00  3.83E-03
 ETA3
+        0.00E+00  0.00E+00  1.40E-01

 SIGMA - COV MATRIX FOR RANDOM EFFECTS - EPSILONS  ****
         EPS1
 EPS1
+        2.17E-05

 OMEGA - CORR MATRIX FOR RANDOM EFFECTS - ETAS  *******
         ETA1      ETA2      ETA3
 ETA1
+        2.92E-02
 ETA2
+       .........  1.96E-02
 ETA3
+       ......... .........  1.20E-01

 SIGMA - CORR MATRIX FOR RANDOM EFFECTS - EPSILONS  ***
         EPS1
 EPS1
+        1.04E-03

 ********************                               IMPORTANCE SAMPLING                              ********************
 ********************                       COVARIANCE MATRIX OF ESTIMATE (RSR)                      ********************

            TH 1      TH 2      TH 3      OM11      OM12      OM13      OM22      OM23      OM33      SG11
 TH 1
+        7.07E-08
 TH 2
+       -5.04E-06  6.19E-04
 TH 3
+        3.00E-06 -2.80E-04  1.48E-04
 OM11
+        7.49E-07 -4.53E-05  4.41E-05  1.03E-04
 OM12
+       ......... ......... ......... ......... .........
 OM13
+       ......... ......... ......... ......... ......... .........
 OM22
+        5.23E-07 -7.66E-05  3.12E-05  4.98E-06  0.00E+00  0.00E+00  1.47E-05
 OM23
+       ......... ......... ......... ......... ......... ......... ......... .........
 OM33
+        1.57E-06  6.19E-04 -1.54E-04 -4.97E-04  0.00E+00  0.00E+00 -3.32E-04  0.00E+00  1.96E-02
 SG11
+       -3.70E-09  4.50E-07 -2.05E-07  1.74E-08  0.00E+00  0.00E+00 -4.31E-08  0.00E+00 -4.30E-07  4.73E-10

 ********************                               IMPORTANCE SAMPLING                              ********************
 ********************                       CORRELATION MATRIX OF ESTIMATE (RSR)                     ********************

            TH 1      TH 2      TH 3      OM11      OM12      OM13      OM22      OM23      OM33      SG11
 TH 1
+        2.66E-04
 TH 2
+       -7.61E-01  2.49E-02
 TH 3
+        9.27E-01 -9.24E-01  1.22E-02
 OM11
+        2.77E-01 -1.79E-01  3.56E-01  1.02E-02
 OM12
+       ......... ......... ......... ......... .........
 OM13
+       ......... ......... ......... ......... ......... .........
 OM22
+        5.14E-01 -8.04E-01  6.70E-01  1.28E-01  0.00E+00  0.00E+00  3.83E-03
 OM23
+       ......... ......... ......... ......... ......... ......... ......... .........
 OM33
+        4.23E-02  1.78E-01 -9.04E-02 -3.49E-01  0.00E+00  0.00E+00 -6.19E-01  0.00E+00  1.40E-01
 SG11
+       -6.40E-01  8.32E-01 -7.77E-01  7.86E-02  0.00E+00  0.00E+00 -5.18E-01  0.00E+00 -1.41E-01  2.17E-05
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 Elapsed postprocess time in seconds:     0.02
 Elapsed finaloutput time in seconds:     0.00
 #CPUT: Total CPU Time in Seconds,       19.570
