Sun Sep  6 06:00:27 PM UTC 2026
$PROBLEM Warfarin 1-cpt oral - power residual error (ferx-core #1182 anchor)
$DATA warfarin.csv IGNORE=@
$INPUT ID TIME DV EVID AMT CMT=DROP RATE MDV
$SUBROUTINES ADVAN2 TRANS2
$PK
  CL = THETA(1)*EXP(ETA(1))
  V  = THETA(2)*EXP(ETA(2))
  KA = THETA(3)*EXP(ETA(3))
  S2 = V
$ERROR
  IPRED = F
  Y = IPRED + IPRED**THETA(4)*EPS(1)
$THETA (0, 0.13)   ; TVCL
$THETA (0, 8.0)    ; TVV
$THETA (0, 1.0)    ; TVKA
$THETA (0.01, 1.3, 10) ; RUV_POW
$OMEGA 0.09        ; ETA_CL
$OMEGA 0.04        ; ETA_V
$OMEGA 0.30        ; ETA_KA
$SIGMA 0.01        ; sigma^2 (SD 0.1, matching the .ferx init)
$ESTIMATION METHOD=COND INTERACTION MAXEVAL=9999 PRINT=5 NOABORT SIGDIGITS=4
$COVARIANCE MATRIX=R UNCONDITIONAL
$TABLE ID TIME IPRED CWRES NOPRINT ONEHEADER FILE=sdtab_power

NM-TRAN MESSAGES
 WARNINGS AND ERRORS (IF ANY) FOR PROBLEM    1
 (WARNING  2) NM-TRAN INFERS THAT THE DATA ARE POPULATION.
 (WARNING  97) A RANDOM QUANTITY IS RAISED TO A POWER. IF THE RESULT AFFECTS
 THE VALUE OF THE OBJECTIVE FUNCTION, THE USER SHOULD ENSURE THAT THE
 RANDOM QUANTITY IS NEVER 0 WHEN THE POWER IS < 1.
Note: Analytical 2nd Derivatives are constructed in FSUBS but are never used.
      You may insert $ABBR DERIV2=NO after the first $PROB to save FSUBS construction and compilation time

1NONLINEAR MIXED EFFECTS MODEL PROGRAM (NONMEM) VERSION 7.5.1
 ORIGINALLY DEVELOPED BY STUART BEAL, LEWIS SHEINER, AND ALISON BOECKMANN
 CURRENT DEVELOPERS ARE ROBERT BAUER, ICON DEVELOPMENT SOLUTIONS,
 AND ALISON BOECKMANN. IMPLEMENTATION, EFFICIENCY, AND STANDARDIZATION
 PERFORMED BY NOUS INFOSYSTEMS.
 PROBLEM NO.:         1
 Warfarin 1-cpt oral - power residual error (ferx-core #1182 anchor)
 TOT. NO. OF OBS RECS:      110
 TOT. NO. OF INDIVIDUALS:       10
 ONE COMPARTMENT MODEL WITH FIRST-ORDER ABSORPTION (ADVAN2)
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 #TBLN:      1
 #METH: First Order Conditional Estimation with Interaction
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
 #TERM:
0MINIMIZATION TERMINATED
 DUE TO ROUNDING ERRORS (ERROR=134)
 NO. OF FUNCTION EVALUATIONS USED:     3397
 NO. OF SIG. DIGITS IN FINAL EST.:  1.1

 ETABAR IS THE ARITHMETIC MEAN OF THE ETA-ESTIMATES,
 AND THE P-VALUE IS GIVEN FOR THE NULL HYPOTHESIS THAT THE TRUE MEAN IS 0.

 ETABAR:        -5.2541E-08 -3.5885E-05 -1.4384E-04
 SE:             5.3456E-02  3.0939E-02  1.8316E-01
 N:                      10          10          10

 P VAL.:         1.0000E+00  9.9907E-01  9.9937E-01

 ETASHRINKSD(%)  2.8875E-02  1.8683E-01  5.8623E-02
 ETASHRINKVR(%)  5.7742E-02  3.7332E-01  1.1721E-01
 EBVSHRINKSD(%)  2.5182E-02  1.8190E-01  3.1999E-02
 EBVSHRINKVR(%)  5.0358E-02  3.6348E-01  6.3988E-02
 RELATIVEINF(%)  9.9950E+01  9.9636E+01  9.9936E+01
 EPSSHRINKSD(%)  1.4685E+01
 EPSSHRINKVR(%)  2.7214E+01


 TOTAL DATA POINTS NORMALLY DISTRIBUTED (N):          110
 N*LOG(2PI) CONSTANT TO OBJECTIVE FUNCTION:    202.16647730502800
 OBJECTIVE FUNCTION VALUE WITHOUT CONSTANT:   -286.75882280193639
 OBJECTIVE FUNCTION VALUE WITH CONSTANT:      -84.592345496908393
 REPORTED OBJECTIVE FUNCTION DOES NOT CONTAIN CONSTANT

 TOTAL EFFECTIVE ETAS (NIND*NETA):                            30


 #TERE:
 Elapsed estimation  time in seconds:     0.83
 Elapsed covariance  time in seconds:     0.03
 Elapsed postprocess time in seconds:     0.01

 ********************               FIRST ORDER CONDITIONAL ESTIMATION WITH INTERACTION              ********************
 #OBJT:**************                       MINIMUM VALUE OF OBJECTIVE FUNCTION                      ********************
 #OBJV:********************************************     -286.759       **************************************************

 ********************               FIRST ORDER CONDITIONAL ESTIMATION WITH INTERACTION              ********************
 ********************                             FINAL PARAMETER ESTIMATE                           ********************

 THETA - VECTOR OF FIXED EFFECTS PARAMETERS   *********
         TH 1      TH 2      TH 3      TH 4
         1.33E-01  7.74E+00  8.11E-01  1.11E+00

 OMEGA - COV MATRIX FOR RANDOM EFFECTS - ETAS  ********
         ETA1      ETA2      ETA3
 ETA1
+        2.86E-02
 ETA2
+        0.00E+00  9.61E-03
 ETA3
+        0.00E+00  0.00E+00  3.36E-01

 SIGMA - COV MATRIX FOR RANDOM EFFECTS - EPSILONS  ****
         EPS1
 EPS1
+        7.31E-05

 OMEGA - CORR MATRIX FOR RANDOM EFFECTS - ETAS  *******
         ETA1      ETA2      ETA3
 ETA1
+        1.69E-01
 ETA2
+        0.00E+00  9.80E-02
 ETA3
+        0.00E+00  0.00E+00  5.80E-01

 SIGMA - CORR MATRIX FOR RANDOM EFFECTS - EPSILONS  ***
         EPS1
 EPS1
+        8.55E-03

 ********************               FIRST ORDER CONDITIONAL ESTIMATION WITH INTERACTION              ********************
 ********************                            STANDARD ERROR OF ESTIMATE                          ********************

 THETA - VECTOR OF FIXED EFFECTS PARAMETERS   *********
         TH 1      TH 2      TH 3      TH 4
         7.07E-03  2.40E-01  1.48E-01  1.22E-01

 OMEGA - COV MATRIX FOR RANDOM EFFECTS - ETAS  ********
         ETA1      ETA2      ETA3
 ETA1
+        1.28E-02
 ETA2
+       .........  4.31E-03
 ETA3
+       ......... .........  1.50E-01

 SIGMA - COV MATRIX FOR RANDOM EFFECTS - EPSILONS  ****
         EPS1
 EPS1
+        3.49E-05

 OMEGA - CORR MATRIX FOR RANDOM EFFECTS - ETAS  *******
         ETA1      ETA2      ETA3
 ETA1
+        3.78E-02
 ETA2
+       .........  2.20E-02
 ETA3
+       ......... .........  1.30E-01

 SIGMA - CORR MATRIX FOR RANDOM EFFECTS - EPSILONS  ***
         EPS1
 EPS1
+        2.04E-03

 ********************               FIRST ORDER CONDITIONAL ESTIMATION WITH INTERACTION              ********************
 ********************                          COVARIANCE MATRIX OF ESTIMATE                         ********************

            TH 1      TH 2      TH 3      TH 4      OM11      OM12      OM13      OM22      OM23      OM33      SG11
 TH 1
+        4.99E-05
 TH 2
+        1.79E-05  5.75E-02
 TH 3
+        9.71E-07 -7.74E-07  2.19E-02
 TH 4
+       -2.30E-05  1.09E-04  3.00E-04  1.50E-02
 OM11
+        2.00E-09  1.28E-06  2.09E-06 -4.94E-06  1.64E-04
 OM12
+       ......... ......... ......... ......... ......... .........
 OM13
+       ......... ......... ......... ......... ......... ......... .........
 OM22
+       -1.15E-09 -4.61E-07  7.37E-07  2.58E-06  1.36E-08 ......... .........  1.86E-05
 OM23
+       ......... ......... ......... ......... ......... ......... ......... ......... .........
 OM33
+        5.47E-08  5.53E-06  2.24E-05  1.44E-04  5.26E-09 ......... .........  5.99E-07 .........  2.26E-02
 SG11
+        6.17E-09 -2.55E-08 -8.27E-08 -4.03E-06  1.50E-09 ......... ......... -7.90E-10 ......... -4.44E-08  1.22E-09

 ********************               FIRST ORDER CONDITIONAL ESTIMATION WITH INTERACTION              ********************
 ********************                          CORRELATION MATRIX OF ESTIMATE                        ********************

            TH 1      TH 2      TH 3      TH 4      OM11      OM12      OM13      OM22      OM23      OM33      SG11
 TH 1
+        7.07E-03
 TH 2
+        1.06E-02  2.40E-01
 TH 3
+        9.29E-04 -2.18E-05  1.48E-01
 TH 4
+       -2.67E-02  3.72E-03  1.66E-02  1.22E-01
 OM11
+        2.22E-05  4.17E-04  1.10E-03 -3.16E-03  1.28E-02
 OM12
+       ......... ......... ......... ......... ......... .........
 OM13
+       ......... ......... ......... ......... ......... ......... .........
 OM22
+       -3.79E-05 -4.46E-04  1.15E-03  4.89E-03  2.47E-04 ......... .........  4.31E-03
 OM23
+       ......... ......... ......... ......... ......... ......... ......... ......... .........
 OM33
+        5.15E-05  1.53E-04  1.00E-03  7.84E-03  2.73E-06 ......... .........  9.22E-04 .........  1.50E-01
 SG11
+        2.50E-02 -3.05E-03 -1.60E-02 -9.44E-01  3.37E-03 ......... ......... -5.24E-03 ......... -8.45E-03  3.49E-05
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 Elapsed finaloutput time in seconds:     0.00
 #CPUT: Total CPU Time in Seconds,        0.881
