Thu Jun 18 11:04:59 AM CEST 2026
$PROBLEM Warfarin constant output scaling (S2 = V*10) - ferx-core obs_scale cross-check (issue #367)
; ferx `[scaling] obs_scale = 10` divides the concentration prediction by 10.
; NONMEM reproduces that with S2 = V*10 (TRANS2 gives F = A2/S2 = (A2/V)/10).
; Additive error is used on purpose: a proportional error model is invariant to a
; constant output scale, so it could not detect a scaling bug. The DV column in
; warfarin_scaled.csv is the warfarin DV divided by 10 so the scaled prediction
; and the data live on the same scale.
$DATA warfarin_scaled.csv IGNORE=@
$INPUT ID TIME DV EVID AMT CMT=DROP RATE MDV
$SUBROUTINES ADVAN2 TRANS2
$PK
  CL = THETA(1)*EXP(ETA(1))
  V  = THETA(2)*EXP(ETA(2))
  KA = THETA(3)*EXP(ETA(3))
  S2 = V*10
$ERROR
  IPRED = F
  Y = IPRED + EPS(1)
$THETA (0, 0.13)  ; TVCL
$THETA (0, 7.7)   ; TVV
$THETA (0, 0.8)   ; TVKA
$OMEGA 0.09       ; ETA_CL
$OMEGA 0.04       ; ETA_V
$OMEGA 0.30       ; ETA_KA
$SIGMA 0.01       ; additive variance on the /10 scale
$ESTIMATION METHOD=1 INTER MAXEVAL=9999 NSIG=3 SIGL=9 PRINT=5 NOABORT
$COVARIANCE UNCONDITIONAL
$TABLE ID TIME IPRED NOPRINT ONEHEADER FILE=sdtab_scaled

NM-TRAN MESSAGES
 WARNINGS AND ERRORS (IF ANY) FOR PROBLEM    1
 (WARNING  2) NM-TRAN INFERS THAT THE DATA ARE POPULATION.
Note: Analytical 2nd Derivatives are constructed in FSUBS but are never used.
      You may insert $ABBR DERIV2=NO after the first $PROB to save FSUBS construction and compilation time

1NONLINEAR MIXED EFFECTS MODEL PROGRAM (NONMEM) VERSION 7.5.1
 ORIGINALLY DEVELOPED BY STUART BEAL, LEWIS SHEINER, AND ALISON BOECKMANN
 CURRENT DEVELOPERS ARE ROBERT BAUER, ICON DEVELOPMENT SOLUTIONS,
 AND ALISON BOECKMANN. IMPLEMENTATION, EFFICIENCY, AND STANDARDIZATION
 PERFORMED BY NOUS INFOSYSTEMS.
 PROBLEM NO.:         1
 Warfarin constant output scaling (S2 = V*10) - ferx-core obs_scale cross
 TOT. NO. OF OBS RECS:      110
 TOT. NO. OF INDIVIDUALS:       10
 ONE COMPARTMENT MODEL WITH FIRST-ORDER ABSORPTION (ADVAN2)
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 #TBLN:      1
 #METH: First Order Conditional Estimation with Interaction
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
 #TERM:
0MINIMIZATION SUCCESSFUL
 NO. OF FUNCTION EVALUATIONS USED:      161
 NO. OF SIG. DIGITS IN FINAL EST.:  4.4

 ETABAR IS THE ARITHMETIC MEAN OF THE ETA-ESTIMATES,
 AND THE P-VALUE IS GIVEN FOR THE NULL HYPOTHESIS THAT THE TRUE MEAN IS 0.

 ETABAR:        -8.9882E-06 -5.7687E-05 -1.0488E-04
 SE:             5.3531E-02  3.0727E-02  1.8306E-01
 N:                      10          10          10

 P VAL.:         9.9987E-01  9.9850E-01  9.9954E-01

 ETASHRINKSD(%)  1.7571E-01  1.5969E-01  5.7046E-02
 ETASHRINKVR(%)  3.5111E-01  3.1913E-01  1.1406E-01
 EBVSHRINKSD(%)  1.6503E-01  1.5187E-01  4.1690E-02
 EBVSHRINKVR(%)  3.2979E-01  3.0350E-01  8.3363E-02
 RELATIVEINF(%)  9.9670E+01  9.9696E+01  9.9917E+01
 EPSSHRINKSD(%)  1.4678E+01
 EPSSHRINKVR(%)  2.7202E+01


 TOTAL DATA POINTS NORMALLY DISTRIBUTED (N):          110
 N*LOG(2PI) CONSTANT TO OBJECTIVE FUNCTION:    202.16647730502800
 OBJECTIVE FUNCTION VALUE WITHOUT CONSTANT:   -740.83760798429455
 OBJECTIVE FUNCTION VALUE WITH CONSTANT:      -538.67113067926653
 REPORTED OBJECTIVE FUNCTION DOES NOT CONTAIN CONSTANT

 TOTAL EFFECTIVE ETAS (NIND*NETA):                            30


 #TERE:
 Elapsed estimation  time in seconds:     0.26
 Elapsed covariance  time in seconds:     0.18
 Elapsed postprocess time in seconds:     0.02

 ********************               FIRST ORDER CONDITIONAL ESTIMATION WITH INTERACTION              ********************
 #OBJT:**************                       MINIMUM VALUE OF OBJECTIVE FUNCTION                      ********************
 #OBJV:********************************************     -740.838       **************************************************

 ********************               FIRST ORDER CONDITIONAL ESTIMATION WITH INTERACTION              ********************
 ********************                             FINAL PARAMETER ESTIMATE                           ********************

 THETA - VECTOR OF FIXED EFFECTS PARAMETERS   *********
         TH 1      TH 2      TH 3
         1.33E-01  7.73E+00  8.11E-01

 OMEGA - COV MATRIX FOR RANDOM EFFECTS - ETAS  ********
         ETA1      ETA2      ETA3
 ETA1
+        2.88E-02
 ETA2
+        0.00E+00  9.47E-03
 ETA3
+        0.00E+00  0.00E+00  3.36E-01

 SIGMA - COV MATRIX FOR RANDOM EFFECTS - EPSILONS  ****
         EPS1
 EPS1
+        7.55E-05

 OMEGA - CORR MATRIX FOR RANDOM EFFECTS - ETAS  *******
         ETA1      ETA2      ETA3
 ETA1
+        1.70E-01
 ETA2
+        0.00E+00  9.73E-02
 ETA3
+        0.00E+00  0.00E+00  5.79E-01

 SIGMA - CORR MATRIX FOR RANDOM EFFECTS - EPSILONS  ***
         EPS1
 EPS1
+        8.69E-03

 ********************               FIRST ORDER CONDITIONAL ESTIMATION WITH INTERACTION              ********************
 ********************                            STANDARD ERROR OF ESTIMATE                          ********************

 THETA - VECTOR OF FIXED EFFECTS PARAMETERS   *********
         TH 1      TH 2      TH 3
         7.14E-03  2.38E-01  1.49E-01

 OMEGA - COV MATRIX FOR RANDOM EFFECTS - ETAS  ********
         ETA1      ETA2      ETA3
 ETA1
+        1.10E-02
 ETA2
+       .........  3.89E-03
 ETA3
+       ......... .........  1.38E-01

 SIGMA - COV MATRIX FOR RANDOM EFFECTS - EPSILONS  ****
         EPS1
 EPS1
+        1.37E-05

 OMEGA - CORR MATRIX FOR RANDOM EFFECTS - ETAS  *******
         ETA1      ETA2      ETA3
 ETA1
+        3.25E-02
 ETA2
+       .........  2.00E-02
 ETA3
+       ......... .........  1.20E-01

 SIGMA - CORR MATRIX FOR RANDOM EFFECTS - EPSILONS  ***
         EPS1
 EPS1
+        7.89E-04

 ********************               FIRST ORDER CONDITIONAL ESTIMATION WITH INTERACTION              ********************
 ********************                          COVARIANCE MATRIX OF ESTIMATE                         ********************

            TH 1      TH 2      TH 3      OM11      OM12      OM13      OM22      OM23      OM33      SG11
 TH 1
+        5.10E-05
 TH 2
+        1.87E-04  5.68E-02
 TH 3
+       -3.27E-04  1.24E-02  2.21E-02
 OM11
+        1.74E-05  2.96E-04 -2.31E-04  1.21E-04
 OM12
+       ......... ......... ......... ......... .........
 OM13
+       ......... ......... ......... ......... ......... .........
 OM22
+       -8.07E-06 -6.93E-04 -1.61E-04 -9.19E-06 ......... .........  1.51E-05
 OM23
+       ......... ......... ......... ......... ......... ......... ......... .........
 OM33
+        5.28E-05  5.62E-04  9.77E-03 -4.33E-04 ......... .........  5.73E-05 .........  1.92E-02
 SG11
+       -2.48E-08  1.41E-06  5.22E-07  5.21E-08 ......... ......... -1.93E-08 ......... -7.87E-07  1.88E-10

 ********************               FIRST ORDER CONDITIONAL ESTIMATION WITH INTERACTION              ********************
 ********************                          CORRELATION MATRIX OF ESTIMATE                        ********************

            TH 1      TH 2      TH 3      OM11      OM12      OM13      OM22      OM23      OM33      SG11
 TH 1
+        7.14E-03
 TH 2
+        1.10E-01  2.38E-01
 TH 3
+       -3.08E-01  3.51E-01  1.49E-01
 OM11
+        2.21E-01  1.13E-01 -1.41E-01  1.10E-02
 OM12
+       ......... ......... ......... ......... .........
 OM13
+       ......... ......... ......... ......... ......... .........
 OM22
+       -2.91E-01 -7.48E-01 -2.78E-01 -2.15E-01 ......... .........  3.89E-03
 OM23
+       ......... ......... ......... ......... ......... ......... ......... .........
 OM33
+        5.34E-02  1.70E-02  4.75E-01 -2.84E-01 ......... .........  1.07E-01 .........  1.38E-01
 SG11
+       -2.53E-01  4.30E-01  2.56E-01  3.45E-01 ......... ......... -3.63E-01 ......... -4.15E-01  1.37E-05
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 Elapsed finaloutput time in seconds:     0.02
 #CPUT: Total CPU Time in Seconds,        0.513
