Tue Jul  7 07:45:36 AM UTC 2026
$PROBLEM RTTE constant-hazard with shared frailty (Phase 3 Slice 3.1 anchor)
; Clock-forward (Andersen-Gill) repeated time-to-event, constant hazard.
; No ODE is needed for a constant hazard: track the previous event time TLAST and
; contribute the survival over each inter-event gap times the hazard at an event,
; which telescopes to the AG likelihood  L = prod_k h * exp(-H(T)).
;
; Data: rtte_exp.csv (ID,TIME,DV,EVID,CMT,MDV). DV=1 event, DV=0 admin censor at t=20.
; A pure-TTE model: every row is a likelihood contribution, so Y is the likelihood and
; $EST carries LIKELIHOOD (no F_FLAG, which is only for mixed continuous+likelihood data).
$INPUT ID TIME DV EVID CMT MDV
$DATA rtte_exp.csv IGNORE=@

$PRED
  IF (NEWIND.NE.2) TLAST = 0        ; reset the gap clock at each new subject
  LAMBDA = THETA(1)*EXP(ETA(1))     ; individual constant hazard (frailty on log rate)
  CUMHAZ = LAMBDA*(TIME - TLAST)    ; H over the gap since the previous event
  SURV   = EXP(-CUMHAZ)
  Y = SURV                          ; default (DV=0 censor): survival over the final gap
  IF (DV.EQ.1) Y = SURV*LAMBDA      ; event: density over the gap
  IF (DV.EQ.1) TLAST = TIME         ; advance the clock AFTER using the old TLAST

$THETA (0, 0.15)                    ; TVLAMBDA (population rate)
$OMEGA 0.09                         ; frailty variance (var of log rate)

; LAPLACE likelihood (exact 2nd-order η-Hessian) — the NONMEM analogue of ferx FOCEI.
; The LIKELIHOOD option marks Y as an individual likelihood (F_FLAG=1), so no $SIGMA
; is present or needed.
$ESTIMATION METHOD=COND LAPLACE LIKELIHOOD NUMERICAL SLOW NOABORT PRINT=5 MAXEVAL=9999
$COVARIANCE UNCONDITIONAL SLOW
$TABLE ID TIME DV LAMBDA NOPRINT ONEHEADER FILE=rtte_sdtab

NM-TRAN MESSAGES
 WARNINGS AND ERRORS (IF ANY) FOR PROBLEM    1
 (WARNING  2) NM-TRAN INFERS THAT THE DATA ARE POPULATION.
Note: Analytical 2nd Derivatives are constructed in FSUBS but are never used.
      You may insert $ABBR DERIV2=NO after the first $PROB to save FSUBS construction and compilation time

1NONLINEAR MIXED EFFECTS MODEL PROGRAM (NONMEM) VERSION 7.6.0 (nm760)
 ORIGINALLY DEVELOPED BY STUART BEAL, LEWIS SHEINER, AND ALISON BOECKMANN
 CURRENT DEVELOPERS ARE ROBERT BAUER, ICON DEVELOPMENT SOLUTIONS,
 AND ALISON BOECKMANN. IMPLEMENTATION, EFFICIENCY, AND STANDARDIZATION
 PERFORMED BY NOUS INFOSYSTEMS.
 PROBLEM NO.:         1
 RTTE constant-hazard with shared frailty (Phase 3 Slice 3.1 anchor)
 TOT. NO. OF OBS RECS:      405
 TOT. NO. OF INDIVIDUALS:      100
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 #TBLN:      1
 #METH: Laplacian Conditional Estimation
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
 #TERM:
0MINIMIZATION SUCCESSFUL
 NO. OF FUNCTION EVALUATIONS USED:       33
 NO. OF SIG. DIGITS IN FINAL EST.:  3.3

 ETABAR IS THE ARITHMETIC MEAN OF THE ETA-ESTIMATES,
 AND THE P-VALUE IS GIVEN FOR THE NULL HYPOTHESIS THAT THE TRUE MEAN IS 0.

 ETABAR:         1.7764E-02
 SE:             2.3234E-02
 N:                     100

 P VAL.:         4.4454E-01

 ETASHRINKSD(%)  4.2547E+01
 ETASHRINKVR(%)  6.6991E+01
 EBVSHRINKSD(%)  4.3237E+01
 EBVSHRINKVR(%)  6.7780E+01
 RELATIVEINF(%)  3.2220E+01
 EPSSHRINKSD(%)  1.0000E+02
 EPSSHRINKVR(%)  1.0000E+02


 TOTAL DATA POINTS NORMALLY DISTRIBUTED (N):            0
 N*LOG(2PI) CONSTANT TO OBJECTIVE FUNCTION:    0.0000000000000000
 OBJECTIVE FUNCTION VALUE WITHOUT CONSTANT:    1748.4926750651050
 OBJECTIVE FUNCTION VALUE WITH CONSTANT:       1748.4926750651050
 REPORTED OBJECTIVE FUNCTION DOES NOT CONTAIN CONSTANT

 TOTAL EFFECTIVE ETAS (NIND*NETA):                           100


 #TERE:
 Elapsed estimation  time in seconds:     0.09
 Elapsed covariance  time in seconds:     0.03
 Elapsed postprocess time in seconds:     0.02

 ********************                         LAPLACIAN CONDITIONAL ESTIMATION                       ********************
 #OBJT:**************                       MINIMUM VALUE OF OBJECTIVE FUNCTION                      ********************
 #OBJV:********************************************          1748.493       *********************************************

 ********************                         LAPLACIAN CONDITIONAL ESTIMATION                       ********************
 ********************                             FINAL PARAMETER ESTIMATE                           ********************

 THETA - VECTOR OF FIXED EFFECTS PARAMETERS   *********
         TH 1
         1.41E-01

 OMEGA - COV MATRIX FOR RANDOM EFFECTS - ETAS  ********
         ETA1
 ETA1
+        1.64E-01

 OMEGA - CORR MATRIX FOR RANDOM EFFECTS - ETAS  *******
         ETA1
 ETA1
+        4.06E-01

 ********************                         LAPLACIAN CONDITIONAL ESTIMATION                       ********************
 ********************                            STANDARD ERROR OF ESTIMATE                          ********************

 THETA - VECTOR OF FIXED EFFECTS PARAMETERS   *********
         TH 1
         1.27E-02

 OMEGA - COV MATRIX FOR RANDOM EFFECTS - ETAS  ********
         ETA1
 ETA1
+        7.28E-02

 OMEGA - CORR MATRIX FOR RANDOM EFFECTS - ETAS  *******
         ETA1
 ETA1
+        8.98E-02

 ********************                         LAPLACIAN CONDITIONAL ESTIMATION                       ********************
 ********************                          COVARIANCE MATRIX OF ESTIMATE                         ********************

            TH 1      OM11
 TH 1
+        1.62E-04
 OM11
+       -6.80E-04  5.30E-03

 ********************                         LAPLACIAN CONDITIONAL ESTIMATION                       ********************
 ********************                          CORRELATION MATRIX OF ESTIMATE                        ********************

            TH 1      OM11
 TH 1
+        1.27E-02
 OM11
+       -7.34E-01  7.28E-02
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 Elapsed finaloutput time in seconds:     0.02
 #CPUT: Total CPU Time in Seconds,        0.172
