Thu Jul  9 08:29:40 AM UTC 2026
$PROBLEM RTTE simulate cross-tool anchor (Phase 3 Slice 3.3) — NONMEM fits ferx-simulated data
; Clock-forward (Andersen-Gill) constant-hazard RTTE with a shared log-rate frailty.
; The dataset rtte_sim.csv was produced by ferx's OWN simulator
; (`cargo run --bin rtte_sim_anchor --features survival`), from the truth
; TVLAMBDA = 0.15, omega^2(log rate) = 0.09, horizon = 20. Fitting it with an
; INDEPENDENT engine (NONMEM) must recover that truth — the external corroboration
; that the ferx RTTE *simulator* is correct (a biased sampler would shift the
; recovered parameters away from the truth here).
;
; Same telescoping-AG $PRED as tests/reference/rtte_exponential/nonmem.ctl: track the
; previous event time TLAST and contribute the survival over each inter-event gap
; times the hazard at an event, which telescopes to L = prod_k h * exp(-H(T)).
;
; Data: rtte_sim.csv (ID,TIME,DV,EVID,CMT,MDV). DV=1 event, DV=0 admin censor at t=20.
$INPUT ID TIME DV EVID CMT MDV
$DATA rtte_sim.csv IGNORE=@

$PRED
  IF (NEWIND.NE.2) TLAST = 0        ; reset the gap clock at each new subject
  LAMBDA = THETA(1)*EXP(ETA(1))     ; individual constant hazard (frailty on log rate)
  CUMHAZ = LAMBDA*(TIME - TLAST)    ; H over the gap since the previous event
  SURV   = EXP(-CUMHAZ)
  Y = SURV                          ; default (DV=0 censor): survival over the final gap
  IF (DV.EQ.1) Y = SURV*LAMBDA      ; event: density over the gap
  IF (DV.EQ.1) TLAST = TIME         ; advance the clock AFTER using the old TLAST

$THETA (0, 0.15)                    ; TVLAMBDA (population rate)
$OMEGA 0.09                         ; frailty variance (var of log rate)

; LAPLACE likelihood (exact 2nd-order eta-Hessian) — the NONMEM analogue of ferx FOCEI.
$ESTIMATION METHOD=COND LAPLACE LIKELIHOOD NUMERICAL SLOW NOABORT PRINT=5 MAXEVAL=9999
$COVARIANCE UNCONDITIONAL SLOW
$TABLE ID TIME DV LAMBDA NOPRINT ONEHEADER FILE=rtte_sim_sdtab

NM-TRAN MESSAGES
 WARNINGS AND ERRORS (IF ANY) FOR PROBLEM    1
 (WARNING  2) NM-TRAN INFERS THAT THE DATA ARE POPULATION.
Note: Analytical 2nd Derivatives are constructed in FSUBS but are never used.
      You may insert $ABBR DERIV2=NO after the first $PROB to save FSUBS construction and compilation time

1NONLINEAR MIXED EFFECTS MODEL PROGRAM (NONMEM) VERSION 7.6.0 (nm760)
 ORIGINALLY DEVELOPED BY STUART BEAL, LEWIS SHEINER, AND ALISON BOECKMANN
 CURRENT DEVELOPERS ARE ROBERT BAUER, ICON DEVELOPMENT SOLUTIONS,
 AND ALISON BOECKMANN. IMPLEMENTATION, EFFICIENCY, AND STANDARDIZATION
 PERFORMED BY NOUS INFOSYSTEMS.
 PROBLEM NO.:         1
 RTTE simulate cross-tool anchor (Phase 3 Slice 3.3) — NONMEM fits ferx
 TOT. NO. OF OBS RECS:     1299
 TOT. NO. OF INDIVIDUALS:      300
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 #TBLN:      1
 #METH: Laplacian Conditional Estimation
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
 #TERM:
0MINIMIZATION SUCCESSFUL
 NO. OF FUNCTION EVALUATIONS USED:       24
 NO. OF SIG. DIGITS IN FINAL EST.:  3.2

 ETABAR IS THE ARITHMETIC MEAN OF THE ETA-ESTIMATES,
 AND THE P-VALUE IS GIVEN FOR THE NULL HYPOTHESIS THAT THE TRUE MEAN IS 0.

 ETABAR:         1.3087E-02
 SE:             1.1206E-02
 N:                     300

 P VAL.:         2.4286E-01

 ETASHRINKSD(%)  4.5628E+01
 ETASHRINKVR(%)  7.0437E+01
 EBVSHRINKSD(%)  4.6160E+01
 EBVSHRINKVR(%)  7.1013E+01
 RELATIVEINF(%)  2.8987E+01
 EPSSHRINKSD(%)  1.0000E+02
 EPSSHRINKVR(%)  1.0000E+02


 TOTAL DATA POINTS NORMALLY DISTRIBUTED (N):            0
 N*LOG(2PI) CONSTANT TO OBJECTIVE FUNCTION:    0.0000000000000000
 OBJECTIVE FUNCTION VALUE WITHOUT CONSTANT:    5557.2661624212296
 OBJECTIVE FUNCTION VALUE WITH CONSTANT:       5557.2661624212296
 REPORTED OBJECTIVE FUNCTION DOES NOT CONTAIN CONSTANT

 TOTAL EFFECTIVE ETAS (NIND*NETA):                           300


 #TERE:
 Elapsed estimation  time in seconds:     0.16
 Elapsed covariance  time in seconds:     0.08
 Elapsed postprocess time in seconds:     0.03

 ********************                         LAPLACIAN CONDITIONAL ESTIMATION                       ********************
 #OBJT:**************                       MINIMUM VALUE OF OBJECTIVE FUNCTION                      ********************
 #OBJV:********************************************          5557.266       *********************************************

 ********************                         LAPLACIAN CONDITIONAL ESTIMATION                       ********************
 ********************                             FINAL PARAMETER ESTIMATE                           ********************

 THETA - VECTOR OF FIXED EFFECTS PARAMETERS   *********
         TH 1
         1.56E-01

 OMEGA - COV MATRIX FOR RANDOM EFFECTS - ETAS  ********
         ETA1
 ETA1
+        1.28E-01

 OMEGA - CORR MATRIX FOR RANDOM EFFECTS - ETAS  *******
         ETA1
 ETA1
+        3.58E-01

 ********************                         LAPLACIAN CONDITIONAL ESTIMATION                       ********************
 ********************                            STANDARD ERROR OF ESTIMATE                          ********************

 THETA - VECTOR OF FIXED EFFECTS PARAMETERS   *********
         TH 1
         6.59E-03

 OMEGA - COV MATRIX FOR RANDOM EFFECTS - ETAS  ********
         ETA1
 ETA1
+        3.71E-02

 OMEGA - CORR MATRIX FOR RANDOM EFFECTS - ETAS  *******
         ETA1
 ETA1
+        5.18E-02

 ********************                         LAPLACIAN CONDITIONAL ESTIMATION                       ********************
 ********************                          COVARIANCE MATRIX OF ESTIMATE                         ********************

            TH 1      OM11
 TH 1
+        4.34E-05
 OM11
+       -1.06E-04  1.38E-03

 ********************                         LAPLACIAN CONDITIONAL ESTIMATION                       ********************
 ********************                          CORRELATION MATRIX OF ESTIMATE                        ********************

            TH 1      OM11
 TH 1
+        6.59E-03
 OM11
+       -4.33E-01  3.71E-02
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 Elapsed finaloutput time in seconds:     0.03
 #CPUT: Total CPU Time in Seconds,        0.323
