Tue Jul  7 09:07:44 AM UTC 2026
$PROBLEM Clock-reset (gap-time) Weibull RTTE with frailty (Phase 3 Slice 3.2 anchor)
; Renewal RTTE: the hazard clock resets at each event, so each row contributes the
; Weibull survival/density over its inter-event gap DEL = TIME - TLAST. Pure-TTE model
; ($EST ... LIKELIHOOD, Y is the likelihood; no F_FLAG). No $DES needed — the closed-form
; Weibull is evaluated on the gap and TLAST is advanced after each event.
;
; Data: rtte_weibull_reset.csv (ID,TIME,DV,EVID,CMT,MDV). DV=1 event, DV=0 censor at t=30.
$INPUT ID TIME DV EVID CMT MDV
$DATA rtte_weibull_reset.csv IGNORE=@

$PRED
  IF (NEWIND.NE.2) TLAST = 0        ; reset the gap clock at each new subject
  SCALE = THETA(1)*EXP(ETA(1))      ; Weibull scale with frailty (H = (t/scale)^shape)
  SHAPE = THETA(2)
  DEL = TIME - TLAST                 ; gap duration since the previous event (clock reset)
  CH  = (DEL/SCALE)**SHAPE           ; H(DEL)
  SUR = EXP(-CH)
  HAZ = (SHAPE/SCALE)*(DEL/SCALE)**(SHAPE-1)
  Y = SUR                            ; censored: survival over the final gap
  IF (DV.EQ.1) Y = SUR*HAZ           ; event: density over the gap
  IF (DV.EQ.1) TLAST = TIME          ; advance the clock AFTER using the old TLAST

$THETA (0, 5.0)                      ; TVSCALE
$THETA (0, 1.5)                      ; TVSHAPE
$OMEGA 0.09                          ; frailty variance (var of log scale)

$ESTIMATION METHOD=COND LAPLACE LIKELIHOOD NUMERICAL SLOW NOABORT PRINT=5 MAXEVAL=9999
$COVARIANCE UNCONDITIONAL SLOW

NM-TRAN MESSAGES
 WARNINGS AND ERRORS (IF ANY) FOR PROBLEM    1
 (WARNING  2) NM-TRAN INFERS THAT THE DATA ARE POPULATION.
 (WARNING  97) A RANDOM QUANTITY IS RAISED TO A POWER. IF THE RESULT AFFECTS
 THE VALUE OF THE OBJECTIVE FUNCTION, THE USER SHOULD ENSURE THAT THE
 RANDOM QUANTITY IS NEVER 0 WHEN THE POWER IS < 1.
Note: Analytical 2nd Derivatives are constructed in FSUBS but are never used.
      You may insert $ABBR DERIV2=NO after the first $PROB to save FSUBS construction and compilation time

1NONLINEAR MIXED EFFECTS MODEL PROGRAM (NONMEM) VERSION 7.6.0 (nm760)
 ORIGINALLY DEVELOPED BY STUART BEAL, LEWIS SHEINER, AND ALISON BOECKMANN
 CURRENT DEVELOPERS ARE ROBERT BAUER, ICON DEVELOPMENT SOLUTIONS,
 AND ALISON BOECKMANN. IMPLEMENTATION, EFFICIENCY, AND STANDARDIZATION
 PERFORMED BY NOUS INFOSYSTEMS.
 PROBLEM NO.:         1
 Clock-reset (gap-time) Weibull RTTE with frailty (Phase 3 Slice 3.2 anch
 TOT. NO. OF OBS RECS:      761
 TOT. NO. OF INDIVIDUALS:      100
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 #TBLN:      1
 #METH: Laplacian Conditional Estimation
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
 #TERM:
0MINIMIZATION SUCCESSFUL
 NO. OF FUNCTION EVALUATIONS USED:       44
 NO. OF SIG. DIGITS IN FINAL EST.:  3.1

 ETABAR IS THE ARITHMETIC MEAN OF THE ETA-ESTIMATES,
 AND THE P-VALUE IS GIVEN FOR THE NULL HYPOTHESIS THAT THE TRUE MEAN IS 0.

 ETABAR:        -2.2403E-02
 SE:             2.9432E-02
 N:                     100

 P VAL.:         4.4656E-01

 ETASHRINKSD(%)  1.8831E+01
 ETASHRINKVR(%)  3.4117E+01
 EBVSHRINKSD(%)  1.8830E+01
 EBVSHRINKVR(%)  3.4114E+01
 RELATIVEINF(%)  6.5886E+01
 EPSSHRINKSD(%)  1.0000E+02
 EPSSHRINKVR(%)  1.0000E+02


 TOTAL DATA POINTS NORMALLY DISTRIBUTED (N):            0
 N*LOG(2PI) CONSTANT TO OBJECTIVE FUNCTION:    0.0000000000000000
 OBJECTIVE FUNCTION VALUE WITHOUT CONSTANT:    3175.8629396251690
 OBJECTIVE FUNCTION VALUE WITH CONSTANT:       3175.8629396251690
 REPORTED OBJECTIVE FUNCTION DOES NOT CONTAIN CONSTANT

 TOTAL EFFECTIVE ETAS (NIND*NETA):                           100


 #TERE:
 Elapsed estimation  time in seconds:     0.27
 Elapsed covariance  time in seconds:     0.14
 Elapsed postprocess time in seconds:     0.00

 ********************                         LAPLACIAN CONDITIONAL ESTIMATION                       ********************
 #OBJT:**************                       MINIMUM VALUE OF OBJECTIVE FUNCTION                      ********************
 #OBJV:********************************************          3175.863       *********************************************

 ********************                         LAPLACIAN CONDITIONAL ESTIMATION                       ********************
 ********************                             FINAL PARAMETER ESTIMATE                           ********************

 THETA - VECTOR OF FIXED EFFECTS PARAMETERS   *********
         TH 1      TH 2
         5.16E+00  1.53E+00

 OMEGA - COV MATRIX FOR RANDOM EFFECTS - ETAS  ********
         ETA1
 ETA1
+        1.32E-01

 OMEGA - CORR MATRIX FOR RANDOM EFFECTS - ETAS  *******
         ETA1
 ETA1
+        3.64E-01

 ********************                         LAPLACIAN CONDITIONAL ESTIMATION                       ********************
 ********************                            STANDARD ERROR OF ESTIMATE                          ********************

 THETA - VECTOR OF FIXED EFFECTS PARAMETERS   *********
         TH 1      TH 2
         2.40E-01  4.96E-02

 OMEGA - COV MATRIX FOR RANDOM EFFECTS - ETAS  ********
         ETA1
 ETA1
+        2.41E-02

 OMEGA - CORR MATRIX FOR RANDOM EFFECTS - ETAS  *******
         ETA1
 ETA1
+        3.31E-02

 ********************                         LAPLACIAN CONDITIONAL ESTIMATION                       ********************
 ********************                          COVARIANCE MATRIX OF ESTIMATE                         ********************

            TH 1      TH 2      OM11
 TH 1
+        5.75E-02
 TH 2
+        8.17E-04  2.46E-03
 OM11
+        1.39E-03 -1.02E-04  5.80E-04

 ********************                         LAPLACIAN CONDITIONAL ESTIMATION                       ********************
 ********************                          CORRELATION MATRIX OF ESTIMATE                        ********************

            TH 1      TH 2      OM11
 TH 1
+        2.40E-01
 TH 2
+        6.87E-02  4.96E-02
 OM11
+        2.40E-01 -8.52E-02  2.41E-02
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 Elapsed finaloutput time in seconds:     0.00
 #CPUT: Total CPU Time in Seconds,        0.451
