Mon Jun 22 06:52:27 AM UTC 2026
$PROBLEM    TTE Exponential – Phase 1 ferx validation
$INPUT      ID TIME DV EVID CMT MDV
$DATA      tte_exp.csv IGNORE=@
$PRED
  LAMBDA = EXP(THETA(1) + ETA(1))
  CHZ    = LAMBDA * TIME        ; H(t) = lambda * t  (Exponential)
  HAZNOW = LAMBDA               ; h(t) = lambda      (constant)
  F_FLAG = 1
  IF (DV.EQ.0) Y = EXP(-CHZ)              ; right-censored: S(T)
  IF (DV.EQ.1) Y = HAZNOW * EXP(-CHZ)    ; exact event:    h(T)*S(T)

$THETA  (-10,-2.3,5) ; log(lambda): init log(0.1) = -2.303
$OMEGA  0  FIX  ; var(eta.lambda): init 0.25
;$ESTIMATION METHOD=CONDITIONAL LAPLACIAN INTERACTION MAXEVAL=9999 PRINT=1 NOABORT
$ESTIMATION METHOD=0 MAXEVAL=9999 PRINT=5
$COVARIANCE PRINT=E
$TABLE      ID TIME DV NOPRINT NOAPPEND FILE=tte_exp.sdtab

NM-TRAN MESSAGES
 WARNINGS AND ERRORS (IF ANY) FOR PROBLEM    1
 (WARNING  1) NM-TRAN INFERS THAT THE DATA ARE SINGLE-SUBJECT.
  NONMEM RUN CANNOT BE PARALLELIZED.
 (WARNING  3) THERE MAY BE AN ERROR IN THE ABBREVIATED CODE. THE FOLLOWING
 ONE OR MORE RANDOM VARIABLES ARE DEFINED WITH "IF" STATEMENTS THAT DO NOT
 PROVIDE DEFINITIONS FOR BOTH THE "THEN" AND "ELSE" CASES. IF ALL
 CONDITIONS FAIL, THE VALUES OF THESE VARIABLES WILL BE ZERO.
   Y
Note: Analytical 2nd Derivatives are constructed in FSUBS but are never used.
      You may insert $ABBR DERIV2=NO after the first $PROB to save FSUBS construction and compilation time

1NONLINEAR MIXED EFFECTS MODEL PROGRAM (NONMEM) VERSION 7.6.0 (nm760)
 ORIGINALLY DEVELOPED BY STUART BEAL, LEWIS SHEINER, AND ALISON BOECKMANN
 CURRENT DEVELOPERS ARE ROBERT BAUER, ICON DEVELOPMENT SOLUTIONS,
 AND ALISON BOECKMANN. IMPLEMENTATION, EFFICIENCY, AND STANDARDIZATION
 PERFORMED BY NOUS INFOSYSTEMS.
 PROBLEM NO.:         1
 TTE Exponential – Phase 1 ferx validation
 TOT. NO. OF OBS RECS:      100
 TOT. NO. OF INDIVIDUALS:      100
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 #TBLN:      1
 #METH: First Order
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
 #TERM:
0MINIMIZATION SUCCESSFUL
 NO. OF FUNCTION EVALUATIONS USED:       17
 NO. OF SIG. DIGITS IN FINAL EST.:  3.2

 TOTAL DATA POINTS NORMALLY DISTRIBUTED (N):            0
 N*LOG(2PI) CONSTANT TO OBJECTIVE FUNCTION:    0.0000000000000000
 OBJECTIVE FUNCTION VALUE WITHOUT CONSTANT:    589.88802208573361
 OBJECTIVE FUNCTION VALUE WITH CONSTANT:       589.88802208573361
 REPORTED OBJECTIVE FUNCTION DOES NOT CONTAIN CONSTANT

 TOTAL EFFECTIVE ETAS (NIND*NETA):                             0


 #TERE:
 Elapsed estimation  time in seconds:     0.00
 Elapsed covariance  time in seconds:     0.00
 Elapsed postprocess time in seconds:     0.00

 ********************                                   FIRST ORDER                                  ********************
 #OBJT:**************                       MINIMUM VALUE OF OBJECTIVE FUNCTION                      ********************
 #OBJV:********************************************           589.888       *********************************************

 ********************                                   FIRST ORDER                                  ********************
 ********************                             FINAL PARAMETER ESTIMATE                           ********************

 THETA - VECTOR OF FIXED EFFECTS PARAMETERS   *********
         TH 1
        -2.60E+00

 OMEGA - COV MATRIX FOR RANDOM EFFECTS - ETAS  ********
         ETA1
 ETA1
+        0.00E+00

 OMEGA - CORR MATRIX FOR RANDOM EFFECTS - ETAS  *******
         ETA1
 ETA1
+        0.00E+00

 ********************                                   FIRST ORDER                                  ********************
 ********************                            STANDARD ERROR OF ESTIMATE                          ********************

 THETA - VECTOR OF FIXED EFFECTS PARAMETERS   *********
         TH 1
         1.15E-01

 OMEGA - COV MATRIX FOR RANDOM EFFECTS - ETAS  ********
         ETA1
 ETA1
+       .........

 OMEGA - CORR MATRIX FOR RANDOM EFFECTS - ETAS  *******
         ETA1
 ETA1
+       .........

 ********************                                   FIRST ORDER                                  ********************
 ********************                          COVARIANCE MATRIX OF ESTIMATE                         ********************

            TH 1      OM11
 TH 1
+        1.31E-02
 OM11
+       ......... .........

 ********************                                   FIRST ORDER                                  ********************
 ********************                          CORRELATION MATRIX OF ESTIMATE                        ********************

            TH 1      OM11
 TH 1
+        1.15E-01
 OM11
+       ......... .........
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
 ********************                                   FIRST ORDER                                  ********************
 ********************                      EIGENVALUES OF COR MATRIX OF ESTIMATE                     ********************

         1.00E+00
 Elapsed finaloutput time in seconds:     0.00
 #CPUT: Total CPU Time in Seconds,        0.025
