Tue Jun 23 01:11:41 PM UTC 2026
$PROBLEM    TTE Exponential (FRAILTY) – Phase 1 ferx validation
; Mixed-effects (frailty) fit via CONDITIONAL LAPLACIAN INTERACTION; fills the

; "NONMEM LAPLACIAN" column of expected.md.

;

; KEY for F_FLAG=1 likelihood models: a dummy **$SIGMA 1 FIX is REQUIRED**. Without an

; EPS/residual level, NM-TRAN infers the data are single-subject and rejects

; CONDITIONAL/LAPLACIAN ("350 METHOD=CONDITIONAL INVALID WITH SINGLE-SUBJECT DATA").

; The dummy gives NONMEM a residual-error level so the run is treated as population

; data; it is fixed and unreferenced, so it does NOT affect the likelihood. (This —

; not records-per-subject — was the real blocker; the data is the plain 1-row/subject

; file the other tools fit.)

;

; Also: HAZNOW (not the reserved $PRED name H); $TABLE without IPRED/PRED (undefined for

; F_FLAG=1); IGNORE=@ (skip the header); NUMERICAL SLOW on $EST + SLOW on $COV (NONMEM

; requires these with LAPLACIAN INTERACTION — given explicitly to silence the warning).
$INPUT      ID TIME DV EVID CMT MDV
$DATA      tte_exp.csv IGNORE=@
$PRED
  LAMBDA = EXP(THETA(1) + ETA(1))
  CHZ    = LAMBDA * TIME        ; H(t) = lambda * t  (Exponential)
  HAZNOW = LAMBDA               ; h(t) = lambda  (do NOT name this H — reserved $PRED arg)
  F_FLAG = 1
  IF (DV.EQ.0) Y = EXP(-CHZ)            ; right-censored: S(T)
  IF (DV.EQ.1) Y = HAZNOW * EXP(-CHZ)   ; exact event:    h(T)*S(T)
  DUMMY = EPS(1)

$THETA  (-10,-2.3,5) ; log(lambda): init log(0.1) = -2.303
$OMEGA  0.25  ; var(eta.lambda): ESTIMATED frailty, init 0.25
$SIGMA  1  FIX  ; dummy EPS — required so NONMEM treats this as population data
$ESTIMATION METHOD=COND LAPLACIAN INTERACTION NUMERICAL SLOW
            MAXEVAL=9999 PRINT=5 NOABORT
$COVARIANCE PRINT=E SLOW
$TABLE      ID TIME DV NOPRINT NOAPPEND FILE=tte_exp_frailty.sdtab

NM-TRAN MESSAGES
 WARNINGS AND ERRORS (IF ANY) FOR PROBLEM    1
 (WARNING  2) NM-TRAN INFERS THAT THE DATA ARE POPULATION.
 (WARNING  3) THERE MAY BE AN ERROR IN THE ABBREVIATED CODE. THE FOLLOWING
 ONE OR MORE RANDOM VARIABLES ARE DEFINED WITH "IF" STATEMENTS THAT DO NOT
 PROVIDE DEFINITIONS FOR BOTH THE "THEN" AND "ELSE" CASES. IF ALL
 CONDITIONS FAIL, THE VALUES OF THESE VARIABLES WILL BE ZERO.
   Y
Note: Analytical 2nd Derivatives are constructed in FSUBS but are never used.
      You may insert $ABBR DERIV2=NO after the first $PROB to save FSUBS construction and compilation time

1NONLINEAR MIXED EFFECTS MODEL PROGRAM (NONMEM) VERSION 7.6.0 (nm760)
 ORIGINALLY DEVELOPED BY STUART BEAL, LEWIS SHEINER, AND ALISON BOECKMANN
 CURRENT DEVELOPERS ARE ROBERT BAUER, ICON DEVELOPMENT SOLUTIONS,
 AND ALISON BOECKMANN. IMPLEMENTATION, EFFICIENCY, AND STANDARDIZATION
 PERFORMED BY NOUS INFOSYSTEMS.
 PROBLEM NO.:         1
 TTE Exponential (FRAILTY) – Phase 1 ferx validation
 TOT. NO. OF OBS RECS:      100
 TOT. NO. OF INDIVIDUALS:      100
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 #TBLN:      1
 #METH: Laplacian Conditional Estimation with Interaction
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
 #TERM:
0MINIMIZATION SUCCESSFUL
 NO. OF FUNCTION EVALUATIONS USED:       35
 NO. OF SIG. DIGITS IN FINAL EST.:  3.1

 ETABAR IS THE ARITHMETIC MEAN OF THE ETA-ESTIMATES,
 AND THE P-VALUE IS GIVEN FOR THE NULL HYPOTHESIS THAT THE TRUE MEAN IS 0.

 ETABAR:         1.8748E-02
 SE:             2.1208E-02
 N:                     100

 P VAL.:         3.7670E-01

 ETASHRINKSD(%)  6.0191E+01
 ETASHRINKVR(%)  8.4153E+01
 EBVSHRINKSD(%)  5.9061E+01
 EBVSHRINKVR(%)  8.3240E+01
 RELATIVEINF(%)  1.6760E+01
 EPSSHRINKSD(%)  1.0000E+02
 EPSSHRINKVR(%)  1.0000E+02


 TOTAL DATA POINTS NORMALLY DISTRIBUTED (N):            0
 N*LOG(2PI) CONSTANT TO OBJECTIVE FUNCTION:    0.0000000000000000
 OBJECTIVE FUNCTION VALUE WITHOUT CONSTANT:    588.93112087967711
 OBJECTIVE FUNCTION VALUE WITH CONSTANT:       588.93112087967711
 REPORTED OBJECTIVE FUNCTION DOES NOT CONTAIN CONSTANT

 TOTAL EFFECTIVE ETAS (NIND*NETA):                           100


 #TERE:
 Elapsed estimation  time in seconds:     0.02
 Elapsed covariance  time in seconds:     0.00
 Elapsed postprocess time in seconds:     0.00

 ********************                LAPLACIAN CONDITIONAL ESTIMATION WITH INTERACTION               ********************
 #OBJT:**************                       MINIMUM VALUE OF OBJECTIVE FUNCTION                      ********************
 #OBJV:********************************************           588.931       *********************************************

 ********************                LAPLACIAN CONDITIONAL ESTIMATION WITH INTERACTION               ********************
 ********************                             FINAL PARAMETER ESTIMATE                           ********************

 THETA - VECTOR OF FIXED EFFECTS PARAMETERS   *********
         TH 1
        -2.56E+00

 OMEGA - COV MATRIX FOR RANDOM EFFECTS - ETAS  ********
         ETA1
 ETA1
+        2.86E-01

 SIGMA - COV MATRIX FOR RANDOM EFFECTS - EPSILONS  ****
         EPS1
 EPS1
+        1.00E+00

 OMEGA - CORR MATRIX FOR RANDOM EFFECTS - ETAS  *******
         ETA1
 ETA1
+        5.35E-01

 SIGMA - CORR MATRIX FOR RANDOM EFFECTS - EPSILONS  ***
         EPS1
 EPS1
+        1.00E+00

 ********************                LAPLACIAN CONDITIONAL ESTIMATION WITH INTERACTION               ********************
 ********************                            STANDARD ERROR OF ESTIMATE                          ********************

 THETA - VECTOR OF FIXED EFFECTS PARAMETERS   *********
         TH 1
         1.26E-01

 OMEGA - COV MATRIX FOR RANDOM EFFECTS - ETAS  ********
         ETA1
 ETA1
+        1.60E-01

 SIGMA - COV MATRIX FOR RANDOM EFFECTS - EPSILONS  ****
         EPS1
 EPS1
+       .........

 OMEGA - CORR MATRIX FOR RANDOM EFFECTS - ETAS  *******
         ETA1
 ETA1
+        1.50E-01

 SIGMA - CORR MATRIX FOR RANDOM EFFECTS - EPSILONS  ***
         EPS1
 EPS1
+       .........

 ********************                LAPLACIAN CONDITIONAL ESTIMATION WITH INTERACTION               ********************
 ********************                          COVARIANCE MATRIX OF ESTIMATE                         ********************

            TH 1      OM11      SG11
 TH 1
+        1.59E-02
 OM11
+        3.34E-03  2.57E-02
 SG11
+       ......... ......... .........

 ********************                LAPLACIAN CONDITIONAL ESTIMATION WITH INTERACTION               ********************
 ********************                          CORRELATION MATRIX OF ESTIMATE                        ********************

            TH 1      OM11      SG11
 TH 1
+        1.26E-01
 OM11
+        1.65E-01  1.60E-01
 SG11
+       ......... ......... .........
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
 ********************                LAPLACIAN CONDITIONAL ESTIMATION WITH INTERACTION               ********************
 ********************                      EIGENVALUES OF COR MATRIX OF ESTIMATE                     ********************

             1         2
         8.35E-01  1.17E+00
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 Elapsed finaloutput time in seconds:     0.00
 #CPUT: Total CPU Time in Seconds,        0.041
