Mon Jun 22 06:50:50 AM UTC 2026
$PROBLEM    TTE Gompertz (2-arm RCT,fixed effects) – Phase 1 ferx
;           validation
$INPUT      ID TIME DV TRT EVID CMT MDV
$DATA      tte_gompertz.csv IGNORE=@
$PRED
  ALPHA  = EXP(THETA(1))     ; baseline hazard rate at t=0
  GAMMA  = EXP(THETA(2))     ; hazard acceleration (growth rate)
  LOGHR  = THETA(3)          ; log hazard ratio (treatment effect)
  HAZ    = ALPHA * EXP(GAMMA * TIME) * EXP(LOGHR * TRT)
  CHZ    = (ALPHA/GAMMA) * (EXP(GAMMA*TIME) - 1) * EXP(LOGHR * TRT)
  F_FLAG = 1
  IF (DV.EQ.0) Y = EXP(-CHZ)
  IF (DV.EQ.1) Y = HAZ * EXP(-CHZ)
  DUMMY = ETA(1)
$THETA  (-15,-6.0,0) ; log_alpha: init -6.0
$THETA  (-15,-5.4,0) ; log_gamma: init -5.4
$THETA  (-5,-0.8,5) ; log_hr:    init -0.8
;$ESTIMATION LAPLACIAN INTERACTION MAXEVAL=9999 PRINT=1 NOABORT
$ESTIMATION METHOD=0 MAXEVAL=9999 PRINT=1
$COVARIANCE PRINT=E
$OMEGA  0  FIX
$TABLE      ID TIME DV TRT NOPRINT NOAPPEND FILE=tte_gompertz.sdtab

NM-TRAN MESSAGES
 WARNINGS AND ERRORS (IF ANY) FOR PROBLEM    1
 (WARNING  1) NM-TRAN INFERS THAT THE DATA ARE SINGLE-SUBJECT.
  NONMEM RUN CANNOT BE PARALLELIZED.
Note: Analytical 2nd Derivatives are constructed in FSUBS but are never used.
      You may insert $ABBR DERIV2=NO after the first $PROB to save FSUBS construction and compilation time

1NONLINEAR MIXED EFFECTS MODEL PROGRAM (NONMEM) VERSION 7.6.0 (nm760)
 ORIGINALLY DEVELOPED BY STUART BEAL, LEWIS SHEINER, AND ALISON BOECKMANN
 CURRENT DEVELOPERS ARE ROBERT BAUER, ICON DEVELOPMENT SOLUTIONS,
 AND ALISON BOECKMANN. IMPLEMENTATION, EFFICIENCY, AND STANDARDIZATION
 PERFORMED BY NOUS INFOSYSTEMS.
 PROBLEM NO.:         1
 TTE Gompertz (2-arm RCT,fixed effects) – Phase 1 ferx
 TOT. NO. OF OBS RECS:      300
 TOT. NO. OF INDIVIDUALS:      300
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 #TBLN:      1
 #METH: First Order
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
 #TERM:
0MINIMIZATION SUCCESSFUL
 NO. OF FUNCTION EVALUATIONS USED:       53
 NO. OF SIG. DIGITS IN FINAL EST.:  3.3

 TOTAL DATA POINTS NORMALLY DISTRIBUTED (N):            0
 N*LOG(2PI) CONSTANT TO OBJECTIVE FUNCTION:    0.0000000000000000
 OBJECTIVE FUNCTION VALUE WITHOUT CONSTANT:    3011.1211738240013
 OBJECTIVE FUNCTION VALUE WITH CONSTANT:       3011.1211738240013
 REPORTED OBJECTIVE FUNCTION DOES NOT CONTAIN CONSTANT

 TOTAL EFFECTIVE ETAS (NIND*NETA):                             0


 #TERE:
 Elapsed estimation  time in seconds:     0.03
 Elapsed covariance  time in seconds:     0.02
 Elapsed postprocess time in seconds:     0.00

 ********************                                   FIRST ORDER                                  ********************
 #OBJT:**************                       MINIMUM VALUE OF OBJECTIVE FUNCTION                      ********************
 #OBJV:********************************************          3011.121       *********************************************

 ********************                                   FIRST ORDER                                  ********************
 ********************                             FINAL PARAMETER ESTIMATE                           ********************

 THETA - VECTOR OF FIXED EFFECTS PARAMETERS   *********
         TH 1      TH 2      TH 3
        -6.01E+00 -5.40E+00 -7.97E-01

 OMEGA - COV MATRIX FOR RANDOM EFFECTS - ETAS  ********
         ETA1
 ETA1
+        0.00E+00

 OMEGA - CORR MATRIX FOR RANDOM EFFECTS - ETAS  *******
         ETA1
 ETA1
+        0.00E+00

 ********************                                   FIRST ORDER                                  ********************
 ********************                            STANDARD ERROR OF ESTIMATE                          ********************

 THETA - VECTOR OF FIXED EFFECTS PARAMETERS   *********
         TH 1      TH 2      TH 3
         1.38E-01  1.46E-01  1.36E-01

 OMEGA - COV MATRIX FOR RANDOM EFFECTS - ETAS  ********
         ETA1
 ETA1
+       .........

 OMEGA - CORR MATRIX FOR RANDOM EFFECTS - ETAS  *******
         ETA1
 ETA1
+       .........

 ********************                                   FIRST ORDER                                  ********************
 ********************                          COVARIANCE MATRIX OF ESTIMATE                         ********************

            TH 1      TH 2      TH 3      OM11
 TH 1
+        1.89E-02
 TH 2
+       -1.58E-02  2.14E-02
 TH 3
+       -4.37E-03 -3.85E-03  1.86E-02
 OM11
+       ......... ......... ......... .........

 ********************                                   FIRST ORDER                                  ********************
 ********************                          CORRELATION MATRIX OF ESTIMATE                        ********************

            TH 1      TH 2      TH 3      OM11
 TH 1
+        1.38E-01
 TH 2
+       -7.87E-01  1.46E-01
 TH 3
+       -2.33E-01 -1.93E-01  1.36E-01
 OM11
+       ......... ......... ......... .........
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
 ********************                                   FIRST ORDER                                  ********************
 ********************                      EIGENVALUES OF COR MATRIX OF ESTIMATE                     ********************

             1         2         3
         1.11E-01  1.10E+00  1.79E+00
 Elapsed finaloutput time in seconds:     0.00
 #CPUT: Total CPU Time in Seconds,        0.086
