Mon Jun 22 06:55:53 AM UTC 2026
$PROBLEM    TTE Weibull (scale param) – Phase 1 ferx validation
$INPUT      ID TIME DV EVID CMT MDV
$DATA      tte_weibull.csv IGNORE=@
$PRED
  SCALE  = EXP(THETA(1))           ; scale (time units): H=(t/scale)^shape
  SHAPE  = EXP(THETA(2) + ETA(1))  ; shape (dimensionless)
  CHZ    = (TIME/SCALE)**SHAPE      ; H(t)
  HAZNOW = (SHAPE/SCALE)*(TIME/SCALE)**(SHAPE-1)  ; h(t)
  F_FLAG = 1
  IF (DV.EQ.0) Y = EXP(-CHZ)
  IF (DV.EQ.1) Y = HAZNOW * EXP(-CHZ)

$THETA  (0.001,3.0,10) ; log(scale): init log(20) = 2.996
$THETA  (0.001,0.693,5) ; log(shape): init log(2.0) = 0.693
$OMEGA  0  FIX  ; var(eta.shape)
;$ESTIMATION METHOD=CONDITIONAL LAPLACIAN INTERACTION MAXEVAL=9999 PRINT=1 NOABORT
$ESTIMATION METHOD=0 MAXEVAL=9999 PRINT=1
$COVARIANCE PRINT=E
$TABLE      ID TIME DV NOPRINT NOAPPEND FILE=tte_weibull.sdtab

NM-TRAN MESSAGES
 WARNINGS AND ERRORS (IF ANY) FOR PROBLEM    1
 (WARNING  1) NM-TRAN INFERS THAT THE DATA ARE SINGLE-SUBJECT.
  NONMEM RUN CANNOT BE PARALLELIZED.
 (WARNING  3) THERE MAY BE AN ERROR IN THE ABBREVIATED CODE. THE FOLLOWING
 ONE OR MORE RANDOM VARIABLES ARE DEFINED WITH "IF" STATEMENTS THAT DO NOT
 PROVIDE DEFINITIONS FOR BOTH THE "THEN" AND "ELSE" CASES. IF ALL
 CONDITIONS FAIL, THE VALUES OF THESE VARIABLES WILL BE ZERO.
   Y
 (WARNING  99) A RANDOM QUANTITY IS USED AS A POWER. IF THE RESULT AFFECTS
 THE VALUE OF THE OBJECTIVE FUNCTION, THE USER SHOULD ENSURE THAT THE
 QUANTITY RAISED TO THE POWER IS NOT 0.
Note: Analytical 2nd Derivatives are constructed in FSUBS but are never used.
      You may insert $ABBR DERIV2=NO after the first $PROB to save FSUBS construction and compilation time

1NONLINEAR MIXED EFFECTS MODEL PROGRAM (NONMEM) VERSION 7.6.0 (nm760)
 ORIGINALLY DEVELOPED BY STUART BEAL, LEWIS SHEINER, AND ALISON BOECKMANN
 CURRENT DEVELOPERS ARE ROBERT BAUER, ICON DEVELOPMENT SOLUTIONS,
 AND ALISON BOECKMANN. IMPLEMENTATION, EFFICIENCY, AND STANDARDIZATION
 PERFORMED BY NOUS INFOSYSTEMS.
 PROBLEM NO.:         1
 TTE Weibull (scale param) – Phase 1 ferx validation
 TOT. NO. OF OBS RECS:      100
 TOT. NO. OF INDIVIDUALS:      100
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 #TBLN:      1
 #METH: First Order
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
 #TERM:
0MINIMIZATION SUCCESSFUL
 NO. OF FUNCTION EVALUATIONS USED:       28
 NO. OF SIG. DIGITS IN FINAL EST.:  3.2

 TOTAL DATA POINTS NORMALLY DISTRIBUTED (N):            0
 N*LOG(2PI) CONSTANT TO OBJECTIVE FUNCTION:    0.0000000000000000
 OBJECTIVE FUNCTION VALUE WITHOUT CONSTANT:    640.26072452175094
 OBJECTIVE FUNCTION VALUE WITH CONSTANT:       640.26072452175094
 REPORTED OBJECTIVE FUNCTION DOES NOT CONTAIN CONSTANT

 TOTAL EFFECTIVE ETAS (NIND*NETA):                             0


 #TERE:
 Elapsed estimation  time in seconds:     0.01
 Elapsed covariance  time in seconds:     0.00
 Elapsed postprocess time in seconds:     0.00

 ********************                                   FIRST ORDER                                  ********************
 #OBJT:**************                       MINIMUM VALUE OF OBJECTIVE FUNCTION                      ********************
 #OBJV:********************************************           640.261       *********************************************

 ********************                                   FIRST ORDER                                  ********************
 ********************                             FINAL PARAMETER ESTIMATE                           ********************

 THETA - VECTOR OF FIXED EFFECTS PARAMETERS   *********
         TH 1      TH 2
         3.10E+00  7.51E-01

 OMEGA - COV MATRIX FOR RANDOM EFFECTS - ETAS  ********
         ETA1
 ETA1
+        0.00E+00

 OMEGA - CORR MATRIX FOR RANDOM EFFECTS - ETAS  *******
         ETA1
 ETA1
+        0.00E+00

 ********************                                   FIRST ORDER                                  ********************
 ********************                            STANDARD ERROR OF ESTIMATE                          ********************

 THETA - VECTOR OF FIXED EFFECTS PARAMETERS   *********
         TH 1      TH 2
         5.22E-02  9.32E-02

 OMEGA - COV MATRIX FOR RANDOM EFFECTS - ETAS  ********
         ETA1
 ETA1
+       .........

 OMEGA - CORR MATRIX FOR RANDOM EFFECTS - ETAS  *******
         ETA1
 ETA1
+       .........

 ********************                                   FIRST ORDER                                  ********************
 ********************                          COVARIANCE MATRIX OF ESTIMATE                         ********************

            TH 1      TH 2      OM11
 TH 1
+        2.72E-03
 TH 2
+        2.63E-04  8.69E-03
 OM11
+       ......... ......... .........

 ********************                                   FIRST ORDER                                  ********************
 ********************                          CORRELATION MATRIX OF ESTIMATE                        ********************

            TH 1      TH 2      OM11
 TH 1
+        5.22E-02
 TH 2
+        5.42E-02  9.32E-02
 OM11
+       ......... ......... .........
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
 ********************                                   FIRST ORDER                                  ********************
 ********************                      EIGENVALUES OF COR MATRIX OF ESTIMATE                     ********************

             1         2
         9.46E-01  1.05E+00
 Elapsed finaloutput time in seconds:     0.00
 #CPUT: Total CPU Time in Seconds,        0.034
