Tue Jun 23 01:12:25 PM UTC 2026
$PROBLEM    TTE Weibull (FRAILTY on shape) – Phase 1 ferx validation
; Mixed-effects (frailty on shape) via CONDITIONAL LAPLACIAN INTERACTION; fills the

; "NONMEM LAPLACIAN" column / the #440 nonlinear-frailty omega^2 cross-check

; (ferx 0.204 vs nlmixr2 0.173).

;

; KEY for F_FLAG=1 likelihood models: a dummy **$SIGMA 1 FIX is REQUIRED**. Without an

; EPS, NM-TRAN infers the data are single-subject and rejects CONDITIONAL/LAPLACIAN

; (error 350). The dummy is fixed and unreferenced, so it does NOT affect the likelihood.

; (Records-per-subject was NOT the trigger — the plain 1-row/subject file is used.)

;

; Also: HAZNOW (not the reserved name H); IGNORE=@; clean $TABLE; NUMERICAL SLOW on $EST

; + SLOW on $COV (NONMEM requires these with LAPLACIAN INTERACTION).
$INPUT      ID TIME DV EVID CMT MDV
$DATA      tte_weibull.csv IGNORE=@
$PRED
  SCALE  = EXP(THETA(1))           ; scale (time units): H=(t/scale)^shape
  SHAPE  = EXP(THETA(2) + ETA(1))  ; shape (dimensionless), frailty on shape
  CHZ    = (TIME/SCALE)**SHAPE      ; H(t)
  HAZNOW = (SHAPE/SCALE)*(TIME/SCALE)**(SHAPE-1)  ; h(t)  (NOT H — reserved $PRED arg)
  F_FLAG = 1
  IF (DV.EQ.0) Y = EXP(-CHZ)
  IF (DV.EQ.1) Y = HAZNOW * EXP(-CHZ)
  DUMMY = EPS(1)
$THETA  (0.001,3.0,10) ; log(scale): init log(20) = 2.996
$THETA  (0.001,0.693,5) ; log(shape): init log(2.0) = 0.693
$OMEGA  0.20  ; var(eta.shape): ESTIMATED frailty, init 0.20
$SIGMA  1  FIX  ; dummy EPS — required so NONMEM treats this as population data
$ESTIMATION METHOD=COND LAPLACIAN INTERACTION NUMERICAL SLOW
            MAXEVAL=9999 PRINT=5 NOABORT
$COVARIANCE PRINT=E SLOW
$TABLE      ID TIME DV NOPRINT NOAPPEND FILE=tte_weibull_frailty.sdtab

NM-TRAN MESSAGES
 WARNINGS AND ERRORS (IF ANY) FOR PROBLEM    1
 (WARNING  2) NM-TRAN INFERS THAT THE DATA ARE POPULATION.
 (WARNING  3) THERE MAY BE AN ERROR IN THE ABBREVIATED CODE. THE FOLLOWING
 ONE OR MORE RANDOM VARIABLES ARE DEFINED WITH "IF" STATEMENTS THAT DO NOT
 PROVIDE DEFINITIONS FOR BOTH THE "THEN" AND "ELSE" CASES. IF ALL
 CONDITIONS FAIL, THE VALUES OF THESE VARIABLES WILL BE ZERO.
   Y
 (WARNING  99) A RANDOM QUANTITY IS USED AS A POWER. IF THE RESULT AFFECTS
 THE VALUE OF THE OBJECTIVE FUNCTION, THE USER SHOULD ENSURE THAT THE
 QUANTITY RAISED TO THE POWER IS NOT 0.
Note: Analytical 2nd Derivatives are constructed in FSUBS but are never used.
      You may insert $ABBR DERIV2=NO after the first $PROB to save FSUBS construction and compilation time

1NONLINEAR MIXED EFFECTS MODEL PROGRAM (NONMEM) VERSION 7.6.0 (nm760)
 ORIGINALLY DEVELOPED BY STUART BEAL, LEWIS SHEINER, AND ALISON BOECKMANN
 CURRENT DEVELOPERS ARE ROBERT BAUER, ICON DEVELOPMENT SOLUTIONS,
 AND ALISON BOECKMANN. IMPLEMENTATION, EFFICIENCY, AND STANDARDIZATION
 PERFORMED BY NOUS INFOSYSTEMS.
 PROBLEM NO.:         1
 TTE Weibull (FRAILTY on shape) – Phase 1 ferx validation
 TOT. NO. OF OBS RECS:      100
 TOT. NO. OF INDIVIDUALS:      100
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 #TBLN:      1
 #METH: Laplacian Conditional Estimation with Interaction
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
 #TERM:
0MINIMIZATION SUCCESSFUL
 HOWEVER, PROBLEMS OCCURRED WITH THE MINIMIZATION.
 REGARD THE RESULTS OF THE ESTIMATION STEP CAREFULLY, AND ACCEPT THEM ONLY
 AFTER CHECKING THAT THE COVARIANCE STEP PRODUCES REASONABLE OUTPUT.
 NO. OF FUNCTION EVALUATIONS USED:      100
 NO. OF SIG. DIGITS IN FINAL EST.:  3.3

 ETABAR IS THE ARITHMETIC MEAN OF THE ETA-ESTIMATES,
 AND THE P-VALUE IS GIVEN FOR THE NULL HYPOTHESIS THAT THE TRUE MEAN IS 0.

 ETABAR:         1.4572E-02
 SE:             1.5348E-02
 N:                     100

 P VAL.:         3.4239E-01

 ETASHRINKSD(%)  6.3120E+01
 ETASHRINKVR(%)  8.6398E+01
 EBVSHRINKSD(%)  6.1734E+01
 EBVSHRINKVR(%)  8.5357E+01
 RELATIVEINF(%)  1.4643E+01
 EPSSHRINKSD(%)  1.0000E+02
 EPSSHRINKVR(%)  1.0000E+02


 TOTAL DATA POINTS NORMALLY DISTRIBUTED (N):            0
 N*LOG(2PI) CONSTANT TO OBJECTIVE FUNCTION:    0.0000000000000000
 OBJECTIVE FUNCTION VALUE WITHOUT CONSTANT:    639.98258017646731
 OBJECTIVE FUNCTION VALUE WITH CONSTANT:       639.98258017646731
 REPORTED OBJECTIVE FUNCTION DOES NOT CONTAIN CONSTANT

 TOTAL EFFECTIVE ETAS (NIND*NETA):                           100


 #TERE:
 Elapsed estimation  time in seconds:     0.10
 Elapsed covariance  time in seconds:     0.02
 Elapsed postprocess time in seconds:     0.00

 ********************                LAPLACIAN CONDITIONAL ESTIMATION WITH INTERACTION               ********************
 #OBJT:**************                       MINIMUM VALUE OF OBJECTIVE FUNCTION                      ********************
 #OBJV:********************************************           639.983       *********************************************

 ********************                LAPLACIAN CONDITIONAL ESTIMATION WITH INTERACTION               ********************
 ********************                             FINAL PARAMETER ESTIMATE                           ********************

 THETA - VECTOR OF FIXED EFFECTS PARAMETERS   *********
         TH 1      TH 2
         3.09E+00  7.93E-01

 OMEGA - COV MATRIX FOR RANDOM EFFECTS - ETAS  ********
         ETA1
 ETA1
+        1.75E-01

 SIGMA - COV MATRIX FOR RANDOM EFFECTS - EPSILONS  ****
         EPS1
 EPS1
+        1.00E+00

 OMEGA - CORR MATRIX FOR RANDOM EFFECTS - ETAS  *******
         ETA1
 ETA1
+        4.18E-01

 SIGMA - CORR MATRIX FOR RANDOM EFFECTS - EPSILONS  ***
         EPS1
 EPS1
+        1.00E+00

 ********************                LAPLACIAN CONDITIONAL ESTIMATION WITH INTERACTION               ********************
 ********************                            STANDARD ERROR OF ESTIMATE                          ********************

 THETA - VECTOR OF FIXED EFFECTS PARAMETERS   *********
         TH 1      TH 2
         5.38E-02  1.07E-01

 OMEGA - COV MATRIX FOR RANDOM EFFECTS - ETAS  ********
         ETA1
 ETA1
+        1.27E-01

 SIGMA - COV MATRIX FOR RANDOM EFFECTS - EPSILONS  ****
         EPS1
 EPS1
+       .........

 OMEGA - CORR MATRIX FOR RANDOM EFFECTS - ETAS  *******
         ETA1
 ETA1
+        1.52E-01

 SIGMA - CORR MATRIX FOR RANDOM EFFECTS - EPSILONS  ***
         EPS1
 EPS1
+       .........

 ********************                LAPLACIAN CONDITIONAL ESTIMATION WITH INTERACTION               ********************
 ********************                          COVARIANCE MATRIX OF ESTIMATE                         ********************

            TH 1      TH 2      OM11      SG11
 TH 1
+        2.89E-03
 TH 2
+       -7.62E-04  1.15E-02
 OM11
+       -2.61E-03  7.18E-03  1.62E-02
 SG11
+       ......... ......... ......... .........

 ********************                LAPLACIAN CONDITIONAL ESTIMATION WITH INTERACTION               ********************
 ********************                          CORRELATION MATRIX OF ESTIMATE                        ********************

            TH 1      TH 2      OM11      SG11
 TH 1
+        5.38E-02
 TH 2
+       -1.32E-01  1.07E-01
 OM11
+       -3.81E-01  5.27E-01  1.27E-01
 SG11
+       ......... ......... ......... .........
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
 ********************                LAPLACIAN CONDITIONAL ESTIMATION WITH INTERACTION               ********************
 ********************                      EIGENVALUES OF COR MATRIX OF ESTIMATE                     ********************

             1         2         3
         4.08E-01  8.75E-01  1.72E+00
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 Elapsed finaloutput time in seconds:     0.00
 #CPUT: Total CPU Time in Seconds,        0.130
